// SBML level 2 version 1
// This model was downloaded from BioModels Database
// http://www.ebi.ac.uk/biomodels-static/

model Tyson1999()
  // Tyson1999_CircClock
  // To the extent possible under law, all copyright and related or neighbouring rights to this encoded model have been dedicated to the public domain worldwide. Please refer to CC0 Public Domain Dedication for more information.
  // In summary, you are entitled to use this encoded model in absolutely any manner you deem suitable, verbatim, or with modification, alone or embedded it in a larger context, redistribute it, commercially or not, in a restricted way or not.
  // To cite BioModels Database, please use: Li C, Donizelli M, Rodriguez N, Dharuri H, Endler L, Chelliah V, Li L, He E, Henry A, Stefan MI, Snoep JL, Hucka M, Le Novère N, Laibe C (2010) BioModels Database: An enhanced, curated and annotated resource for published quantitative kinetic models. BMC Syst Biol., 4:92.
  // biomodels.db:MODEL6619720081
  // biomodels.db:BIOMD0000000036
  // isDescribedBy pubmed:20540926
  // kegg.pathway:dme04710
  // hasTaxon taxonomy:7227
  // isVersionOf GO:0042752

  // Compartments:
  compartment default = 1;
  compartment CYTOPLASM = 1;  // isVersionOf GO:0005737

  // Species:
  species $EmptySet in default = 0;
  species M in CYTOPLASM = 1/CYTOPLASM;
  species P in CYTOPLASM = 1/CYTOPLASM; P is "Pt";  // uniprot:P07663

  // Parameters:
  N_A = 6.0221367e23;

  // Reactions:
  TC: $EmptySet => M; CYTOPLASM*(Vm/(1 + (P*(1 - 2/(1 + (1 + 8*TC_Keq*P)^0.5))/(2*Pcrit))^2)); TC is "transcription";  // modifiers: P; isVersionOf GO:0006355 GO:0009299
    Vm = 1; Pcrit = 0.1; TC_Keq = 200;
  TL: $EmptySet => P; V*M*CYTOPLASM; TL is "translation";  // modifiers: M; isVersionOf GO:0006412
    V = 0.5;
  mRNAD: M => $EmptySet; mRNAD_D*M*CYTOPLASM; mRNAD is "mRNA degradation";  // isVersionOf GO:0006402
    mRNAD_D = 0.1;
  ProteinD: P => $EmptySet; ProteinD_D*P*CYTOPLASM; ProteinD is "protein degradation";  // isVersionOf GO:0030163
    ProteinD_D = 0.1;
  DBT: P => $EmptySet; CYTOPLASM*((k1*P*(2/(1 + (1 + 8*DBT_Keq*P)^0.5)) + k2*P)/(J + P)); DBT is "Per phosphorylation and degradation";  // isVersionOf ec-code:2.7.1.37 GO:0006468 GO:0030163
    k1 = 10; k2 = 0.03; J = 0.05; DBT_Keq = 200;

  // Unit definitions:
  unit time = 3600 second; time is "hour";
end
