// SBML level 2 version 1
// This model was downloaded from BioModels Database
// http://www.ebi.ac.uk/biomodels-static/

model BIOMD0000000037()
  // Marwan2003 - Genetics, regulatory hierarchy between genes
  // To the extent possible under law, all copyright and related or neighbouring rights to this encoded model have been dedicated to the public domain worldwide. Please refer to CC0 Public Domain Dedication for more information.
  // In summary, you are entitled to use this encoded model in absolutely any manner you deem suitable, verbatim, or with modification, alone or embedded it in a larger context, redistribute it, commercially or not, in a restricted way or not.
  // To cite BioModels Database, please use: Li C, Donizelli M, Rodriguez N, Dharuri H, Endler L, Chelliah V, Li L, He E, Henry A, Stefan MI, Snoep JL, Hucka M, Le Novère N, Laibe C (2010) BioModels Database: An enhanced, curated and annotated resource for published quantitative kinetic models. BMC Syst Biol., 4:92.
  // biomodels.db:BIOMD0000000037
  // biomodels.db:MODEL6621175859
  // isDescribedBy pubmed:12750324
  // isVersionOf GO:0010018 GO:0042173
  // hasTaxon taxonomy:5791

  // Compartments:
  compartment compartment = 1;

  // Species:
  species Pfr in compartment = 10/compartment;  // hasVersion CHEBI:35799 interpro:IPR001294
  species Pr in compartment = 0;  // hasVersion CHEBI:35799 interpro:IPR001294
  species Xi in compartment = 6/compartment;
  species Xa in compartment = 0;
  species prepreS in compartment = 200/compartment;
  species preS in compartment = 0;
  species Ya in compartment = 0.9/compartment;
  species S in compartment = 0;
  species $Gluc in compartment = 0;  // CHEBI:17234 kegg.compound:C00293
  species Yi in compartment = 0;
  species V in compartment = 30/compartment;
  species Pi in compartment = 0;

  // Reactions:
  Photoreceptor_activation: Pfr => Pr; compartment*Pfr*IfrSfrPfr;  // isVersionOf GO:0031516
    IfrSfrPfr = 0.1;
  Photoreceptor_inactivation: Pr => Pfr; IrSrPr*Pr*compartment;  // isVersionOf GO:0031517
    IrSrPr = 0;
  Transducer_activation: Xi => Xa; Xi*kia*Pr*compartment;  // modifiers: Pr
    kia = 0.1;
  Transducer_inactivation: Xa => Xi; kai*Xa*compartment;
    kai = 0.8;
  preS_formation: prepreS => preS; prepreS*kx*Xa*compartment;  // modifiers: Xa
    kx = 0.2;
  S_generation: preS => S; preS*ky*Ya*compartment;  // modifiers: Ya
    ky = 1;
  Glucose_sensor_inactivation: Ya + $Gluc => Yi; kG*Ya*Gluc*compartment;
    kG = 0.1;
  S_formation: => S; compartment*(alpha1/(1 + V^3));  // modifiers: V; isVersionOf GO:0009299 GO:0006412
    alpha1 = 30;
  V_formation: => V; compartment*(alpha2/(1 + S^3));  // modifiers: S; isVersionOf GO:0009299 GO:0006412
    alpha2 = 50;
  S_degradation: S => ; kd_s*S*compartment;  // isVersionOf GO:0006402
    kd_s = 1;
  V_degradation: V => ; compartment*V*kd_v;  // isVersionOf GO:0006402
    kd_v = 1;
  Photoreceptor_decay: Pr => Pi; compartment*kd*Pr;
    kd = 0.1;

  // Unit definitions:
  unit time = 3600 second; time is "hour";
end
