// SBML level 2 version 1
// This model was downloaded from BioModels Database
// http://www.ebi.ac.uk/biomodels-static/

model Marhl_Calcium_Oscillations_role_of_mitochondria_and_cytosolic_proteins()
  // Marhl2000_CaOscillations
  // In order to reproduce the model, the volume of all compartment is set to 1, and the stoichiometry of CaER and CaM has been set to 0.25, corresponding to betaER/rhoER and betaM/rhoM described in the paper.
  // To the extent possible under law, all copyright and related or neighbouring rights to this encoded model have been dedicated to the public domain worldwide. Please refer to CC0 Public Domain Dedication for more information.
  // In summary, you are entitled to use this encoded model in absolutely any manner you deem suitable, verbatim, or with modification, alone or embedded it in a larger context, redistribute it, commercially or not, in a restricted way or not.
  // To cite BioModels Database, please use: Li C, Donizelli M, Rodriguez N, Dharuri H, Endler L, Chelliah V, Li L, He E, Henry A, Stefan MI, Snoep JL, Hucka M, Le Novère N, Laibe C (2010) BioModels Database: An enhanced, curated and annotated resource for published quantitative kinetic models. BMC Syst Biol., 4:92.
  // biomodels.db:MODEL6621933497
  // biomodels.db:BIOMD0000000039
  // isDescribedBy pubmed:11004387
  // isDerivedFrom pubmed:17029696 pubmed:12362939
  // hasTaxon taxonomy:8355
  // kegg.pathway:hsa04020 GO:0019722 GO:0048016

  // Compartments:
  compartment Cytosol = 1;  // GO:0005829
  compartment Endoplasmic_Reticulum in Cytosol = 1;  // GO:0005790
  compartment Mitochondria in Cytosol = 1;  // GO:0005739

  // Species:
  species Ca_cyt in Cytosol = 0.35;  // CHEBI:29108
  species CaER in Endoplasmic_Reticulum = 0.76;  // CHEBI:29108
  species CaM in Mitochondria = 0.29;  // CHEBI:29108
  species CaPr in Cytosol = 85.45;  // hasPart CHEBI:29108 kegg.compound:C00017
  species Pr in Cytosol = 34.55;  // isVersionOf kegg.compound:C00017 CHEBI:16541

  // Reactions:
  Jch: 0.25 CaER => Ca_cyt; Cytosol*(Kch*Ca_cyt^2*(CaER - Ca_cyt)/(K1^2 + Ca_cyt^2));  // isVersionOf GO:0051482 GO:0006816
    Kch = 4100; K1 = 5;
  Jleak: 0.25 CaER => Ca_cyt; Cytosol*Kleak*(CaER - Ca_cyt);  // isVersionOf GO:0006816 GO:0007204
    Kleak = 0.05;
  Jpump: Ca_cyt => 0.25 CaER; Endoplasmic_Reticulum*Kpump*Ca_cyt;  // isVersionOf GO:0051481 GO:0006816
    Kpump = 20;
  Jout: 0.25 CaM => Ca_cyt; Cytosol*CaM*(Kout*Ca_cyt^2/(K3^2 + Ca_cyt^2) + Km);  // GO:0006816 GO:0007204
    Kout = 125; K3 = 5; Km = 0.00625;
  Jin: Ca_cyt => 0.25 CaM; Mitochondria*(Kin*Ca_cyt^8/(K2^8 + Ca_cyt^8));  // isVersionOf GO:0006816 GO:0051481
    Kin = 300; K2 = 0.8;
  dissociation_of_CaPr: CaPr => Pr + Ca_cyt; Cytosol*Kminus*CaPr;  // isVersionOf GO:0007204
    Kminus = 0.01;
  binding_of_Ca_on_Pr: Pr + Ca_cyt => CaPr; Cytosol*Kplus*Ca_cyt*Pr;  // isVersionOf GO:0005509 GO:0051481
    Kplus = 0.1;

  // Unit definitions:
  unit substance = 1e-6 mole; substance is "micromole (default)";
end
