// SBML level 2 version 4
// This model was downloaded from BioModels Database
// http://www.ebi.ac.uk/biomodels-static/

model Glycolysis_Nielsen()
  // Nielsen1998_Glycolysis
  // This model was automatically converted from model BIOMD0000000042 by using libSBML .
  // According to the BioModels Database terms of use , this generated model is not related with model BIOMD0000000042 any more.
  // biomodels.db:MODEL6622455387
  // biomodels.db:BIOMD0000000042
  // isDescribedBy pubmed:17029704
  // isDerivedFrom pubmed:6454892 pubmed:8061224
  // isHomologTo reactome:REACT_1383
  // hasTaxon taxonomy:4932

  // Compartments:
  compartment compartment = 1;  // isVersionOf GO:0005737

  // Species:
  species ATP in compartment = 4.49064/compartment;  // CHEBI:15422 kegg.compound:C00002
  species ADP in compartment = 0.108367/compartment;  // CHEBI:16761 kegg.compound:C00008
  species AMP in compartment = 0.00261149/compartment;  // CHEBI:16027 kegg.compound:C00020
  species GLC in compartment = 0.0112817/compartment;  // CHEBI:17234 kegg.compound:C00293
  species F6P in compartment = 0.65939/compartment;  // CHEBI:20935 kegg.compound:C05345
  species FBP in compartment = 0.00770135/compartment;  // CHEBI:16905 kegg.compound:C05378
  species GAP in compartment = 0.00190919/compartment;  // CHEBI:29052 kegg.compound:C00118
  species NAD in compartment = 3.62057/compartment;  // CHEBI:15846 kegg.compound:C00003
  species NADH in compartment = 0.616118/compartment;  // CHEBI:16908 kegg.compound:C00004
  species DPG in compartment = 0.299109/compartment;  // CHEBI:16001 kegg.compound:C00236
  species PEP in compartment = 0.0021125/compartment;  // CHEBI:18021 kegg.compound:C00074
  species PYR in compartment = 0.00422702/compartment;  // CHEBI:15361 kegg.compound:C00022
  species ACA in compartment = 0.0738334/compartment;  // CHEBI:15343 kegg.compound:C00084
  species EtOH in compartment = 0.33981/compartment;  // CHEBI:16236 kegg.compound:C00469
  species P in compartment = 0;

  // Parameters:
  V1 = 0.5;
  K1GLC = 0.1;
  K1ATP = 0.063;
  V2 = 1.5;
  K2 = 0.0016;
  k2 = 0.017;
  K2ATP = 0.01;
  k3f = 1;
  k3b = 50;
  V4 = 10;
  K4GAP = 1;
  K4NAD = 1;
  k5f = 1;
  k5b = 0.5;
  V6 = 10;
  K6PEP = 0.2;
  K6ADP = 0.3;
  V7 = 2;
  K7PYR = 0.3;
  k8f = 1;
  k8b = 0.000143;
  k9f = 10;
  k9b = 10;
  k10 = 0.05;
  flow = 0.011;

  // Reactions:
  ATPflow: -> ATP; compartment*(3.5 - ATP)*flow;  // isVersionOf GO:0006754
  ADPflow: -> ADP; compartment*(1.1 - ADP)*flow;  // isVersionOf GO:0006172
  NADHflow: -> NADH; compartment*(0.24 - NADH)*flow;  // isVersionOf GO:0006735
  NADflow: -> NAD; compartment*(4 - NAD)*flow;  // isVersionOf GO:0009435
  GLCflow: -> GLC; compartment*(50 - GLC)*flow;  // isVersionOf GO:0046323
  F6Pflow: F6P => ; compartment*F6P*flow;  // isVersionOf GO:0006002
  FBPflow: FBP => ; compartment*FBP*flow;  // isVersionOf GO:0030388
  GAPflow: GAP => ; compartment*GAP*flow;  // isVersionOf GO:0019683
  DPGflow: DPG => ; compartment*DPG*flow;
  PEPflow: PEP => ; compartment*PEP*flow;
  PYRflow: PYR => ; compartment*PYR*flow;  // isVersionOf GO:0042867
  ACAflow: ACA => ; compartment*ACA*flow;  // isVersionOf GO:0046187
  EtOHflow: EtOH => ; compartment*EtOH*flow;  // isVersionOf GO:0006068
  AMPflow: AMP => ; compartment*AMP*flow;  // isVersionOf GO:0006196
  Pflow: P => ; compartment*P*flow;
  reaction_1: GLC + ATP => F6P + ADP; compartment*(V1*ATP*GLC/((K1GLC + GLC)*(K1ATP + ATP)));  // isHomologTo reactome:REACT_1164; hasPart ec-code:2.7.1.2 ec-code:5.3.1.9; hasPart kegg.reaction:R00771 kegg.reaction:R00299
  reaction_2: F6P + ATP => FBP + ADP; compartment*(V2*ATP*F6P^2/((K2*(1 + k2*(ATP/AMP)^2) + F6P^2)*(K2ATP + ATP)));  // modifiers: AMP; isHomologTo reactome:REACT_1840; isVersionOf ec-code:2.7.1.11 kegg.reaction:R00756
  reaction_3: FBP -> 2 GAP; compartment*(k3f*FBP - k3b*GAP^2);  // isHomologTo reactome:REACT_1693; hasPart kegg.reaction:R01070 kegg.reaction:R01015; hasPart ec-code:5.3.1.1 ec-code:4.1.2.13
  reaction_4: GAP + NAD => DPG + NADH; compartment*(V4*NAD*GAP/((K4GAP + GAP)*(K4NAD + NAD)));  // isHomologTo reactome:REACT_587; isVersionOf ec-code:1.2.1.12 kegg.reaction:R01061
  reaction_5: DPG + ADP -> PEP + ATP; compartment*(k5f*DPG*ADP - k5b*PEP*ATP);  // hasPart ec-code:5.4.2.1 ec-code:2.7.2.3 ec-code:4.2.1.11; hasPart kegg.reaction:R00658 kegg.reaction:R01512 kegg.reaction:R01518; hasPart reactome:REACT_1771 reactome:REACT_1400
  reaction_6: PEP + ADP => PYR + ATP; compartment*(V6*ADP*PEP/((K6PEP + PEP)*(K6ADP + ADP)));  // hasVersion ec-code:2.7.1.40 kegg.reaction:R00200; isHomologTo reactome:REACT_1911
  reaction_7: PYR => ACA; compartment*(V7*PYR/(K7PYR + PYR));  // isVersionOf ec-code:4.1.1.1 kegg.reaction:R00224
  reaction_8: ACA + NADH -> EtOH + NAD; compartment*(k8f*NADH*ACA - k8b*NAD*EtOH);  // isVersionOf ec-code:1.1.1.71 kegg.reaction:R00754; isHomologTo reactome:REACT_799
  reaction_9: AMP + ATP -> 2 ADP; compartment*(k9f*AMP*ATP - k9b*ADP^2);  // isVersionOf ec-code:2.7.4.3 kegg.reaction:R00127
  reaction_10: F6P => P; compartment*k10*F6P;  // isVersionOf GO:0006001; isHomologTo reactome:REACT_1571

  // Unit definitions:
  unit substance = 1e-3 mole; substance is "millimole";
  unit time = 60 second; time is "minute";
end
