// SBML level 2 version 1
// This model was downloaded from BioModels Database
// http://www.ebi.ac.uk/biomodels-static/

model Goldbeter_Calcium_Oscillation_based_on_CICR_AND_CA_channel_inhibition()
  // Borghans1997 - Calcium Oscillation - Model 1
  // A theoretical expoloration of possible mechanisms of intracellular calcium oscillations has been studied, considering three hypothesis (see below). This model corresponds to the first hypothesis.
  // This model is described in the article:
  // Complex intracellular calcium oscillations. A theoretical exploration of possible mechanisms.
  // Borghans JM, Dupont G, Goldbeter A.
  // Biophys. Chem. 1997 May; 66(1): 25-41
  // Abstract:
  // Intracellular Ca(2+) oscillations are commonly observed in a large number of cell types in response to stimulation by an extracellular agonist. In most cell types the mechanism of regular spiking is well understood and models based on Ca(2+)-induced Ca(2+) release (CICR) can account for many experimental observations. However, cells do not always exhibit simple Ca(2+) oscillations. In response to given agonists, some cells show more complex behaviour in the form of bursting, i.e. trains of Ca(2+) spikes separated by silent phases. Here we develop several theoretical models, based on physiologically plausible assumptions, that could account for complex intracellular Ca(2+) oscillations. The models are all based on one- or two-pool models based on CICR. We extend these models by (i) considering the inhibition of the Ca(2+)-release channel on a unique intracellular store at high cytosolic Ca(2+) concentrations, (ii) taking into account the Ca(2+)-activated degradation of inositol 1,4,5-trisphosphate (IP(3)), or (iii) considering explicity the evolution of the Ca(2+) concentration in two different pools, one sensitive and the other one insensitive to IP(3). Besides simple periodic oscillations, these three models can all account for more complex oscillatory behaviour in the form of bursting. Moreover, the model that takes the kinetics of IP(3) into account shows chaotic behaviour.
  // This model is hosted on BioModels Database and identified by: MODEL6622689184 .
  // To cite BioModels Database, please use: BioModels Database: An enhanced, curated and annotated resource for published quantitative kinetic models .
  // To the extent possible under law, all copyright and related or neighbouring rights to this encoded model have been dedicated to the public domain worldwide. Please refer to CC0 Public Domain Dedication for more information.
  // biomodels.db:MODEL6622689184
  // biomodels.db:BIOMD0000000043
  // isDescribedBy pubmed:17029867
  // isVersionOf GO:0048016 GO:0019722
  // kegg.pathway:rno04020
  // hasTaxon taxonomy:10114

  // Compartments:
  compartment extracellular = 1;  // isVersionOf GO:0005615
  compartment cytosol in extracellular = 1;  // isVersionOf GO:0005829
  compartment intravesicular in cytosol = 1;  // isVersionOf GO:0005790

  // Species:
  species EC in extracellular = 0;  // CHEBI:29108 kegg.compound:C00076
  species Z in cytosol = 0;  // CHEBI:29108 kegg.compound:C00076
  species Rho in cytosol = 0;  // isVersionOf interpro:IPR016093 interpro:IPR000493
  species Y in intravesicular = 0.36;  // CHEBI:29108 kegg.compound:C00076
  species Fraction_Inactive_Channels in cytosol = 0;  // isVersionOf interpro:IPR000493 pirsf:PIRSF002433

  // Parameters:
  a = 40000;
  d = 100;
  beta = 1;

  // Reactions:
  vin: EC => Z; cytosol*(v0 + v1*beta);  // isVersionOf GO:0006816 GO:0007204
    v0 = 1; v1 = 1;
  v2: Z => Y; intravesicular*(Vm2*Z^2/(K2^2 + Z^2));  // isVersionOf GO:0051481
    Vm2 = 6.5; K2 = 0.1;
  v3: Y => Z; cytosol*(beta*(Rho*(a/d)*Z^4/(1 + a/d*Z^4))*Vm3*Y^2/(Ky^2 + Y^2));  // modifiers: Rho; isVersionOf GO:0007204
    Vm3 = 50; Ky = 0.2;
  v4: Y => Z; cytosol*Kf*Y;  // isVersionOf GO:0007204
    Kf = 1;
  v5: Z => EC; extracellular*K*Z;  // isVersionOf GO:0051481
    K = 10;
  v6: Rho => Fraction_Inactive_Channels; cytosol*Kd*Z^4*Rho;  // modifiers: Z; isVersionOf GO:0005220
    Kd = 5000;
  v7: Fraction_Inactive_Channels => Rho; cytosol*Kr*(1 - Rho);  // isVersionOf GO:0005220
    Kr = 5;

  // Unit definitions:
  unit substance = 1e-6 mole; substance is "micromole (default)";
  unit time = 60 second; time is "minute (default)";
end
