// SBML level 2 version 1
// This model was downloaded from BioModels Database
// http://www.ebi.ac.uk/biomodels-static/

model Goldbeter_Calcium_Oscillation_based_onCICR_AND_two_pool_model()
  // Borghans1997 - Calcium Oscillation - Model 3
  // A theoretical expoloration of possible mechanisms of intracellular calcium oscillations has been studied, considering three hypothesis. This model corresponds to the third hypothesis.
  // This model is described in the article:
  // Complex intracellular calcium oscillations. A theoretical exploration of possible mechanisms.
  // Borghans JM, Dupont G, Goldbeter A.
  // Biophys. Chem. 1997 May; 66(1): 25-41
  // Abstract:
  // Intracellular Ca(2+) oscillations are commonly observed in a large number of cell types in response to stimulation by an extracellular agonist. In most cell types the mechanism of regular spiking is well understood and models based on Ca(2+)-induced Ca(2+) release (CICR) can account for many experimental observations. However, cells do not always exhibit simple Ca(2+) oscillations. In response to given agonists, some cells show more complex behaviour in the form of bursting, i.e. trains of Ca(2+) spikes separated by silent phases. Here we develop several theoretical models, based on physiologically plausible assumptions, that could account for complex intracellular Ca(2+) oscillations. The models are all based on one- or two-pool models based on CICR. We extend these models by (i) considering the inhibition of the Ca(2+)-release channel on a unique intracellular store at high cytosolic Ca(2+) concentrations, (ii) taking into account the Ca(2+)-activated degradation of inositol 1,4,5-trisphosphate (IP(3)), or (iii) considering explicity the evolution of the Ca(2+) concentration in two different pools, one sensitive and the other one insensitive to IP(3). Besides simple periodic oscillations, these three models can all account for more complex oscillatory behaviour in the form of bursting. Moreover, the model that takes the kinetics of IP(3) into account shows chaotic behaviour.
  // This model is hosted on BioModels Database and identified by: MODEL6623009547 .
  // To cite BioModels Database, please use: BioModels Database: An enhanced, curated and annotated resource for published quantitative kinetic models .
  // To the extent possible under law, all copyright and related or neighbouring rights to this encoded model have been dedicated to the public domain worldwide. Please refer to CC0 Public Domain Dedication for more information.
  // biomodels.db:MODEL6623009547
  // biomodels.db:BIOMD0000000045
  // isDescribedBy pubmed:17029867
  // isVersionOf GO:0048016 GO:0019722
  // hasTaxon taxonomy:10114
  // kegg.pathway:rno04020

  // Compartments:
  compartment extracellular = 1;  // isVersionOf GO:0005615
  compartment cytosol in extracellular = 1;  // isVersionOf GO:0005829
  compartment intravesicular1 in cytosol = 1;  // isVersionOf GO:0005790
  compartment intravesicular2 in cytosol = 1;

  // Species:
  species EC in extracellular = 0;  // CHEBI:29108 kegg.compound:C00076
  species Z in cytosol = 0;  // CHEBI:29108 kegg.compound:C00076
  species Y in intravesicular2 = 0;  // CHEBI:29108 kegg.compound:C00076
  species X in intravesicular1 = 0.5;  // CHEBI:29108 kegg.compound:C00076

  // Parameters:
  beta = 1;

  // Reactions:
  vin: EC => Z; cytosol*(v0 + v1*beta);  // isVersionOf GO:0006816 GO:0007204
    v0 = 0.015; v1 = 0.012;
  v2i: Z => Y; intravesicular2*Vm2i*Z^2/(K2i^2 + Z^2);  // isVersionOf GO:0051481 GO:0006816
    Vm2i = 3.1; K2i = 0.005;
  v3i: Y => Z; cytosol*Vm3i*Y^2*Z^2/((K3y^2 + Y^2)*(K3z^2 + Z^2));  // isVersionOf GO:0005219 GO:0006816 GO:0007204
    Vm3i = 25; K3y = 0.065; K3z = 0.022;
  v4: Y => Z; cytosol*v4_Kf*Y;  // isVersionOf GO:0006816 GO:0007204
    v4_Kf = 0.5;
  v5: Z => EC; extracellular*K*Z;  // isVersionOf GO:0051481 GO:0006816
    K = 1;
  v6: X => Z; cytosol*v6_Kf*X;  // isVersionOf GO:0006816 GO:0007204
    v6_Kf = 0.5;
  v2s: Z => X; intravesicular1*Vm2s*Z^2/(K2s^2 + Z^2);  // isVersionOf GO:0006816 GO:0051481
    Vm2s = 1.5; K2s = 0.0265;
  v3s: X => Z; cytosol*beta*Vm3s*X^2/(K3s^2 + X^2);  // isVersionOf GO:0006816 GO:0051482
    Vm3s = 0.169; K3s = 0.1;

  // Unit definitions:
  unit substance = 1e-6 mole; substance is "micromole (default)";
  unit time = 60 second; time is "minute (default)";
end
