// SBML level 2 version 3
// This model was downloaded from BioModels Database
// http://www.ebi.ac.uk/biomodels-static/

model Ferreira_CML_generation()
  // Ferreira2003_CML_generation2
  // The model should reproduce the figure 2F of the article.
  // The equation 7 has been split into equations 7a-7c, in order to take into account the different flux rates of Lysine and CML formation from Schiff.
  // The model was tested in Jarnac (SBML L2 V1) and Copasi (SBML L2 V3).
  // To the extent possible under law, all copyright and related or neighbouring rights to this encoded model have been dedicated to the public domain worldwide. Please refer to CC0 Public Domain Dedication for more information.
  // In summary, you are entitled to use this encoded model in absolutely any manner you deem suitable, verbatim, or with modification, alone or embedded it in a larger context, redistribute it, commercially or not, in a restricted way or not.
  // To cite BioModels Database, please use: Li C, Donizelli M, Rodriguez N, Dharuri H, Endler L, Chelliah V, Li L, He E, Henry A, Stefan MI, Snoep JL, Hucka M, Le Novère N, Laibe C (2010) BioModels Database: An enhanced, curated and annotated resource for published quantitative kinetic models. BMC Syst Biol., 4:92.
  // biomodels.db:MODEL0733584307
  // biomodels.db:BIOMD0000000053
  // isDescribedBy pubmed:12911334
  // hasTaxon taxonomy:131567
  // hasPart GO:0018205 GO:0005518
  // hasProperty DOID:9120 DOID:9351

  // Compartments:
  compartment compartment = 1;

  // Species:
  species Glucose in compartment = 0.25;  // CHEBI:17234 kegg.compound:C00293
  species Lysine in compartment = 0.0034;  // CHEBI:25094
  species Schiff in compartment = 0;
  species Amadori in compartment = 0;
  species Glyoxal in compartment = 0;  // kegg.compound:C14448 CHEBI:34779
  species CML in compartment = 0;

  // Assignment rules:
  Fraction_Amadori := Amadori/0.0034;
  Fraction_CML := CML/0.0034;

  // Reactions:
  v1a: Lysine + Glucose => Schiff; compartment*p1*k1a*Glucose*Lysine;
    p1 = 0.115; k1a = 0.09;
  v1b: Schiff => Lysine + Glucose; compartment*k1b*Schiff;
    k1b = 0.36;
  v2a: Schiff => Amadori; compartment*v2a_p2*k2a*Schiff;
    v2a_p2 = 0.75; k2a = 0.033;
  v2b: Amadori => Schiff; compartment*v2b_p2*k2b*Amadori;
    v2b_p2 = 0.75; k2b = 0.0012;
  v3: Glucose => Glyoxal; compartment*v3_ox*p3*v3_k3*(Glucose/0.25)^0.36;
    v3_ox = 1; p3 = 1; v3_k3 = 7.92e-7;
  v4: Amadori => CML; compartment*v4_ox*p4*k4*Amadori;
    v4_ox = 1; p4 = 1; k4 = 8.6e-5;
  v5: Lysine + Glyoxal => CML; compartment*v5_ox*p5*k5*Glyoxal*Lysine;
    v5_ox = 1; p5 = 1; k5 = 0.019;
  v5b: Glyoxal => ; compartment*k5b*Glyoxal;
    k5b = 0.0017;
  v6: Schiff => CML; compartment*v6_ox*p6*v6_k3*(Schiff/0.25)^0.36;
    v6_ox = 1; p6 = 2.7; v6_k3 = 7.92e-7;
  v7a: => Lysine; compartment*0.05*v7a_ox*v7a_p7*v7a_k3*(Schiff/0.25)^0.36;  // modifiers: Schiff
    v7a_ox = 1; v7a_p7 = 60; v7a_k3 = 7.92e-7;
  v7b: => Glyoxal; compartment*0.005*v7b_ox*v7b_p7*v7b_k3*(Schiff/0.25)^0.36;  // modifiers: Schiff
    v7b_ox = 1; v7b_p7 = 60; v7b_k3 = 7.92e-7;
  v7c: Schiff => ; compartment*v7c_ox*v7c_p7*v7c_k3*(Schiff/0.25)^0.36;
    v7c_ox = 1; v7c_p7 = 60; v7c_k3 = 7.92e-7;

  // Unit definitions:
  unit time = 3600 second; time is "hour (default)";
end
