// SBML level 2 version 1
// This model was downloaded from BioModels Database
// http://www.ebi.ac.uk/biomodels-static/

model Ataullahkhanov1996_Adenylate()
  // The model reproduces ion and adenylate pool concentration corresponding to line 2 of Fig 3 of the publication. This model was tested successfully on Jarnac
  // To the extent possible under law, all copyright and related or neighbouring rights to this encoded model have been dedicated to the public domain worldwide. Please refer to CC0 Public Domain Dedication for more information.
  // In summary, you are entitled to use this encoded model in absolutely any manner you deem suitable, verbatim, or with modification, alone or embedded it in a larger context, redistribute it, commercially or not, in a restricted way or not.
  // To cite BioModels Database, please use: Li C, Donizelli M, Rodriguez N, Dharuri H, Endler L, Chelliah V, Li L, He E, Henry A, Stefan MI, Snoep JL, Hucka M, Le Novère N, Laibe C (2010) BioModels Database: An enhanced, curated and annotated resource for published quantitative kinetic models. BMC Syst Biol., 4:92.
  // biomodels.db:MODEL4770526315
  // biomodels.db:BIOMD0000000054
  // isDescribedBy pubmed:8733433
  // hasTaxon taxonomy:9606
  // hasPart GO:0002028 GO:0006167 GO:0006110

  // Compartments:
  compartment cell = 1; cell is "Erythrocyte";  // GO:0005623

  // Species:
  species I in cell = 10; I is "Ions";  // CHEBI:29101 kegg.compound:C01330
  species E in cell = 2.1; E is "Energy pool";  // hasVersion CHEBI:15422 CHEBI:16761; hasVersion kegg.compound:C00008 kegg.compound:C00002
  species A in cell = 1.11; A is "Adenylate pool";  // hasVersion kegg.compound:C00020 kegg.compound:C00008 kegg.compound:C00002; hasVersion CHEBI:16027 CHEBI:16761 CHEBI:15422

  // Parameters:
  var T; T is "ATP";
  var M; M is "AMP";
  P = 0.121; P is "Membrane permeability";
  J = 100; J is "Extracellular ion concentration";
  W2 = 0.2; W2 is "Ion pump activity";
  W3 = 13.48; W3 is "Glycolytic activity";
  U = 0.02; U is "de novo AMP synthesis";
  W = 0.01; W is "AMP degradation";
  n = 1.2; n is "Dependence of AMP degradation on ATP";
  k = -1; k is "Dependence of AMP degradation on AMP";

  // Assignment rules:
  T := (A + 3*E - (6*A*E - 3*E^2 + A^2)^0.5)/6;
  M := (7*A - 3*E - (6*A*E - 3*E^2 + A^2)^0.5)/6;

  // Reactions:
  U1: => I; cell*P*J; U1 is "Passive ion influx";  // isVersionOf GO:0006814
  U2: 3 I + E => ; cell*W2*I*T; U2 is "ATP consumption by ion pump";  // hasPart GO:0042623 GO:0006814
  U3: => E; cell*W3*T^0.52*M^0.41; U3 is "ATP from glycolysis";  // isVersionOf GO:0006754
  U6_plus_3U7: E => ; cell*2*U; U6_plus_3U7 is "AMP synthesis de novo";  // hasPart GO:0003999 GO:0004001; hasPart ec-code:2.7.1.20 ec-code:2.4.2.7
  U6_plus_U7_minus_U8: => A; cell*U*(1 - W*T^n*M^k); U6_plus_U7_minus_U8 is "Adenylate pool";  // hasPart ec-code:2.4.2.7 ec-code:3.5.4.6 ec-code:2.7.1.20; hasPart GO:0003876 GO:0004001 GO:0003999

  // Unit definitions:
  unit substance = 1e-3 mole; substance is "millimole (default)";
  unit time = 3600 second; time is "hour (default)";
end
