// SBML level 2 version 1
// This model was downloaded from BioModels Database
// http://www.ebi.ac.uk/biomodels-static/

model Bindschadler_Ca_Oscillator()
  // Bindschadler2001_coupled_Ca_oscillators
  // The model reproduces the same amplitude antiphase calcium oscillations of coupled cells depicted in Figure 5B of the publication. This model was successfully tested on Jarnac and MathSBML. The values of "h1" and "h2" are not given in the publication, but the antiphase oscillations are reproduced over a narrow range of values of h1, h2,c1,c2,D and p. The values of D and p are given, while the other values were plugged in, in order to simulate the time profiles shown in the Figure. The time t=0 in the figure may have been fixed after the system was allowed to settle, and hence does not correspond to the t=0 of the simulation.
  // To the extent possible under law, all copyright and related or neighbouring rights to this encoded model have been dedicated to the public domain worldwide. Please refer to CC0 Public Domain Dedication for more information.
  // In summary, you are entitled to use this encoded model in absolutely any manner you deem suitable, verbatim, or with modification, alone or embedded it in a larger context, redistribute it, commercially or not, in a restricted way or not.
  // To cite BioModels Database, please use: Li C, Donizelli M, Rodriguez N, Dharuri H, Endler L, Chelliah V, Li L, He E, Henry A, Stefan MI, Snoep JL, Hucka M, Le Novère N, Laibe C (2010) BioModels Database: An enhanced, curated and annotated resource for published quantitative kinetic models. BMC Syst Biol., 4:92.
  // biomodels.db:MODEL9107330008
  // biomodels.db:BIOMD0000000058
  // isDescribedBy pubmed:12779457
  // isDerivedFrom biomodels.db:MODEL9200487367
  // occursIn BTO:0000028
  // kegg.pathway:map04020

  // Compartments:
  compartment compartment = 1;  // GO:0005829

  // Species:
  species Calcium_ion_Cell1 in compartment = 0.3;  // CHEBI:29108 kegg.compound:C00076
  species h1 in compartment = 0.8; h1 is "Receptor fraction Cell1";  // isVersionOf interpro:IPR000493
  species Calcium_ion_Cell2 in compartment = 0.1;  // CHEBI:29108 kegg.compound:C00076
  species h2 in compartment = 0.1; h2 is "Receptor fraction Cell2";  // isVersionOf interpro:IPR000493

  // Parameters:
  r2 = 100;
  R1 = 6;
  k1 = 44;
  R3 = 50;
  k2 = 26.5;
  r4 = 20;
  k3 = 1.6;
  R5 = 1.6;

  // Assignment rules:
  Phi1_c1 := r2*Calcium_ion_Cell1/(R1 + Calcium_ion_Cell1);
  Phi_minus1_c1 := k1/(R3 + Calcium_ion_Cell1);
  Phi2_c1 := (k2 + r4*Calcium_ion_Cell1)/(R3 + Calcium_ion_Cell1);
  Phi3_c1 := k3/(R5 + Calcium_ion_Cell1);
  Phi1_c2 := r2*Calcium_ion_Cell2/(R1 + Calcium_ion_Cell2);
  Phi_minus1_c2 := k1/(R3 + Calcium_ion_Cell2);
  Phi2_c2 := (k2 + r4*Calcium_ion_Cell2)/(R3 + Calcium_ion_Cell2);
  Phi3_c2 := k3/(R5 + Calcium_ion_Cell2);

  // Reactions:
  Jreceptor_Cell1: => Calcium_ion_Cell1; compartment*Jreceptor_Cell1_kf*(Jreceptor_Cell1_p*h1*Phi1_c1/(Phi1_c1*Jreceptor_Cell1_p + Phi_minus1_c1))^4; Jreceptor_Cell1 is "IP3R mediated Ca release Cell1";  // modifiers: h1; GO:0005220; isVersionOf GO:0007204
    Jreceptor_Cell1_kf = 28; Jreceptor_Cell1_p = 0.2778;
  Jpump_Cell1: Calcium_ion_Cell1 => ; compartment*(Jpump_Cell1_Vp*Calcium_ion_Cell1^2/(Jpump_Cell1_Kp^2 + Calcium_ion_Cell1^2)); Jpump_Cell1 is "ATPase pump mediated Ca efflux Cell1";  // GO:0005388
    Jpump_Cell1_Vp = 1.2; Jpump_Cell1_Kp = 0.18;
  Jleak_Cell1: => Calcium_ion_Cell1; compartment*Jleak_Cell1_Jleak; Jleak_Cell1 is "IP3R independent Ca release Cell1";  // isVersionOf GO:0007204; isVersionOf GO:0051209
    Jleak_Cell1_Jleak = 0.2;
  Inactivated_to_S_Cell1: => h1; compartment*Phi3_c1*(1 - h1); Inactivated_to_S_Cell1 is "Inactivated to Shut state transition Cell1";  // isVersionOf GO:0031586
  Open_to_Inactivated_Cell1: h1 => ; compartment*Phi1_c1*Phi2_c1*h1*Open_to_Inactivated_Cell1_p/(Phi1_c1*Open_to_Inactivated_Cell1_p + Phi_minus1_c1); Open_to_Inactivated_Cell1 is "Open to Inactivated state transition Cell1";  // isVersionOf GO:0031586
    Open_to_Inactivated_Cell1_p = 0.2778;
  Jreceptor_Cell2: => Calcium_ion_Cell2; compartment*Jreceptor_Cell2_kf*(Jreceptor_Cell2_p*h2*Phi1_c2/(Phi1_c2*Jreceptor_Cell2_p + Phi_minus1_c2))^4; Jreceptor_Cell2 is "IP3R mediated Ca release Cell2";  // modifiers: h2; GO:0005220; isVersionOf GO:0007204
    Jreceptor_Cell2_kf = 28; Jreceptor_Cell2_p = 0.2778;
  Jpump_Cell2: Calcium_ion_Cell2 => ; compartment*Jpump_Cell2_Vp*Calcium_ion_Cell2^2/(Jpump_Cell2_Kp^2 + Calcium_ion_Cell2^2); Jpump_Cell2 is "ATPase pump mediated Ca efflux Cell2";  // GO:0005388
    Jpump_Cell2_Vp = 1.2; Jpump_Cell2_Kp = 0.18;
  Jleak_Cell2: => Calcium_ion_Cell2; compartment*Jleak_Cell2_Jleak; Jleak_Cell2 is "IP3R independent Ca release Cell2";  // isVersionOf GO:0007204; isVersionOf GO:0051209
    Jleak_Cell2_Jleak = 0.2;
  Inactivated_to_S_Cell2: => h2; compartment*Phi3_c2*(1 - h2); Inactivated_to_S_Cell2 is "Inactivated to Shut state transition Cell2";  // isVersionOf GO:0031586
  Open_to_Inactivated_Cell2: h2 => ; compartment*Phi1_c2*Phi2_c2*h2*Open_to_Inactivated_Cell2_p/(Phi1_c2*Open_to_Inactivated_Cell2_p + Phi_minus1_c2); Open_to_Inactivated_Cell2 is "Open to Inactivated state transition Cell2";  // isVersionOf GO:0031586
    Open_to_Inactivated_Cell2_p = 0.2778;
  diffusion: Calcium_ion_Cell2 => Calcium_ion_Cell1; compartment*D*(Calcium_ion_Cell2 - Calcium_ion_Cell1); diffusion is "Diffusion of Ca between cells";  // isVersionOf GO:0015085
    D = 0.01;

  // Unit definitions:
  unit substance = 1e-6 mole; substance is "micromole";
end
