// SBML level 2 version 1
// This model was downloaded from BioModels Database
// http://www.ebi.ac.uk/biomodels-static/

model Model_1()
  // Yi2003_GproteinCycle
  // The paper describes both wild-type and mutant cells of G protein cycle by using different values of G protein deactivation. We chosed the wild-type, k=0.11 s-1.
  // The unit of the concentration for the proteins are numbers of molecules per cell.
  // Figure5(A) was reproduced with COPASI 4.0 (Build 18) and SBML_odeSolver. Figure5(B) was reproduced with COPASI 4.0 (Build 18).
  // To the extent possible under law, all copyright and related or neighbouring rights to this encoded model have been dedicated to the public domain worldwide. Please refer to CC0 Public Domain Dedication for more information.
  // In summary, you are entitled to use this encoded model in absolutely any manner you deem suitable, verbatim, or with modification, alone or embedded it in a larger context, redistribute it, commercially or not, in a restricted way or not.
  // To cite BioModels Database, please use: Li C, Donizelli M, Rodriguez N, Dharuri H, Endler L, Chelliah V, Li L, He E, Henry A, Stefan MI, Snoep JL, Hucka M, Le Novère N, Laibe C (2010) BioModels Database: An enhanced, curated and annotated resource for published quantitative kinetic models. BMC Syst Biol., 4:92.
  // biomodels.db:MODEL9468910329
  // biomodels.db:BIOMD0000000072
  // isDescribedBy pubmed:12960402
  // isVersionOf GO:0031684
  // hasTaxon taxonomy:4932

  // Compartments:
  compartment cell = 1;  // isVersionOf GO:0005623

  // Species:
  species L in cell = 6.02e17; L is "Ligand";  // hasVersion uniprot:P34165 uniprot:P34166; isVersionOf interpro:IPR006742
  species R in cell = 10000; R is "Receptor";  // uniprot:P06842
  species G in cell = 7000; G is "Inactive heterotrimeric G-protein";  // isVersionOf GO:0005834
  species Gbg in cell = 3000; Gbg is "Free levels of G-beta-gamma";  // GO:0031680
  species Gd in cell = 3000; Gd is "G-alpha-GDP";  // hasPart interpro:IPR001019 kegg.compound:C00035; hasPart CHEBI:17552 interpro:IPR001019
  species Ga in cell = 0; Ga is "G-alpha-GTP";  // hasPart interpro:IPR001019 kegg.compound:C00044; hasPart CHEBI:15996 interpro:IPR001019
  species RL in cell = 0; RL is "Receptor-Ligand";  // isVersionOf GO:0043235; hasPart uniprot:P34165 uniprot:P06842; hasPart uniprot:P34166 uniprot:P06842

  // Reactions:
  Ligand_Receptor_Association: L + R -> RL; cell*(Ligand_Receptor_Association_k1*L*R - k2*RL); Ligand_Receptor_Association is "Ligand-Receptor Association";  // isVersionOf GO:0004934 GO:0001664 GO:0005102
    Ligand_Receptor_Association_k1 = 3.32e-18; k2 = 0.01;
  Receptor_Synthesis: => R; cell*v;  // isVersionOf GO:0006412
    v = 4;
  Receptor_Degradation: R => ; cell*Receptor_Degradation_k1*R;  // isVersionOf GO:0030163
    Receptor_Degradation_k1 = 0.0004;
  reaction_3: Gd + Gbg => G; cell*reaction_3_k1*Gd*Gbg; reaction_3 is "Heterotrimeric G-Protein Formation";  // isVersionOf GO:0001965 GO:0031683
    reaction_3_k1 = 1;
  G_protein_Activation: G => Ga + Gbg; cell*G_protein_Activation_k1*RL*G; G_protein_Activation is "G-protein Activation";  // modifiers: RL; isVersionOf GO:0004930 GO:0043241
    G_protein_Activation_k1 = 1e-5;
  Receptor_Ligand_Degradation: RL => ; cell*Receptor_Ligand_Degradation_k1*RL; Receptor_Ligand_Degradation is "Receptor-Ligand Degradation";  // isVersionOf GO:0030163
    Receptor_Ligand_Degradation_k1 = 0.004;
  G_protein_Inactivation: Ga => Gd; cell*G_protein_Inactivation_k1*Ga; G_protein_Inactivation is "G-protein Inactivation";  // isVersionOf GO:0003924
    G_protein_Inactivation_k1 = 0.11;

  // Unit definitions:
  unit substance = item;
end
