// SBML level 2 version 1
// This model was downloaded from BioModels Database
// http://www.ebi.ac.uk/biomodels-static/

model Fuentes2005_ZymogenActivation()
  // .
  // .
  // .
  // SBML level 2 code generated for the JWS Online project by Jacky Snoep using PySCeS
  // Run this model online at http://jjj.biochem.sun.ac.za
  // To cite JWS Online please refer to: Olivier, B.G. and Snoep, J.L. (2004) Web-based modelling using JWS Online , Bioinformatics, 20:2143-2144
  // .
  // .
  // .
  // .
  // .
  // .
  // The model reproduces Fig 1A of the paper. The model was successfully tested on MathSBML.
  // This model originates from BioModels Database: A Database of Annotated Published Models. It is copyright (c) 2005-2006 The BioModels Team.
  // For more information see the terms of use .
  // biomodels.db:MODEL6623597435
  // biomodels.db:BIOMD0000000092
  // isDescribedBy pubmed:15634334
  // isDerivedFrom pubmed:7558
  // GO:0031638
  // hasTaxon taxonomy:131567

  // Compartments:
  compartment compartment = 1;  // GO:0005623

  // Species:
  species z in compartment = 2.4e-5; z is "Zymogen";  // isPartOf GO:0042588
  species e in compartment = 0; e is "Enzyme";
  species w in compartment = 0; w is "Peptide";
  species ez in compartment = 0; ez is "Enzyme-Substrate complex";  // isVersionOf GO:0043234

  // Reactions:
  Intramolecular_autoactivation: z -> w + e; compartment*k1*z;  // isVersionOf GO:0043085
    k1 = 0.004 sec_inv;
  v2: z + e -> ez; compartment*(k21*e*z - k22*ez); v2 is "Intermolecular autoactivation-Complex formation";  // isVersionOf GO:0019899
    k21 = 1000 M_inv_sec_inv; k22 = 0.00021 sec_inv;
  v3: ez -> w + 2 e; compartment*k3*ez; v3 is "Intermolecular autoactivation-Enzyme release";  // isVersionOf GO:0043085
    k3 = 0.00054 sec_inv;

  // Unit definitions:
  unit M_inv_sec_inv = litre / (mole * second);
  unit sec_inv = 1 / second;
end
