// SBML level 2 version 1
// This model was downloaded from BioModels Database
// http://www.ebi.ac.uk/biomodels-static/

model Vilar2006_TGFbeta()
  // The model reproduces Fig 5A of the paper. The ligand concentration is increased from 3E-5 to 0.01 at time t=2500 to ensure that the system reaches steady state. Hence, the time t=0 of the paper corresponds to t=2500 in the model. The peak value of the active ligand receptor complex is off by a value of 1.25, the authors have stated that this discrepancy is due to the fact that the figure in the paper corresponds to a slightly different parameter set. The model was successfully tested on MathSBML.
  // To the extent possible under law, all copyright and related or neighbouring rights to this encoded model have been dedicated to the public domain worldwide. Please refer to CC0 Public Domain Dedication for more information.
  // In summary, you are entitled to use this encoded model in absolutely any manner you deem suitable, verbatim, or with modification, alone or embedded it in a larger context, redistribute it, commercially or not, in a restricted way or not.
  // To cite BioModels Database, please use: Li C, Donizelli M, Rodriguez N, Dharuri H, Endler L, Chelliah V, Li L, He E, Henry A, Stefan MI, Snoep JL, Hucka M, Le Novère N, Laibe C (2010) BioModels Database: An enhanced, curated and annotated resource for published quantitative kinetic models. BMC Syst Biol., 4:92.
  // biomodels.db:MODEL4023382414
  // biomodels.db:BIOMD0000000101
  // isDescribedBy pubmed:16446785
  // hasTaxon taxonomy:131567
  // hasPart reactome:REACT_6844.3
  // isVersionOf GO:0007179

  // Compartments:
  compartment PM = 1; PM is "Plasma membrane";  // GO:0005886
  compartment Endosome in PM = 1;  // GO:0005768

  // Species:
  substanceOnly species RI in PM = 20; RI is "Receptor 1";  // isVersionOf uniprot:P36897
  substanceOnly species RII in PM = 20; RII is "Receptor 2";  // isVersionOf uniprot:P37173
  substanceOnly species lRIRII in PM = 0; lRIRII is "ligand receptor complex-plasma membrane";  // hasPart uniprot:P01137 uniprot:P36897 uniprot:P37173
  substanceOnly species lRIRII_endo in Endosome = 40; lRIRII_endo is "ligand receptor complex-endosome";  // hasPart uniprot:P01137 uniprot:P36897 uniprot:P37173
  substanceOnly species RI_endo in Endosome = 0; RI_endo is "Receptor 1-endosome";  // isVersionOf uniprot:P36897
  substanceOnly species RII_endo in Endosome = 0; RII_endo is "Receptor 2 endosome";  // isVersionOf uniprot:P37173

  // Parameters:
  ka = 1;
  ligand = 3e-5;
  kcd = 0.0277777778;
  klid = 0.25;
  ki = 0.3333333;
  pRI = 8;
  kr = 0.03333333;
  alpha = 1;
  pRII = 4;

  // Reactions:
  v1: RII + RI => lRIRII; ka*ligand*RI*RII; v1 is "Ligand receptor complex formation";  // GO:0050431 GO:0007181
  v2: lRIRII => ; kcd*lRIRII; v2 is "Ligand receptor complex constitutive degradation";  // isVersionOf GO:0030512
  v3: lRIRII => ; klid*lRIRII; v3 is "Ligand independent complex degradation";  // isVersionOf GO:0030512
  v4: lRIRII => lRIRII_endo; ki*lRIRII; v4 is "Ligand receptor complex internalization";  // isVersionOf GO:0030511
  RI_synthesis: => RI; pRI;  // isVersionOf GO:0006412
  RI_constitutive_degradation: RI => ; kcd*RI;  // isVersionOf GO:0032801
  RI_internalization: RI => RI_endo; ki*RI;  // isVersionOf GO:0031623
  RI_recycling: RI_endo => RI; kr*RI_endo;  // isVersionOf GO:0001881
  v9: lRIRII_endo => RI + RII; kr*lRIRII_endo; v9 is "Ligand Receptor complex recycling";  // isVersionOf GO:0001881
  RII_synthesis: => RII; pRII;  // isVersionOf GO:0006412
  RII_constitutive_degradation: RII => ; kcd*RII;  // isVersionOf GO:0032801
  RII_internalization: RII => RII_endo; ki*RII;  // isVersionOf GO:0031623
  RII_recycling: RII_endo => RII; kr*RII_endo;  // isVersionOf GO:0001881

  // Events:
  event_0000001: at (time >= 2500): ligand = 0.01;

  // Unit definitions:
  unit substance = item;
  unit time = 3600 second; time is "minutes";
  unit min_inv = 1 / (3600 second);
end
