// SBML level 2 version 1
// This model was downloaded from BioModels Database
// http://www.ebi.ac.uk/biomodels-static/

model Dupont1992_Ca_dpt_protein_phospho()
  // Model reproduces Fig 4 of the paper. For fraction of phosphorylated protein, W_star, the model reproduces panel b in the same figure. Model successfully tested on MathSBML and Jarnac.
  // To the extent possible under law, all copyright and related or neighbouring rights to this encoded model have been dedicated to the public domain worldwide. Please refer to CC0 Public Domain Dedication for more information.
  // In summary, you are entitled to use this encoded model in absolutely any manner you deem suitable, verbatim, or with modification, alone or embedded it in a larger context, redistribute it, commercially or not, in a restricted way or not.
  // To cite BioModels Database, please use: Li C, Donizelli M, Rodriguez N, Dharuri H, Endler L, Chelliah V, Li L, He E, Henry A, Stefan MI, Snoep JL, Hucka M, Le Novère N, Laibe C (2010) BioModels Database: An enhanced, curated and annotated resource for published quantitative kinetic models. BMC Syst Biol., 4:92.
  // biomodels.db:MODEL7007141507
  // biomodels.db:BIOMD0000000113
  // isDescribedBy pubmed:1316185
  // hasTaxon taxonomy:131567
  // GO:0019722 GO:0048016

  // Compartments:
  compartment cytosol = 1;  // GO:0005829
  compartment store in cytosol = 1;  // GO:0005783

  // Species:
  species Z in cytosol = 0.15;  // CHEBI:29108 kegg.compound:C00076
  species Y in store = 1.6;  // CHEBI:29108 kegg.compound:C00076
  species Wt in cytosol = 1; Wt is "Total Protein";
  species W_star in cytosol; W_star is "Phosphorylated protein";

  // Parameters:
  v0 = 1;
  Vm2 = 65;
  n = 2;
  Kp = 1;
  Vm3 = 500;
  m = 2;
  Kr = 2;
  K_A = 0.9;
  kf = 1;
  k = 10;
  p = 4;
  vMK = 20;
  vp = 2.5;
  Ka = 2.5;
  q = 1;
  K1 = 0.01;
  K2 = 0.01;
  v1_beta = 2.7;

  // Assignment rules:
  vk := vMK*Z^q/(Ka^q + Z^q);

  // Reactions:
  Calcium_influx: => Z; cytosol*v0;  // GO:0006816
  InsP3_dependent_Ca_influx: => Z; cytosol*v1_beta;  // GO:0005220
  R2: Z => Y; cytosol*(Vm2*Z^n/(Kp^n + Z^n)); R2 is "ATP driven pumping of Ca into store";  // GO:0032470
  ATP_driven_pumping_into_cytosol: Y => Z; store*(Vm3*Y^m*Z^p/((Kr^m + Y^m)*(K_A^p + Z^p)));  // GO:0048763 GO:0007204
  Rf: Y => Z; store*kf*Y; Rf is "Calcium leak";  // GO:0006816
  R_eff: Z => ; cytosol*k*Z; R_eff is "Ca efflux";  // GO:0006816
  Protein_Phosphorylation: -> W_star; cytosol*(vp/Wt)*(vk/vp*((1 - W_star)/(K1 + 1 - W_star)) - W_star/(K2 + W_star));  // modifiers: Wt; GO:0042327

  // Unit definitions:
  unit substance = 1e-6 mole; substance is "micromole";
  unit time = 60 second; time is "minutes";
end
