// SBML level 2 version 1
// This model was downloaded from BioModels Database
// http://www.ebi.ac.uk/biomodels-static/

model Model_0()
  // McClean2007_CrossTalk
  // This model encoded according to the paper Cross-talk and decision making in MAP kinase pathways. Supplementary Figure 2 has been reproduced by COPASI4.0.20 (development) using parameter scan method. You probably need to uncheck "always use initial conditions" in copasi when you simulate for the second run in order to get the figure. S1 scale from 0 to 12. Keep in mind that the y axis is the fractions of excited X3 and Y3, meaning that X3P and Y3P are normalized by total concentration X3T and Y3T.
  // The results from modeling the pathway in Supplementary Figure1a, including both activation and inhibition. According to the paper, the value of ka and kd should in the orange region (ka belongs [0,1], kd belongs [1,10]) so assigned ka=0, kd=1.
  // The author made the simplifying assumption that the interactions between the pathways are symmetric. Thus the k12xy=k12yx=ka, k33xy=k33yx=kd.
  // To the extent possible under law, all copyright and related or neighbouring rights to this encoded model have been dedicated to the public domain worldwide. Please refer to CC0 Public Domain Dedication for more information.
  // In summary, you are entitled to use this encoded model in absolutely any manner you deem suitable, verbatim, or with modification, alone or embedded it in a larger context, redistribute it, commercially or not, in a restricted way or not.
  // To cite BioModels Database, please use: Li C, Donizelli M, Rodriguez N, Dharuri H, Endler L, Chelliah V, Li L, He E, Henry A, Stefan MI, Snoep JL, Hucka M, Le Novère N, Laibe C (2010) BioModels Database: An enhanced, curated and annotated resource for published quantitative kinetic models. BMC Syst Biol., 4:92.
  // biomodels.db:MODEL7321452458
  // biomodels.db:BIOMD0000000116
  // isDescribedBy pubmed:17259986
  // hasTaxon taxonomy:4932
  // isVersionOf GO:0000161 GO:0019236

  // Compartments:
  compartment cell = 1;  // isVersionOf GO:0005623

  // Species:
  // The initial value for each species taken from the original submitted model, they are the concentration of the species when arrived to the steady states.
  species X1p in cell = 1.023667;  // uniprot:P23561
  species X2p in cell = 2.154231;  // uniprot:P06784
  species X3p in cell = 6.271793;  // uniprot:P16892
  species Y1p in cell = 3.203692;  // uniprot:P23561
  species Y2p in cell = 8.232192;  // uniprot:P08018
  species Y3p in cell = 9.312021;  // uniprot:P32485

  // Parameters:
  X1T = 10;
  X2T = 10;
  X3T = 10;
  Y1T = 10;
  Y2T = 10;
  Y3T = 10;
  kx = 1;
  // Use parameter scan value from 0 to 12.
  S1 = 8.5;
  Kmx = 1;
  k12x = 1;
  k23x = 1;
  kd = 1;
  ka = 0;
  Kmyx = 1;
  S2 = 5;
  ky = 1;
  Kmy = 1;
  k12y = 1;
  k23y = 1;
  Kmxy = 1;

  // Reactions:
  X1_activats_X2: X1p => X2p; cell*k12x*X1p*(X2T - X2p);  // isVersionOf ec-code:2.7.11.1 GO:0004709 GO:0000186
  S1_activates_X1: => X1p; cell*kx*S1/(1 + S1/Kmx)*(X1T - X1p);  // isVersionOf GO:0005186 GO:0000185
  X2_activates_X3: X2p => X3p; cell*k23x*X2p*(X3T - X3p);  // isVersionOf ec-code:2.7.12.2 GO:0004708 GO:0000187
  S2_activates_Y1: => Y1p; cell*ky*S2/(1 + S2/Kmy)*(Y1T - Y1p);  // isVersionOf GO:0043575 GO:0000167
  Y1p_activates_Y2p: Y1p => Y2p; cell*k12y*Y1p*(Y2T - Y2p);  // isVersionOf ec-code:2.7.11.1 GO:0004709 GO:0000186
  Y2p_activates_Y3p: Y2p => Y3p; cell*k23y*Y2p*(Y3T - Y3p);  // isVersionOf ec-code:2.7.12.2 GO:0005078 GO:0004708 GO:0000187
  X1p_activates_Y2p: X1p => Y2p; cell*ka*X1p*(Y2T - Y2p);  // isVersionOf ec-code:2.7.11.1 GO:0004709 GO:0000186
  Y1p_activates_X2p: Y1p => X2p; cell*ka*Y1p*(X2T - X2p);  // isVersionOf ec-code:2.7.11.1 GO:0000186 GO:0004709
  X3p_inhibited_by_Y3p: X3p => ; cell*kd*Y3p*X3p/(1 + X3p/Kmyx);  // modifiers: Y3p; isVersionOf GO:0000188
  Y3p_inhibited_by_X3p: Y3p => ; cell*kd*Y3p*X3p/(1 + Y3p/Kmxy);  // modifiers: X3p; isVersionOf GO:0000188
end
