// SBML level 2 version 1
// This model was downloaded from BioModels Database
// http://www.ebi.ac.uk/biomodels-static/

model model_0000001()
  // Clancy2001_Kchannel
  // This model is according to the paper Cellular consequences of HEGR mutations in the long QT syndrome: precursors to sudden cardiac death. The author used Markovian model of cardiac Ikr in the paper. Figure4B in the paper has been reproduced using CellDesigner3.5.1. The cell is depolarized to the indicated test potential for 250ms (from 50ms to 300ms) from a holding potential of -40mV and then repolarized to -40mV. Change the value for vtest from -30,-20,-10,0,10,20,30,40 for each simulation in order to produce the different cureve in the paper.
  // To the extent possible under law, all copyright and related or neighbouring rights to this encoded model have been dedicated to the public domain worldwide. Please refer to CC0 Public Domain Dedication for more information.
  // In summary, you are entitled to use this encoded model in absolutely any manner you deem suitable, verbatim, or with modification, alone or embedded it in a larger context, redistribute it, commercially or not, in a restricted way or not.
  // To cite BioModels Database, please use: Li C, Donizelli M, Rodriguez N, Dharuri H, Endler L, Chelliah V, Li L, He E, Henry A, Stefan MI, Snoep JL, Hucka M, Le Novère N, Laibe C (2010) BioModels Database: An enhanced, curated and annotated resource for published quantitative kinetic models. BMC Syst Biol., 4:92.
  // biomodels.db:MODEL2898180293
  // biomodels.db:BIOMD0000000121
  // isDescribedBy pubmed:11334834
  // isDerivedFrom pubmed:7514509 pubmed:7788872 pubmed:10318671 pubmed:10448858
  // isHomologTo omim:152427
  // hasTaxon taxonomy:10141

  // Compartments:
  compartment cell = 1;  // isVersionOf GO:0005623

  // Species:
  species ClosedState_3 in cell = 1;  // isVersionOf interpro:IPR003967 GO:0008076
  species ClosedState_2 in cell = 0;  // isVersionOf interpro:IPR003967 GO:0008076
  species ClosedState_1 in cell = 0;  // isVersionOf interpro:IPR003967 GO:0008076
  species o in cell = 0.06; o is "OpenState";  // isVersionOf interpro:IPR003967 GO:0008076
  species i in cell = 0; i is "InactivationState";  // isVersionOf interpro:IPR003967 GO:0008076
  species ik in cell; ik is "cardiac delayed rectifier current";

  // Parameters:
  R = 8.314; R is "gas constant";
  F = 96.485; F is "Faraday constant";
  Temp = 310; Temp is "temperature";
  ko = 5.4; ko is "extracellular K";
  ki = 140; ki is "introcellular K";
  vhold = -40; vhold is "holding_potential";
  vtest = 0; vtest is "test_potential";
  var vk; vk is "reversal potential for k";
  var Gk; Gk is "membrane_conductance";
  ain = 2.172;
  bin = 1.077;
  // when (t gt 0) and ( t lt 50), v=vhold=-40
  v = -40; v is "membrane_potential";

  // Assignment rules:
  vk := R*Temp/F*ln(ko/ki);
  Gk := 1.35e-2*ko^0.59;
  a := 5.55e-2*exp(0.05547153*(v - 12));
  b := 2.357e-3*exp(-0.036588*v);
  aa := 6.55e-2*exp(0.05547153*(v - 36));
  bb := 2.9357e-3*exp(-0.02158*v);
  ai := 0.439*exp(-0.02352*(v + 25))*4.5/ko;
  bi := 0.656*exp(0.000942*v)*(4.5/ko)^0.3;
  u := ai*bb*aa/(aa*bi);
  ik := Gk*o*(v - vk);

  // Reactions:
  c3_c2_transition: ClosedState_3 -> ClosedState_2; (a*ClosedState_3 - b*ClosedState_2)*cell; c3_c2_transition is "c3-c2 transition";  // isVersionOf GO:0015459 GO:0043266
  c2_c1_transition: ClosedState_2 -> ClosedState_1; (ain*ClosedState_2 - bin*ClosedState_1)*cell; c2_c1_transition is "c2-c1 transition";  // isVersionOf GO:0015459 GO:0043266
  c1_o_transition: ClosedState_1 -> o; (ClosedState_1*aa - bb*o)*cell; c1_o_transition is "c1-o transition";  // isVersionOf GO:0015459 GO:0043266
  o_i_transition: o -> i; (o*bi - ai*i)*cell; o_i_transition is "o-i transition";  // isVersionOf GO:0015459 GO:0043266
  c1_i_transition: ClosedState_1 -> i; (aa*ClosedState_1 - u*i)*cell; c1_i_transition is "c1-i transition";  // isVersionOf GO:0043266 GO:0015459

  // Events:
  // when ( t gt 50 ) and ( t lt 300 ), v=vtest
  event_0000001: at ((time > 50) && (time <= 300)): v = vtest;  // isVersionOf GO:0050981
  // when t > 300, v=vhold.
  event_0000002: at (time > 300): v = vhold;

  // Unit definitions:
  unit time = 1e-3 second; time is "ms";
  unit mV = 1e-3 volt;
  unit substance = 1e-3 mole; substance is "mM";
end
