// SBML level 2 version 1
// This model was downloaded from BioModels Database
// http://www.ebi.ac.uk/biomodels-static/

model Zatorsky2006_p53_Model6()
  // The model reproduces Fig 6B of the paper for model 6. The model was reproduced using XPP.
  // To the extent possible under law, all copyright and related or neighbouring rights to this encoded model have been dedicated to the public domain worldwide. Please refer to CC0 Public Domain Dedication for more information.
  // In summary, you are entitled to use this encoded model in absolutely any manner you deem suitable, verbatim, or with modification, alone or embedded it in a larger context, redistribute it, commercially or not, in a restricted way or not.
  // To cite BioModels Database, please use: Li C, Donizelli M, Rodriguez N, Dharuri H, Endler L, Chelliah V, Li L, He E, Henry A, Stefan MI, Snoep JL, Hucka M, Le Novère N, Laibe C (2010) BioModels Database: An enhanced, curated and annotated resource for published quantitative kinetic models. BMC Syst Biol., 4:92.
  // biomodels.db:MODEL0076407823
  // biomodels.db:BIOMD0000000155
  // isDescribedBy pubmed:16773083
  // isDerivedFrom biomodels.db:BIOMD0000000154 biomodels.db:BIOMD0000000156 biomodels.db:BIOMD0000000157 biomodels.db:BIOMD0000000158 biomodels.db:BIOMD0000000159
  // occursIn BTO:0000093
  // hasTaxon taxonomy:9606

  // Compartments:
  compartment compartment = 1; compartment is "cell";  // isVersionOf BTO:0000093

  // Species:
  species x in compartment = 0; x is "p53";  // isVersionOf uniprot:P04637
  species y in compartment = 0.9; y is "Mdm2";  // isVersionOf uniprot:Q00987

  // Parameters:
  beta_x = 0.9;
  psi = 1;
  alpha_xy = 1.4;
  beta_y = 1;
  alpha_y = 0.7;
  tau = 0.9;
  S = 0;
  beta_S = 0.9;
  alpha_S = 2.7;
  n = 4;

  // Rate rules:
  S' = beta_S - alpha_S*y*S;

  // Reactions:
  p53_production: => x; compartment*beta_x*S^n/(S^n + 1)*psi;  // isVersionOf GO:0006412
  Mdm2_dependent_p53_degradation: x => ; compartment*alpha_xy*y*x;  // modifiers: y; isVersionOf GO:0042176
  p53_dependent_Mdm2_production: => y; compartment*beta_y*psi*delay(x, tau);  // modifiers: x; isVersionOf GO:0042176
  Mdm2_degradation: y => ; compartment*alpha_y*y;  // isVersionOf GO:0044257

  // Unit definitions:
  unit substance = item; substance is "dimensionless";
  unit time = 3600 second; time is "hours";
end
