// SBML level 2 version 1
// This model was downloaded from BioModels Database
// http://www.ebi.ac.uk/biomodels-static/

model Zatorsky2006_p53_Model4()
  // The model reproduces time profile of p53 and Mdm2 as depicted in Fig 6B of the paper for Model 4. Results obtained using MathSBML.
  // To the extent possible under law, all copyright and related or neighbouring rights to this encoded model have been dedicated to the public domain worldwide. Please refer to CC0 Public Domain Dedication for more information.
  // In summary, you are entitled to use this encoded model in absolutely any manner you deem suitable, verbatim, or with modification, alone or embedded it in a larger context, redistribute it, commercially or not, in a restricted way or not.
  // To cite BioModels Database, please use: Li C, Donizelli M, Rodriguez N, Dharuri H, Endler L, Chelliah V, Li L, He E, Henry A, Stefan MI, Snoep JL, Hucka M, Le Novère N, Laibe C (2010) BioModels Database: An enhanced, curated and annotated resource for published quantitative kinetic models. BMC Syst Biol., 4:92.
  // biomodels.db:MODEL0076360248
  // biomodels.db:BIOMD0000000157
  // isDescribedBy pubmed:16773083
  // isDerivedFrom pubmed:12932324+ doi:10.1140/epjb/e2002-00271-1
  // occursIn BTO:0000093
  // hasTaxon taxonomy:9606

  // Compartments:
  compartment compartment = 1; compartment is "cell";  // GO:0005623 BTO:0000093

  // Species:
  species x in compartment = 0; x is "p53";  // isVersionOf uniprot:P04637
  species y in compartment = 0.8; y is "Mdm2";  // isVersionOf uniprot:Q00987
  species y0 in compartment = 0.1; y0 is "precursor Mdm2";

  // Parameters:
  beta_x = 0.9;
  psi = 1;
  alpha_x = 0;
  beta_y = 1.1;
  alpha_y = 0.8;
  alpha_0 = 0.8;
  k = 0.0001;
  alpha_k = 1.7;

  // Reactions:
  p53_production: => x; compartment*beta_x*psi;  // isVersionOf GO:0006412
  Mdm2_independent_p53_degradation: x => ; compartment*alpha_x*x;  // isVersionOf GO:0042176
  Mdm2_dependent_p53_degradation: x => ; compartment*alpha_k*y*x/(x + k);  // modifiers: y; isVersionOf GO:0042176
  R4: => y0; compartment*beta_y*x*psi; R4 is "p53 dependent Mdm2 precursor production";  // modifiers: x; isVersionOf GO:0006351
  Mdm2_synthesis_from_precursor: y0 => y; compartment*alpha_0*y0;  // isVersionOf GO:0006412
  Mdm2_degradation: y -> ; compartment*alpha_y*y;  // isVersionOf GO:0044257

  // Unit definitions:
  unit substance = item; substance is "dimensionless";
  unit time = 3600 second; time is "hours";
end
