// SBML level 2 version 1
// This model was downloaded from BioModels Database
// http://www.ebi.ac.uk/biomodels-static/

model Mayya2005_STATmodule()
  // The model reproduces Fig 2B of the paper. Model successfully reproduced using MathSBML.
  // To the extent possible under law, all copyright and related or neighbouring rights to this encoded model have been dedicated to the public domain worldwide. Please refer to CC0 Public Domain Dedication for more information.
  // In summary, you are entitled to use this encoded model in absolutely any manner you deem suitable, verbatim, or with modification, alone or embedded it in a larger context, redistribute it, commercially or not, in a restricted way or not.
  // To cite BioModels Database, please use: Li C, Donizelli M, Rodriguez N, Dharuri H, Endler L, Chelliah V, Li L, He E, Henry A, Stefan MI, Snoep JL, Hucka M, Le Novère N, Laibe C (2010) BioModels Database: An enhanced, curated and annotated resource for published quantitative kinetic models. BMC Syst Biol., 4:92.
  // biomodels.db:MODEL6095659304
  // biomodels.db:BIOMD0000000167
  // isDescribedBy pubmed:17091582
  // isDerivedFrom biomodels.db:BIOMD0000000093 biomodels.db:BIOMD0000000094 pubmed:12552139 pubmed:15240442
  // hasTaxon taxonomy:131567
  // hasPart kegg.pathway:hsa04630

  // Compartments:
  compartment nuc = 1 litre;  // GO:0005634
  compartment sol = 14.625 litre;  // GO:0005576
  compartment nm = 1 um2;  // 2-D; GO:0031965

  // Species:
  species stat_sol in sol = 1;  // isVersionOf uniprot:P42224
  species Pstat_sol in sol = 0;  // isVersionOf uniprot:P42224
  species $statKinase_sol in sol;
  species PstatDimer_sol in sol = 0;  // isVersionOf uniprot:P42224
  species PstatDimer_nuc in nuc = 0;  // isVersionOf uniprot:P42224
  species stat_nuc in nuc = 0;  // isVersionOf uniprot:P42224
  species Pstat_nuc in nuc = 0;  // isVersionOf uniprot:P42224
  species statPhosphatase_nuc in nuc = 0.05;
  species species_test in sol = 0;

  // Assignment rules:
  statKinase_sol := piecewise(0.01*sin(0.001571*(-500 + time)), (time > 500) && (time < 2502.546), 0);

  // Reactions:
  PstatDimerisation: 2 Pstat_sol -> PstatDimer_sol; (PstatDimerisation_Kf_PstatDimerisation*Pstat_sol^2 + (-(PstatDimerisation_Kr_PstatDimerisation*PstatDimer_sol)))*sol;  // isVersionOf GO:0046983
    PstatDimerisation_Kf_PstatDimerisation = 0.6 uM_1_s_1; PstatDimerisation_Kr_PstatDimerisation = 0.03 s_1;
  statDephosphorylation: Pstat_nuc -> stat_nuc; Kcat_dephos*statPhosphatase_nuc*Pstat_nuc*(1/(Km_dephos + Pstat_nuc))*nuc;  // modifiers: statPhosphatase_nuc; isVersionOf GO:0006470
    Kcat_dephos = 1 s_1; Km_dephos = 2 uM;
  statPhosphorylation: stat_sol -> Pstat_sol + species_test; Kcat_phos*statKinase_sol*stat_sol*(1/(Km_phos + stat_sol))*sol;  // modifiers: statKinase_sol; isVersionOf GO:0042508
    Kcat_phos = 1 s_1; Km_phos = 4 uM;
  PstatDimerisationNuc: 2 Pstat_nuc -> PstatDimer_nuc; (PstatDimerisationNuc_Kf_PstatDimerisation*Pstat_nuc^2 + (-(PstatDimerisationNuc_Kr_PstatDimerisation*PstatDimer_nuc)))*nuc;  // isVersionOf GO:0046983
    PstatDimerisationNuc_Kf_PstatDimerisation = 0.6 uM_1_s_1; PstatDimerisationNuc_Kr_PstatDimerisation = 0.03 s_1;
  PstatDimer__import: PstatDimer_sol -> PstatDimer_nuc; PstatDimer_impMax*PstatDimer_sol*(1/(Kpsd_imp + PstatDimer_sol))*nm;  // isVersionOf GO:0007262
    PstatDimer_impMax = 0.045 uM_um_s_1; Kpsd_imp = 0.3 uM;
  stat_export: stat_sol -> stat_nuc; nuc*stat_expMax*stat_nuc*(1/(Ks_exp + stat_nuc))*nm;
    stat_expMax = -0.06 uM_um_s_1; Ks_exp = 0.6 uM;
  stat_import: stat_sol -> stat_nuc; nuc*stat_impMax*stat_sol*(1/(Ks_imp + stat_sol))*nm;  // isVersionOf GO:0007262
    stat_impMax = 0.003 uM_um_s_1; Ks_imp = 3 uM;

  // Unit definitions:
  unit substance = 1e-6 mole;
  unit volume = litre;
  unit area = (1e-6 metre)^2;
  unit molecules = item;
  unit um2 = (1e-6 metre)^2;
  unit s_1 = 1 / second;
  unit uM_1_s_1 = litre / (1e-6 mole * second);
  unit uM_um_s_1 = 1e-6 mole / (litre * (1e-6 metre)^2 * second);
  unit uM = 1e-6 mole / litre;
end
