// SBML level 2 version 3
// This model was downloaded from BioModels Database
// http://www.ebi.ac.uk/biomodels-static/

model KDM()
  // Ibrahim2008_MCC_assembly_model_KDM
  // BioSystems (2007), doi:10.1016/j.biosystems.2008.06.007
  // In-silico study of kinetochore control, amplification, and inhibition effects in MCC assembly
  // Bashar Ibrahim, Eberhard Schmitt, Peter Dittrich, Stephan Diekmann
  // This is the kinetochore dependent MCC model (KDM) from the article. For the kinetochore independent MCC model (KIM) replace u*k4f in R4 by k4f and u*k5f in R5 by k5f .
  // This model originates from BioModels Database: A Database of Annotated Published Models. It is copyright (c) 2005-2009 The BioModels Team.
  // For more information see the terms of use .
  // To cite BioModels Database, please use Le Novère N., Bornstein B., Broicher A., Courtot M., Donizelli M., Dharuri H., Li L., Sauro H., Schilstra M., Shapiro B., Snoep J.L., Hucka M. (2006) BioModels Database: A Free, Centralized Database of Curated, Published, Quantitative Kinetic Models of Biochemical and Cellular Systems Nucleic Acids Res., 34: D689-D691.
  // biomodels.db:MODEL1667758030
  // biomodels.db:BIOMD0000000193
  // isDescribedBy pubmed:18675311
  // hasTaxon taxonomy:9606
  // isVersionOf reactome:REACT_2137.2 GO:0007094
  // isPartOf kegg.pathway:hsa04110

  // Compartments:
  compartment Cytoplasm = 1;  // GO:0005737

  // Species:
  species Mad1_CMad2 in Cytoplasm = 5e-8; Mad1_CMad2 is "Mad1:C-Mad2";  // substance in mole; hasPart uniprot:Q13257 uniprot:Q9Y6D9
  // Open conformation of Mad2
  species OMad2 in Cytoplasm = 1.3e-7; OMad2 is "O-Mad2";  // substance in mole; isVersionOf uniprot:Q13257
  species Mad1_CMad2_OMad2 in Cytoplasm = 0; Mad1_CMad2_OMad2 is "Mad1:C-Mad2:O-Mad2*";  // substance in mole; hasPart uniprot:Q13257 uniprot:Q9Y6D9
  species Cdc20 in Cytoplasm = 2.2e-7;  // substance in mole; isVersionOf uniprot:Q12834
  species Cdc20_CMad2 in Cytoplasm = 0; Cdc20_CMad2 is "Cdc20:C-Mad2";  // substance in mole; hasPart uniprot:Q13257 uniprot:Q12834
  species Bub3_BubR1 in Cytoplasm = 1.3e-7; Bub3_BubR1 is "Bub3:BubR1";  // substance in mole; hasPart uniprot:O43684 uniprot:O60566
  species MCC in Cytoplasm = 0;  // substance in mole; isVersionOf GO:0033597; hasPart uniprot:O60566 uniprot:Q13257 uniprot:Q12834 uniprot:O43684
  species Bub3_BubR1_Cdc20 in Cytoplasm = 0; Bub3_BubR1_Cdc20 is "Bub3:BubR1:Cdc20";  // substance in mole; hasPart uniprot:Q12834 uniprot:O60566 uniprot:O43684

  // Parameters:
  k3f = 0.01 ps;
  kf6 = 1000 pMps;
  k5f = 10000 pMps;
  k5r = 0.2 ps;
  k2f = 10000000 pMps;
  k1f = 200000 pMps;
  k1r = 0.2 ps;
  k4f = 10000000 pMps;
  k4r = 0.02 ps;
  // u = 1 : kinetochore unattached
  // u = 0 : kinetochore attached
  u = 1 dimensionless;
  const_val_0 = 0 dimensionless;
  const_val_1 = 1 dimensionless;

  // Reactions:
  R1: Mad1_CMad2 + OMad2 -> Mad1_CMad2_OMad2; Cytoplasm*(u*k1f*Mad1_CMad2*OMad2 - k1r*Mad1_CMad2_OMad2);  // isVersionOf GO:0032092 GO:0043241 GO:0006461
  R2: Mad1_CMad2_OMad2 + Cdc20 => Mad1_CMad2 + Cdc20_CMad2; Cytoplasm*u*k2f*Mad1_CMad2_OMad2*Cdc20;  // isVersionOf GO:0032092 GO:0006461
  R3: Cdc20_CMad2 => Cdc20 + OMad2; Cytoplasm*k3f*Cdc20_CMad2;  // isVersionOf GO:0043241
  R4: Cdc20_CMad2 + Bub3_BubR1 -> MCC; Cytoplasm*(u*k4f*Cdc20_CMad2*Bub3_BubR1 - k4r*MCC);  // isVersionOf reactome:REACT_36.2 GO:0006461 GO:0043241
  R5: Bub3_BubR1 + Cdc20 -> Bub3_BubR1_Cdc20; Cytoplasm*(u*k5f*Bub3_BubR1*Cdc20 - k5r*Bub3_BubR1_Cdc20);  // isVersionOf GO:0006461 GO:0043241
  R6: OMad2 + Cdc20 => Cdc20_CMad2; Cytoplasm*kf6*OMad2*Cdc20;  // isVersionOf GO:0006461

  // Events:
  mt_attachment: at (time > 2000): u = const_val_0; mt_attachment is "Microtubule attachment";  // GO:0008608

  // Unit definitions:
  unit ps = 1 / second; ps is "per second";
  unit pMps = litre / (mole * second); pMps is "liter per mole per second";
end
