// SBML level 2 version 3
// This model was downloaded from BioModels Database
// http://www.ebi.ac.uk/biomodels-static/

model Wolf2000_Glycolytic_Oscillations()
  // Model reproduces the dynamics of ATP and NADH as depicted in Fig 4 of the paper. Model successfully tested on Jarnac and MathSBML.
  // To the extent possible under law, all copyright and related or neighbouring rights to this encoded model have been dedicated to the public domain worldwide. Please refer to CC0 Public Domain Dedication for more information.
  // In summary, you are entitled to use this encoded model in absolutely any manner you deem suitable, verbatim, or with modification, alone or embedded it in a larger context, redistribute it, commercially or not, in a restricted way or not.
  // To cite BioModels Database, please use: Li C, Donizelli M, Rodriguez N, Dharuri H, Endler L, Chelliah V, Li L, He E, Henry A, Stefan MI, Snoep JL, Hucka M, Le Novère N, Laibe C (2010) BioModels Database: An enhanced, curated and annotated resource for published quantitative kinetic models. BMC Syst Biol., 4:92.
  // biomodels.db:MODEL3352181362
  // biomodels.db:BIOMD0000000206
  // isDescribedBy pubmed:10692304
  // hasTaxon taxonomy:4932
  // isVersionOf GO:0006096
  // kegg.pathway:sce00010

  // Compartments:
  compartment compartment = 1;

  // Species:
  species Glucose in compartment = 1;  // CHEBI:17234 kegg.compound:C00293
  species at in compartment = 2; at is "ATP";  // CHEBI:15422 kegg.compound:C00002
  species F16P in compartment = 5;  // CHEBI:16905 kegg.compound:C05378
  species Triose_Gly3Phos_DHAP in compartment = 0.6;  // hasPart CHEBI:16108 CHEBI:29052 kegg.compound:C00111 kegg.compound:C00118
  species na in compartment = 0.6; na is "NAD";  // CHEBI:15846 kegg.compound:C00003
  species _3PG in compartment = 0.7;  // CHEBI:17794 kegg.compound:C00197
  species Pyruvate in compartment = 8;  // kegg.compound:C00022 CHEBI:32816; CHEBI:15361
  species Acetaldehyde in compartment = 0.08;  // CHEBI:15343 kegg.compound:C00084
  species s6o in compartment = 0.02; s6o is "extracellular acetaldehyde";  // CHEBI:15343 kegg.compound:C00084

  // Parameters:
  k0 = 50 mM_min_1;
  k1 = 550 mM_1_min_1;
  k2 = 9.8 min_1;
  k31 = 323.8 mM_1_min_1;
  k33 = 5.78231e4 mM_1_min_1;
  k32 = 7.64111e4 mM_1_min_1;
  k34 = 23.7 mM_1_min_1;
  k4 = 80 mM_1_min_1;
  k5 = 9.7 min_1;
  k6 = 2000 mM_1_min_1;
  k7 = 28 min_1;
  k8 = 85.7 mM_1_min_1;
  k9 = 80 min_1;
  k10 = 375 min_1;
  atot = 4 mM;
  ntot = 1 mM;
  n = 4 dimensionless;
  ki = 1 mM;

  // Reactions:
  v1: Glucose + 2 at -> F16P; compartment*k1*Glucose*at/(1 + (at/ki)^n);  // hasPart kegg.reaction:R00756 kegg.reaction:R00299; hasPart ec-code:2.7.1.11 ec-code:5.3.1.9
  v2: F16P -> 2 Triose_Gly3Phos_DHAP; compartment*k2*F16P;  // ec-code:4.1.2.13 kegg.reaction:R01070
  v3: Triose_Gly3Phos_DHAP + na -> _3PG + at; compartment*((k31*k32*Triose_Gly3Phos_DHAP*na*(atot - at) - k33*k34*_3PG*at*(ntot - na))/(k33*(ntot - na) + k32*(atot - at)));  // hasPart ec-code:2.7.2.3 ec-code:1.2.1.12
  v4: _3PG -> Pyruvate + at; compartment*k4*_3PG*(atot - at);  // hasPart kegg.reaction:R00658 kegg.reaction:R00200; hasPart ec-code:2.7.1.40
  v5: Pyruvate -> Acetaldehyde; compartment*k5*Pyruvate;  // isVersionOf ec-code:4.1.1.1 kegg.reaction:R00224
  v7: at -> ; compartment*k7*at;  // isVersionOf GO:0006754
  v8: Triose_Gly3Phos_DHAP -> na; compartment*k8*Triose_Gly3Phos_DHAP*(ntot - na);  // hasPart kegg.reaction:R05679
  v9: s6o -> ; compartment*k9*s6o;  // isVersionOf GO:0046187
  v10: Acetaldehyde -> 0.1 s6o; compartment*k10*(Acetaldehyde - s6o);
  v6: Acetaldehyde -> na; compartment*k6*Acetaldehyde*(ntot - na);  // isVersionOf ec-code:1.1.1.71 kegg.reaction:R00754
  v0: -> Glucose; compartment*k0;  // isVersionOf GO:0046323

  // Unit definitions:
  unit substance = 1e-3 mole; substance is "milli mole";
  unit time = 60 second; time is "min";
  unit mM = 1e-3 mole / litre;
  unit mM_min_1 = 1e-3 mole / (litre * 60 second);
  unit min_1 = 1 / (60 second);
  unit mM_1_min_1 = litre / (1e-3 mole * 60 second);
end
