// SBML level 2 version 1
// This model was downloaded from BioModels Database
// http://www.ebi.ac.uk/biomodels-static/

model Radulescu2008_NFkB_hierarchy_M_14_25_28_Lipniacky()
  // NFkB model M(14,25,28) - Lipniacky's NFkB model
  // This is a model of NFkB pathway functioning from hierarchy of models of decreasing complexity, created to demonstrate application of model reduction methods proposed in
  // This a model from the article:
  // Robust simplifications of multiscale biochemical networks.
  // Radulescu O, Gorban A., Zinovyev A., Lilienbaum. A. BMC Syst Biol2008:2:86 18854041,
  // Abstract:
  // BACKGROUND: Cellular processes such as metabolism, decision making in development and differentiation, signalling, etc., can be modeled as large networks of biochemical reactions. In order to understand the functioning of these systems, there is a strong need for general model reduction techniques allowing to simplify models without loosing their main properties. In systems biology we also need to compare models or to couple them as parts of larger models. In these situations reduction to a common level of complexity is needed. RESULTS: We propose a systematic treatment of model reduction of multiscale biochemical networks. First, we consider linear kinetic models, which appear as "pseudo-monomolecular" subsystems of multiscale nonlinear reaction networks. For such linear models, we propose a reduction algorithm which is based on a generalized theory of the limiting step that we have developed in 1. Second, for non-linear systems we develop an algorithm based on dominant solutions of quasi-stationarity equations. For oscillating systems, quasi-stationarity and averaging are combined to eliminate time scales much faster and much slower than the period of the oscillations. In all cases, we obtain robust simplifications and also identify the critical parameters of the model. The methods are demonstrated for simple examples and for a more complex model of NF-kappaB pathway. CONCLUSION: Our approach allows critical parameter identification and produces hierarchies of models. Hierarchical modeling is important in "middle-out" approaches when there is need to zoom in and out several levels of complexity. Critical parameter identification is an important issue in systems biology with potential applications to biological control and therapeutics. Our approach also deals naturally with the presence of multiple time scales, which is a general property of systems biology models.
  // This model is originally proposed by Lipniacki 2004 (Lipniacki T, Paszek P, Brasier AR, Luxon B, Kimmel M.(2004). Mathematical model of NF-kappaB regulatory module. J. Theor. Biol. 228 (2): 195-215. 15094015
  // The models are provided in CellDesigner v3.5 format. The name of the model M(x,y,z) should be deciphered as following:
  // x - number of species y - number of reactions z - number of parameters
  // Simulation protocol: The model can be simulated in CellDesigner directly, or in any simulator supporting events. The simulation period should be set up in 20 hours (t=72000 sec). This model reproduces Figure 3b (M(14,25,28)) of the publication.
  // For additional information please contact Andrei.Zinovyev at curie.fr
  // This model originates from BioModels Database: A Database of Annotated Published Models. It is copyright (c) 2005-2009 The BioModels Team.
  // For more information see the terms of use.
  // To cite BioModels Database, please use Le Novère N., Bornstein B., Broicher A., Courtot M., Donizelli M., Dharuri H., Li L., Sauro H., Schilstra M., Shapiro B., Snoep J.L., Hucka M. (2006) BioModels Database: A Free, Centralized Database of Curated, Published, Quantitative Kinetic Models of Biochemical and Cellular Systems Nucleic Acids Res., 34: D689-D691.
  // biomodels.db:MODEL7743386835
  // biomodels.db:BIOMD0000000226
  // isDescribedBy pubmed:18854041
  // isDerivedFrom biomodels.db:BIOMD0000000139 biomodels.db:BIOMD0000000140 pubmed:15094015
  // hasTaxon taxonomy:10090
  // isPartOf kegg.pathway:mmu04660

  // Compartments:
  compartment default = 1;  // isVersionOf GO:0005829
  compartment nucleus in default = 1;  // isVersionOf GO:0005634

  // Species:
  species $IKBA in nucleus = 0;  // isVersionOf uniprot:Q9Z1E3
  species $sa13_degraded in default = 0;
  species $sa12_degraded in default = 0;
  species mRNAIKBA in default = 0;  // isVersionOf ensembl:ENSMUST00000021413
  species $A20_nucleus in nucleus = 0;  // isVersionOf uniprot:Q60769
  species mRNAA20 in default = 0;  // isVersionOf ensembl:ENSMUST00000019997
  species A20_default in default = 0;  // isVersionOf uniprot:Q60769
  species $sa444_degraded in default = 0;
  species IKKi in default = 0;  // hasPart uniprot:Q60680 uniprot:O88351 uniprot:O88522
  species $sa19_degraded in default = 0;
  species IKKa in default = 0;  // hasPart uniprot:O88351 uniprot:Q60680 uniprot:O88522
  species IKKn in default = 0;  // hasPart uniprot:Q60680 uniprot:O88351 uniprot:O88522
  species $sa20_degraded in default = 0;
  species NFkB_IkB_alpha_default in default = 0.06/default; NFkB_IkB_alpha_default is "NFkB:IkB_alpha";  // hasPart uniprot:P25799 uniprot:Q9Z1E3
  species IKKa_IKBa in default = 0; IKKa_IKBa is "IKKa/IKBa";  // hasPart uniprot:Q9Z1E3 uniprot:Q60680 uniprot:O88351 uniprot:O88522
  species $IKK in nucleus = 0;  // hasPart uniprot:Q60680 uniprot:O88351 uniprot:O88522
  species NFkB_Ikb_alpha_IKKa in default = 0; NFkB_Ikb_alpha_IKKa is "NFkB/Ikb_alpha/IKKa";  // hasPart uniprot:P25799 uniprot:Q9Z1E3 uniprot:Q60680 uniprot:O88351
  species $sa96_degraded in default = 0;
  species $sa97_degraded in default = 0;
  species NFkB_IkB_alpha_nucleus in nucleus = 0; NFkB_IkB_alpha_nucleus is "NFkB/IkB_alpha";  // hasPart uniprot:P25799 uniprot:Q9Z1E3
  species IkB_alpha_default in default = 0;  // isVersionOf uniprot:Q9Z1E3
  species NFkB_default in default = 0;  // isVersionOf uniprot:P25799
  species NFkB_nucleus in nucleus = 0;  // isVersionOf uniprot:P25799
  species IkB_alpha_nucleus in nucleus = 0;  // isVersionOf uniprot:Q9Z1E3

  // Parameters:
  k1 = 0.0025;
  k2 = 0.000125;
  k3 = 2.5e-6;
  k4 = 0.1;
  k5 = 0.0015;
  k6 = 0.000125;
  k7 = 0.2;
  k8 = 0.1;
  k9 = 1;
  k10 = 0.1;
  k11 = 0.000125;
  k12 = 2e-5;
  kf13 = 18.4;
  kr13 = 0;
  kf14 = 18.4;
  kr14 = 0;
  kf15 = 0.0025;
  kr15 = 0;
  k16 = 0.5;
  k17 = 0.0004;
  k18 = 0.0003;
  k20 = 5e-7;
  k19 = 0;
  k21 = 0.0001;
  k22 = 0.5;
  kf23 = 0.001;
  kr23 = 0.0005;
  k27 = 0.0004;
  kf28 = 0.01;
  kr28 = 0;
  k26 = 5e-7;

  // Reactions:
  re44: $IKBA => mRNAIKBA; k26*NFkB_nucleus;  // modifiers: NFkB_nucleus; isVersionOf GO:0006406
  re45: mRNAIKBA => $sa12_degraded; k27*mRNAIKBA;  // isVersionOf GO:0006402
  re46: IkB_alpha_default => $sa13_degraded; k21*IkB_alpha_default;  // isVersionOf GO:0030163
  re47: mRNAIKBA => IkB_alpha_default + mRNAIKBA; k22*mRNAIKBA;  // isVersionOf GO:0006412
  re48: $A20_nucleus => mRNAA20; k19 + k20*NFkB_nucleus;  // modifiers: NFkB_nucleus; isVersionOf GO:0006406
  re49: IKKn => IKKa; k1*IKKn;
  re52: NFkB_IkB_alpha_default => NFkB_default; k12*NFkB_IkB_alpha_default;  // modifiers: IKKa; isVersionOf GO:0043241
  re53: IKKn => $sa19_degraded; k2*IKKn;  // isVersionOf GO:0030163
  re56: IKKa => $sa20_degraded; k6*IKKa;  // isVersionOf GO:0030163
  re57: IKKa_IKBa => IKKa; k8*IKKa_IKBa;  // isVersionOf GO:0043241
  re58: IKKa + NFkB_IkB_alpha_default => NFkB_Ikb_alpha_IKKa; k9*IKKa*NFkB_IkB_alpha_default;  // isVersionOf GO:0006461
  re59: NFkB_Ikb_alpha_IKKa => NFkB_default + IKKa; k10*NFkB_Ikb_alpha_IKKa;  // isVersionOf GO:0043241
  re60: IKKi => $sa444_degraded; k11*IKKi;  // isVersionOf GO:0030163
  re61: mRNAA20 => A20_default + mRNAA20; k16*mRNAA20;  // isVersionOf GO:0006412
  re63: IKKa => IKKi; k5*IKKa + k4*IKKa*A20_default;  // modifiers: A20_default
  re64: $IKK => IKKn; k3;
  re65: IkB_alpha_default + NFkB_default => NFkB_IkB_alpha_default; kf13*NFkB_default*IkB_alpha_default - kr13*NFkB_IkB_alpha_default;  // isVersionOf GO:0006461
  re66: IkB_alpha_default + IKKa => IKKa_IKBa; k7*IKKa*IkB_alpha_default;  // isVersionOf GO:0006461
  re67: NFkB_default => 5 NFkB_nucleus; kf15*NFkB_default - kr15*NFkB_nucleus;
  re68: 5 NFkB_IkB_alpha_nucleus => NFkB_IkB_alpha_default; kf28*NFkB_IkB_alpha_nucleus - kr28*NFkB_IkB_alpha_default;
  re69: NFkB_nucleus + IkB_alpha_nucleus => NFkB_IkB_alpha_nucleus; kf14*NFkB_nucleus*IkB_alpha_nucleus - kr14*NFkB_IkB_alpha_nucleus;  // isVersionOf GO:0006461
  re70: mRNAA20 => $sa96_degraded; k17*mRNAA20;  // isVersionOf GO:0006402
  re71: A20_default => $sa97_degraded; k18*A20_default;  // isVersionOf GO:0030163
  re72: IkB_alpha_default => 5 IkB_alpha_nucleus; kf23*IkB_alpha_default - kr23*IkB_alpha_nucleus;
end
