// SBML level 2 version 4
// This model was downloaded from BioModels Database
// http://www.ebi.ac.uk/biomodels-static/

model Swat2004_Mammalian_G1_S_Transition()
  // This is the extended model described the article:
  // Bifurcation analysis of the regulatory modules of the mammalian G1/S transition.
  // Swat M, Kel A, Herzel H. Bioinformatics 2004 Jul 10;20(10):1506-11. PMID: 15231543 , doi: 10.1093/bioinformatics/bth110
  // Abstract:
  // MOTIVATION: Mathematical models of the cell cycle can contribute to an understanding of its basic mechanisms. Modern simulation tools make the analysis of key components and their interactions very effective. This paper focuses on the role of small modules and feedbacks in the gene-protein network governing the G1/S transition in mammalian cells. Mutations in this network may lead to uncontrolled cell proliferation. Bifurcation analysis helps to identify the key components of this extremely complex interaction network.
  // RESULTS: We identify various positive and negative feedback loops in the network controlling the G1/S transition. It is shown that the positive feedback regulation of E2F1 and a double activator-inhibitor module can lead to bistability. Extensions of the core module preserve the essential features such as bistability. The complete model exhibits a transcritical bifurcation in addition to bistability. We relate these bifurcations to the cell cycle checkpoint and the G1/S phase transition point. Thus, core modules can explain major features of the complex G1/S network and have a robust decision taking function.
  // This model originates from BioModels Database: A Database of Annotated Published Models. It is copyright (c) 2005-2010 The BioModels Team.
  // To the extent possible under law, all copyright and related or neighbouring rights to this encoded model have been dedicated to the public domain worldwide. Please refer to CC0 Public Domain Dedication for more information.
  // In summary, you are entitled to use this encoded model in absolutely any manner you deem suitable, verbatim, or with modification, alone or embedded it in a larger context, redistribute it, commercially or not, in a restricted way or not..
  // To cite BioModels Database, please use Le Novère N., Bornstein B., Broicher A., Courtot M., Donizelli M., Dharuri H., Li L., Sauro H., Schilstra M., Shapiro B., Snoep J.L., Hucka M. (2006) BioModels Database: A Free, Centralized Database of Curated, Published, Quantitative Kinetic Models of Biochemical and Cellular Systems Nucleic Acids Res., 34: D689-D691.
  // biomodels.db:MODEL3897709120
  // biomodels.db:BIOMD0000000228
  // isDescribedBy pubmed:15231543
  // isPartOf reactome:REACT_1783
  // isVersionOf GO:0000083
  // hasTaxon taxonomy:40674

  // Compartments:
  compartment cell = 1;

  // Species:
  // retinoblastoma tumor suppressor protein
  species pRB in cell = 0.1;  // isHomologTo uniprot:P06400
  // monophosphorlyated pRB
  species pRBp in cell = 0.1;  // isHomologTo uniprot:P06400
  // dimers of E2F1-6 and DP1,2
  species E2F1 in cell = 0.1;  // isHomologTo uniprot:Q01094
  species CycDi in cell = 0.1; CycDi is "CycD/cdk4,6(i)";  // hasPart uniprot:P30281 uniprot:P11802 uniprot:Q00534
  species CycDa in cell = 0.1; CycDa is "CycD/cdk4,6(a)";  // hasPart uniprot:Q00534 uniprot:P11802 uniprot:P30281
  // c-Jun/Fos dimers
  species AP1 in cell = 0.1;  // isHomologTo uniprot:P01100
  // diphosphorylated form of pRB
  species pRBpp in cell = 0.1;  // isHomologTo uniprot:P06400
  species CycEi in cell = 0.1; CycEi is "CycE/cdk2(i)";  // hasPart uniprot:P24864 uniprot:O96020 uniprot:P24941
  species CycEa in cell = 0.1; CycEa is "CycEa/cdk2(a)";  // hasPart uniprot:P24864 uniprot:O96020 uniprot:P24941

  // Parameters:
  k1 = 1;
  Km1 = 0.5;
  J11 = 0.5;
  J61 = 5;
  k16 = 0.4;
  k61 = 0.3;
  phi_pRB = 0.005;
  kp = 0.05;
  k2 = 1.6;
  a = 0.04;
  Km2 = 4;
  J12 = 5;
  J62 = 8;
  phi_E2F1 = 0.1;
  k3 = 0.05;
  k23 = 0.3;
  J13 = 0.002;
  J63 = 2;
  k34 = 0.04;
  Km4 = 0.3;
  phi_CycDi = 0.023;
  k43 = 0.01;
  phi_CycDa = 0.03;
  // mitogenic stimulation
  Fm = 0.005;
  k25 = 0.9;
  J15 = 0.001;
  J65 = 6;
  phi_AP1 = 0.01;
  k67 = 0.7;
  k76 = 0.1;
  phi_pRBpp = 0.04;
  phi_pRBp = 0.06;
  k28 = 0.06;
  J18 = 0.6;
  J68 = 7;
  k89 = 0.07;
  Km9 = 0.005;
  k98 = 0.01;
  phi_CycEi = 0.06;
  phi_CycEa = 0.05;

  // Reactions:
  pRB_synthesis: => pRB; cell*k1*(E2F1/(Km1 + E2F1))*(J11/(J11 + pRB))*(J61/(J61 + pRBp));  // modifiers: pRBp, E2F1; isVersionOf GO:0006412
  pRB_phosphorylation: pRB => pRBp; cell*k16*pRB*CycDa;  // modifiers: CycDa; isVersionOf GO:0006468
  pRBp_dephosphorylation: pRBp => pRB; cell*k61*pRBp;  // isVersionOf GO:0006470
  pRB_degradation: pRB => ; cell*phi_pRB*pRB;  // isVersionOf GO:0030163
  E2F1_synthesis: => E2F1; cell*(kp + k2*(a^2 + E2F1^2)/(Km2^2 + E2F1^2)*(J12/(J12 + pRB))*(J62/(J62 + pRBp)));  // modifiers: pRB, pRBp; isVersionOf GO:0006412
  E2F1_degradation: E2F1 => ; cell*phi_E2F1*E2F1;  // isVersionOf GO:0030163
  CycD_synthesis: => CycDi; cell*(k3*AP1 + k23*E2F1*(J13/(J13 + pRB))*(J63/(J63 + pRBp)));  // modifiers: E2F1, pRB, pRBp, AP1; isVersionOf GO:0006412
  CycD_inibition: CycDa => CycDi; cell*k43*CycDa;  // isVersionOf GO:0031658
  CycD_activation: CycDi => CycDa; cell*k34*CycDi*(CycDa/(Km4 + CycDa));  // isVersionOf GO:0031659
  CycD_degradation: CycDi => ; cell*phi_CycDi*CycDi;  // isVersionOf GO:0030163
  CycD_degradation2: CycDa => ; cell*phi_CycDa*CycDa;  // isVersionOf GO:0030163
  AP1_synthesis: => AP1; cell*(Fm + k25*E2F1*(J15/(J15 + pRB))*(J65/(J65 + pRBp)));  // modifiers: E2F1, pRB, pRBp; isVersionOf GO:0006412
  Ap1_degradation: AP1 => ; cell*phi_AP1*AP1;  // isVersionOf GO:0030163
  pRBp_phosphorylation: pRBp => pRBpp; cell*k67*pRBp*CycEa;  // modifiers: CycEa; isVersionOf GO:0006468
  pRBpp_dephosphorylation: pRBpp => pRBp; cell*k76*pRBpp;  // isVersionOf GO:0006470
  pRBpp_degradation: pRBpp => ; cell*phi_pRBpp*pRBpp;  // isVersionOf GO:0030163
  pRBp_degradation: pRBp => ; cell*phi_pRBp*pRBp;  // isVersionOf GO:0030163
  CycE_synthesis: => CycEi; cell*k28*E2F1*(J18/(J18 + pRB))*(J68/(J68 + pRBp));  // modifiers: E2F1, pRB, pRBp; isVersionOf GO:0006412
  CycE_activation: CycEi => CycEa; cell*k89*CycEi*CycEa/(Km9 + CycEa);  // isVersionOf GO:0031659
  CycE_inibition: CycEa => CycEi; cell*k98*CycEa;  // isVersionOf GO:0031658
  CycE_degradation: CycEi => ; cell*phi_CycEi*CycEi;  // isVersionOf GO:0030163
  CycE_degradation2: CycEa => ; cell*phi_CycEa*CycEa;  // isVersionOf GO:0030163

  // Unit definitions:
  unit time = dimensionless; time is "norm. time";
  unit volume = dimensionless; volume is "norm. volume";
  unit substance = dimensionless; substance is "norm substance";
end
