// SBML level 2 version 4
// This model was downloaded from BioModels Database
// http://www.ebi.ac.uk/biomodels-static/

model Ortega2006_bistability_doublePhosphorylation()
  // Ortega2006 - bistability from double phosphorylation in signal transduction
  // This model is described in the article:
  // Bistability from double phosphorylation in signal transduction. Kinetic and structural requirements.
  // Ortega F, Garcés JL, Mas F, Kholodenko BN, Cascante M.
  // FEBS J. 2006 Sep; 273(17): 3915-3926
  // Abstract:
  // Previous studies have suggested that positive feedback loops and ultrasensitivity are prerequisites for bistability in covalent modification cascades. However, it was recently shown that bistability and hysteresis can also arise solely from multisite phosphorylation. Here we analytically demonstrate that double phosphorylation of a protein (or other covalent modification) generates bistability only if: (a) the two phosphorylation (or the two dephosphorylation) reactions are catalyzed by the same enzyme; (b) the kinetics operate at least partly in the zero-order region; and (c) the ratio of the catalytic constants of the phosphorylation and dephosphorylation steps in the first modification cycle is less than this ratio in the second cycle. We also show that multisite phosphorylation enlarges the region of kinetic parameter values in which bistability appears, but does not generate multistability. In addition, we conclude that a cascade of phosphorylation/dephosphorylation cycles generates multiple steady states in the absence of feedback or feedforward loops. Our results show that bistable behavior in covalent modification cascades relies not only on the structure and regulatory pattern of feedback/feedforward loops, but also on the kinetic characteristics of their component proteins.
  // This model is hosted on BioModels Database and identified by: BIOMD0000000258.
  // To cite BioModels Database, please use: BioModels Database: An enhanced, curated and annotated resource for published quantitative kinetic models.
  // To the extent possible under law, all copyright and related or neighbouring rights to this encoded model have been dedicated to the public domain worldwide. Please refer to CC0 Public Domain Dedication for more information.
  // biomodels.db:MODEL1008100000
  // biomodels.db:BIOMD0000000258
  // isDescribedBy pubmed:16934033
  // isVersionOf GO:0006468
  // hasTaxon taxonomy:131567

  // Compartments:
  compartment cell = 1;

  // Species:
  species alpha in cell = 0.462;  // isVersionOf kegg.compound:C00017 CHEBI:16541
  species beta in cell = 0.2;  // isVersionOf kegg.compound:C00562
  species gamma in cell = 0.338;  // isVersionOf kegg.compound:C00562

  // Parameters:
  r31 = 1;
  r24 = 1;
  Chi14 = 1.1;
  Ks1 = 0.01;
  Ks2 = 0.01;
  Ks3 = 0.01;
  Ks4 = 0.01;
  Vm1 = 1;
  p = 1;

  // Reactions:
  v1: alpha -> beta; Vm1*(alpha/Ks1)/(1 + alpha/Ks1 + beta/Ks3);
  v2: beta -> alpha; r24*(Vm1/Chi14)*(beta/Ks2)/(1 + gamma/Ks4 + beta/Ks2);  // modifiers: gamma
  v3: beta -> gamma; r31*Vm1*(beta/Ks3)/(1 + alpha/Ks1 + beta/Ks3);  // modifiers: alpha
  v4: gamma => beta; Vm1/Chi14*(gamma/Ks4)/(1 + gamma/Ks4 + beta/Ks2);
end
