// SBML level 2 version 4
// This model was downloaded from BioModels Database
// http://www.ebi.ac.uk/biomodels-static/

model restif07()
  // Restif2007 - Vaccination invasion
  // This model is described in the article:
  // Vaccination and the dynamics of immune evasion.
  // Restif O, Grenfell BT.
  // J R Soc Interface 2007 Feb; 4(12): 143-153
  // Abstract:
  // Vaccines exert strong selective pressures on pathogens, favouring the spread of antigenic variants. We propose a simple mathematical model to investigate the dynamics of a novel pathogenic strain that emerges in a population where a previous strain is maintained at low endemic level by a vaccine. We compare three methods to assess the ability of the novel strain to invade and persist: algebraic rate of invasion; deterministic dynamics; and stochastic dynamics. These three techniques provide complementary predictions on the fate of the system. In particular, we emphasize the importance of stochastic simulations, which account for the possibility of extinctions of either strain. More specifically, our model suggests that the probability of persistence of an invasive strain (i) can be minimized for intermediate levels of vaccine cross-protection (i.e. immune protection against the novel strain) and (ii) is lower if cross-immunity acts through a reduced infectious period rather than through reduced susceptibility.
  // This version of the model can be used for both the stochastic and the deterministic simulations described in the article. For deterministic interpretations with infinite population sizes, set the population size N = 1. The model does reproduces the deterministic time course. The initial values are set to the steady state values for a latent infection with strain 1 with an invading infection of strain 2 (I2=1e-06), 100 percent vaccination with a susceptibility reduction τ=0.7 at birth (p=1), and all other parameters as in figure 3 of the publication.
  // To be compatible with older software tools, the english letter names instead of the greek symbols were used for parameter names:
  // parameter symbol name
  // transmission rate β beta
  // recovery rate γ gamma
  // birth/death rate μ mu
  // rate of loss of natural immunity σ sigma
  // rate of loss of vaccine immunity σ v sigmaV
  // reduction of susceptibility by primary infection θ theta
  // reduction of infection period by primary infection ν nu
  // reduction of susceptibility by vaccination τ tau
  // reduction of infection period by vaccination η eta
  // Originally created by libAntimony v1.4 (using libSBML 3.4.1)
  // This model is hosted on BioModels Database and identified by: BIOMD0000000294.
  // To cite BioModels Database, please use: BioModels Database: An enhanced, curated and annotated resource for published quantitative kinetic models.
  // To the extent possible under law, all copyright and related or neighbouring rights to this encoded model have been dedicated to the public domain worldwide. Please refer to CC0 Public Domain Dedication for more information.
  // biomodels.db:MODEL1012210000
  // biomodels.db:BIOMD0000000294
  // isDescribedBy pubmed:17210532
  // isDerivedFrom biomodels.db:BIOMD0000000249 pubmed:460412 pubmed:460424
  // hasTaxon taxonomy:520 taxonomy:9606
  // hasProperty mamo:MAMO_0000046

  // Compartments:
  compartment env = 1; env is "environment";

  // Species:
  // total target population size
  substanceOnly species N in env = 1;  // isVersionOf taxonomy:9606
  substanceOnly species S in env = 0.0588235;  // isVersionOf taxonomy:9606
  substanceOnly species I1 in env = 0.00176967;  // hasVersion taxonomy:9606 taxonomy:520
  substanceOnly species I2 in env = 1e-6;  // hasVersion taxonomy:9606 taxonomy:520
  substanceOnly species R1 in env = 0.439407;  // isVersionOf taxonomy:9606
  substanceOnly species R2 in env = 0;  // isVersionOf taxonomy:9606
  substanceOnly species V in env = 0.9;  // isVersionOf taxonomy:9606
  substanceOnly species Iv2 in env = 0.5;  // isVersionOf taxonomy:9606 taxonomy:520
  substanceOnly species J2 in env = 0;  // hasVersion taxonomy:9606 taxonomy:520
  substanceOnly species J1 in env = 0;  // hasVersion taxonomy:9606 taxonomy:520
  substanceOnly species R in env = 0;  // isVersionOf taxonomy:9606

  // Parameters:
  // birth/death rate
  mu has per_year;
  l_e = 50 time; l_e is "life expectancy";
  // transmission rate
  beta has per_year;
  // basic reproductive ratio (beta/(gamma+mu))
  R0 = 17 dimensionless;
  // recovery rate
  gamma has per_year;
  // fraction of individuals vaccinated at birth
  p = 1 dimensionless;
  tau = 0.7 dimensionless;
  theta = 0.5 dimensionless;
  nu = 0.5 dimensionless;
  eta = 0.5 dimensionless;
  // rate of immunity loss
  sigma has per_year;
  // rate of immunity loss of vacinated individuals
  sigmaV has per_year;
  tInf = 21 days; tInf is "infectious period (d)";
  tImm = 20 time; tImm is "immune period (yr)";
  tImm_V = 50 time; tImm_V is "vaccine immune period (yr)";
  // fraction of individuals infected with strain 1
  strain1_frac has dimensionless;
  // fraction of individuals infected with strain 2
  strain2_frac has dimensionless;
  // fraction of susceptible individuals
  S_frac has dimensionless;
  // fraction of vaccinated uninfected individuals
  V_frac has dimensionless;
  // fraction of individuals immune against strain 1 exclusively after infection
  R_1_frac has dimensionless;
  // fraction of individuals immune against strain 2 exclusively after infection
  R_2_frac has dimensionless;
  // fraction of individuals immune to both strains
  R_frac has dimensionless;

  // Assignment rules:
  mu := 1/l_e;
  beta := R0*(gamma + mu);
  gamma := 365/tInf;
  sigma := 1/tImm;
  sigmaV := 1/tImm_V;
  strain1_frac := (I1 + J1)/N;
  strain2_frac := (I2 + J2 + Iv2)/N;
  S_frac := S/N;
  V_frac := V/N;
  R_1_frac := (R1 + R)/N;
  R_2_frac := (R2 + R)/N;
  R_frac := R/N;

  // Reactions:
  Birth_S_unvaccinated: => S; mu*(1 - p)*N; Birth_S_unvaccinated is "Birth S (unvaccinated)";  // modifiers: N; isVersionOf GO:0007567
  Birth_V_vaccinated: => V; mu*p*N; Birth_V_vaccinated is "Birth V (vaccinated)";  // modifiers: N; isVersionOf GO:0007567
  Death_in_S: S => ; mu*S;  // isVersionOf GO:0016265
  Death_in_V: V => ; mu*V;  // isVersionOf GO:0016265
  Death_in_I1: I1 => ; mu*I1;  // isVersionOf GO:0016265
  Death_in_I2: I2 => ; mu*I2;  // isVersionOf GO:0016265
  Death_in_Iv2: Iv2 => ; mu*Iv2;  // isVersionOf GO:0016265
  Death_in_R1: R1 => ; mu*R1;  // isVersionOf GO:0016265
  Death_in_R2: R2 => ; mu*R2;  // isVersionOf GO:0016265
  Death_in_J1: J1 => ; mu*J1;  // isVersionOf GO:0016265
  Death_in_J2: J2 => ; mu*J2;  // isVersionOf GO:0016265
  Death_in_Rp: R => ; mu*R;  // isVersionOf GO:0016265
  Primary_Infection_with_strain_1: S => I1; beta*S*((I1 + J1)/N);  // modifiers: J1, N
  Primary_Infection_with_strain_2: S => I2; beta*S*((I2 + J2 + Iv2)/N);  // modifiers: J2, N, Iv2
  r15: V => Iv2; beta*(1 - tau)*V*((I2 + J2 + Iv2)/N); r15 is "Primary Infection of V with strain 2";  // modifiers: J2, N, I2
  Recovery_I1: I1 => R1; gamma*I1; Recovery_I1 is "Recovery (I1)";
  Recovery_I2: I2 => R2; gamma*I2; Recovery_I2 is "Recovery (I2)";
  r18: R2 => J1; beta*(1 - theta)*R2*(I1 + J1)/N; r18 is "Secondary Infection with strain 1";  // modifiers: N, I1
  r19: R1 => J2; beta*(1 - theta)*R1*(I2 + J2 + Iv2)/N; r19 is "Secondary Infection with strain 2";  // modifiers: N, I2, Iv2
  Recovery_J1: J1 => R; gamma/(1 - nu)*J1; Recovery_J1 is "Recovery (J1)";
  Recovery_J2: J2 => R; gamma/(1 - nu)*J2; Recovery_J2 is "Recovery (J2)";
  Recovery_Iv2: Iv2 => R; gamma/(1 - eta)*Iv2; Recovery_Iv2 is "Recovery (Iv2)";
  Loss_of_Immunity_R1: R1 => S; sigma*R1; Loss_of_Immunity_R1 is "Loss of Immunity (R1)";
  Loss_of_Immunity_R2: R2 => S; sigma*R2; Loss_of_Immunity_R2 is "Loss of Immunity (R2)";
  Loss_of_Immunity_Rp: R => S; sigma*R; Loss_of_Immunity_Rp is "Loss of Immunity (Rp)";
  Loss_of_Immunity_V: V => S; sigmaV*V; Loss_of_Immunity_V is "Loss of Immunity (V)";

  // Unit definitions:
  unit substance = item; substance is "individuals";
  unit time = 3.1536e7 second; time is "years";
  unit days = 86400 second;
  unit per_year = 1 / (3.1536e7 second);
end
