// SBML level 2 version 4
// This model was downloaded from BioModels Database
// http://www.ebi.ac.uk/biomodels-static/

model decroly82()
  // Decroly1982_Enzymatic_Oscillator
  // This is the scaled model described in the article:
  // Birhythmicity, chaos, and other patterns of temporal self-organization in a multiply regulated biochemical system
  // Olivier Decroly, Albert Goldbeter, Proc Natl Acad Sci USA 1982 79:6917-6921; PMID:6960354;
  // Abstract:
  // We analyze on a model biochemical system the effect of a coupling between two instability-generating mechanisms. The system considered is that of two allosteric enzymes coupled in series and activated by their respective products. In addition to simple periodic oscillations, the system can exhibit a variety of new modes of dynamic behavior; coexistence between two stable periodic regimes (birhythmicity), random oscillations (chaos), and coexistence of a stable periodic regime with a stable steady state (hard excitation) or with chaos. The relationship between these patterns of temporal self-organization is analyzed as a function of the control parameters of the model. Chaos and birhythmicity appear to be rare events in comparison with simple periodic behavior. We discuss the relevance of these results with respect to the regularity of most biological rhythms.
  // The parameters q1 = 50 and q2 = 0.02 are explicitely included as the stoichiometric coefficients of beta and gamma in the reactions r2 and r3, respectively. Parameter values and initial conditions [ks=1.99/sec, alpha(0)=29.19988, beta(0)=188.8, gamma(0)=0.3367] are for the chaotic regime presented in the upper-curve of Figure 3b.
  // biomodels.db:MODEL1102070000
  // biomodels.db:BIOMD0000000319
  // isDescribedBy pubmed:6960354
  // isVersionOf GO:0007622
  // hasTaxon taxonomy:131567

  // Compartments:
  compartment cell = 1;  // GO:0005622

  // Species:
  species alpha in cell = 29.19988;
  species beta in cell = 188.8;
  species gamma in cell = 0.3367;

  // Reactions:
  r1: => alpha; v_Km1;
    v_Km1 = 0.45 per_sec;
  r2: alpha => 50 beta; sigma1*alpha*(1 + alpha)*(1 + beta)^2/(L1 + (1 + alpha)^2*(1 + beta)^2);  // isVersionOf GO:0003824
    L1 = 500000000 dimensionless; sigma1 = 10 per_sec;
  r3: beta => 0.02 gamma; sigma2*beta*(1 + d*beta)*(1 + gamma)^2/(L2 + (1 + d*beta)^2*(1 + gamma)^2);  // isVersionOf GO:0003824
    L2 = 100 dimensionless; d = 0 dimensionless; sigma2 = 10 per_sec;
  r4: gamma => ; ks*gamma;
    ks = 1.99 per_sec;

  // Unit definitions:
  unit substance = dimensionless;
  unit volume = dimensionless;
  unit per_sec = 1 / second;
end
