// SBML level 2 version 4
// This model was downloaded from BioModels Database
// http://www.ebi.ac.uk/biomodels-static/

function Constant_flux__irreversible(v)
  v;
end
Constant_flux__irreversible is "Constant flux (irreversible)";

function Henri_Michaelis_Menten__irreversible(substrate, Km, V)
  V*substrate/(Km + substrate);
end
Henri_Michaelis_Menten__irreversible is "Henri-Michaelis-Menten (irreversible)";

function Irr_Michaelis_Menten__enzyme__userdefined(V, E, S, Km)
  V*E*S/(Km + S);
end
Irr_Michaelis_Menten__enzyme__userdefined is "Irr Michaelis-Menten (enzyme)[userdefined]";

function linear_activation(constant, Activator)
  constant*Activator;
end

model BIOMD0000000329()
  // Kummer2000 - Oscillations in Calcium Signalling
  // Simplified (3-variable) calcium oscillation model Kummer et al. (2000) Biophys. J. 79, 1188-1195 This model is defined in a small compartment with low concentrations. You can run it first with the LSODA ODE solver and then with the Gillespie Monte Carlo method (in Time Course widget). This illustrates that at low particle numbers, as here, the stochastic simulation and the ODE approach produce different results (the stochastic approach is more correct in these circumstances). This file also demonstrates the use of several different plots to visualize results, including a histogram.
  // This model is described in the article:
  // Switching from simple to complex oscillations in calcium signaling.
  // Kummer U, Olsen LF, Dixon CJ, Green AK, Bornberg-Bauer E, Baier G.
  // Biophys. J. 2000 Sep; 79(3): 1188-1195
  // Abstract:
  // We present a new model for calcium oscillations based on experiments in hepatocytes. The model considers feedback inhibition on the initial agonist receptor complex by calcium and activated phospholipase C, as well as receptor type-dependent self-enhanced behavior of the activated G(alpha) subunit. It is able to show simple periodic oscillations and periodic bursting, and it is the first model to display chaotic bursting in response to agonist stimulations. Moreover, our model offers a possible explanation for the differences in dynamic behavior observed in response to different agonists in hepatocytes.
  // This model is hosted on BioModels Database and identified by: BIOMD0000000329.
  // To cite BioModels Database, please use: BioModels Database: An enhanced, curated and annotated resource for published quantitative kinetic models.
  // To the extent possible under law, all copyright and related or neighbouring rights to this encoded model have been dedicated to the public domain worldwide. Please refer to CC0 Public Domain Dedication for more information.
  // biomodels.db:MODEL1105060000
  // biomodels.db:BIOMD0000000329
  // isDescribedBy pubmed:10968983
  // isVersionOf GO:0019722
  // hasTaxon taxonomy:10116
  // occursIn BTO:0000575

  // Compartments:
  compartment compartment = 1e-13;  // isVersionOf GO:0005623

  // Species:
  species a in compartment = 0.01; a is "G-alpha";  // isVersionOf uniprot:Q9JID2
  species b in compartment = 0.01; b is "activePLC";  // isVersionOf uniprot:P10687
  species c in compartment = 0.01; c is "Calcium";  // isVersionOf CHEBI:29108

  // Reactions:
  R1: => a; compartment*Constant_flux__irreversible(v);
    v = 0.212;
  R2: => a; compartment*linear_activation(R2_constant, a);
    R2_constant = 2.9;
  R3: a => ; compartment*Irr_Michaelis_Menten__enzyme__userdefined(R3_V, b, a, R3_Km);  // modifiers: b
    R3_V = 1.52; R3_Km = 0.19;
  R4: a => ; compartment*Irr_Michaelis_Menten__enzyme__userdefined(R4_V, c, a, R4_Km);  // modifiers: c
    R4_V = 4.88; R4_Km = 1.18;
  R5: => b; compartment*linear_activation(R5_constant, a);  // modifiers: a
    R5_constant = 1.24;
  R6: b => ; compartment*Henri_Michaelis_Menten__irreversible(b, R6_Km, R6_V);
    R6_Km = 29.09; R6_V = 32.24;
  R7: => c; compartment*linear_activation(R7_constant, a);  // modifiers: a
    R7_constant = 13.58;
  R8: c => ; compartment*Henri_Michaelis_Menten__irreversible(c, R8_Km, R8_V);
    R8_Km = 0.16; R8_V = 153;

  // Unit definitions:
  unit substance = 1e-9 mole;
end
