// SBML level 2 version 4
// This model was downloaded from BioModels Database
// http://www.ebi.ac.uk/biomodels-static/

model MODEL1209230000()
  // Bianconi2012 - EGFR and IGF1R pathway in lung cancer
  // EGFR and IGF1R pathways play a key role in various human cancers and are crucial for tumour transformation and survival of malignant cells. High EGFR and IGF1R expression and activity has been associated with multiple aspects of cancer progression including tumourigenesis, metastasis, resistance to chemotherapeutics and other molecularly targeted drugs. Here, the biological relationship between the proteins involved in EGFR and IGF1R pathways and the downstream MAPK and PIK3 networks has been modelled to study the time behaviour of the overall system, and the functional interdependencies among the receptors, the proteins and kinases involved.
  // This model is described in the article:
  // Computational model of EGFR and IGF1R pathways in lung cancer: a Systems Biology approach for Translational Oncology.
  // Bianconi F, Baldelli E, Ludovini V, Crinò L, Flacco A, Valigi P.
  // Biotechnol Adv. 2012 Jan-Feb;30(1):142-53.
  // Abstract:
  // In this paper we propose a Systems Biology approach to understand the molecular biology of the Epidermal Growth Factor Receptor (EGFR, also known as ErbB1/HER1) and type 1 Insulin-like Growth Factor (IGF1R) pathways in non-small cell lung cancer (NSCLC). This approach, combined with Translational Oncology methodologies, is used to address the experimental evidence of a close relationship among EGFR and IGF1R protein expression, by immunohistochemistry (IHC) and gene amplification, by in situ hybridization (FISH) and the corresponding ability to develop a more aggressive behavior. We develop a detailed in silico model, based on ordinary differential equations, of the pathways and study the dynamic implications of receptor alterations on the time behavior of the MAPK cascade down to ERK, which in turn governs proliferation and cell migration. In addition, an extensive sensitivity analysis of the proposed model is carried out and a simplified model is proposed which allows us to infer a similar relationship among EGFR and IGF1R activities and disease outcome.
  // This model is hosted on BioModels Database and identified by: MODEL1209230000 .
  // To cite BioModels Database, please use: BioModels Database: An enhanced, curated and annotated resource for published quantitative kinetic models .
  // To the extent possible under law, all copyright and related or neighbouring rights to this encoded model have been dedicated to the public domain worldwide. Please refer to CC0 Public Domain Dedication for more information.
  // biomodels.db:MODEL1209230000
  // biomodels.db:BIOMD0000000427
  // isDescribedBy pubmed:21620944
  // hasProperty mamo:MAMO_0000046
  // hasTaxon taxonomy:9606
  // isPartOf GO:0048009 GO:0007173 PW:0000703

  // Compartments:
  compartment cell_nsclc = 1;  // isVersionOf BTO:0002058

  // Species:
  species EGFR_active in cell_nsclc = 8000/cell_nsclc;  // isVersionOf uniprot:Q504U8
  species D_SOS in cell_nsclc = 120000/cell_nsclc;  // isVersionOf uniprot:Q07889
  species A_SOS in cell_nsclc = 0;  // isVersionOf uniprot:Q07889
  species Raf in cell_nsclc = 120000/cell_nsclc;  // isVersionOf uniprot:P04049
  species Ras_active in cell_nsclc = 0;  // isVersionOf uniprot:P62070
  species Mek_active in cell_nsclc = 0;  // isVersionOf uniprot:Q02750
  species ERK in cell_nsclc = 600000/cell_nsclc;  // isVersionOf uniprot:P27361
  species ERK_active in cell_nsclc = 0;  // isVersionOf uniprot:P27361
  species IGFR_active in cell_nsclc = 800/cell_nsclc;  // isVersionOf uniprot:Q9H665
  species PI3KCA in cell_nsclc = 120000/cell_nsclc;  // isVersionOf uniprot:O00443
  species PI3KCA_active in cell_nsclc = 0;  // isVersionOf uniprot:O00443
  species AKT_active in cell_nsclc = 0;  // isVersionOf uniprot:P31751
  // The initial concentration of AKT has been corrected from 120000 to 600000 after refering the matlab file
  species AKT in cell_nsclc = 600000/cell_nsclc;  // isVersionOf uniprot:P31751
  species PP2A in cell_nsclc = 120000/cell_nsclc;  // isVersionOf GO:0000159
  species Ras in cell_nsclc = 120000/cell_nsclc;  // isVersionOf uniprot:P62070
  species Raf_active in cell_nsclc = 0;  // isVersionOf uniprot:P04049
  species Mek in cell_nsclc = 600000/cell_nsclc;  // isVersionOf uniprot:Q02750
  species RasGapActive in cell_nsclc = 120000/cell_nsclc;  // hasPart uniprot:P62070
  species RafPP in cell_nsclc = 120000/cell_nsclc;  // isVersionOf uniprot:P04049
  species P90RskInactive in cell_nsclc = 120000/cell_nsclc;  // isVersionOf uniprot:Q9UK32
  species P90Rsk_Active in cell_nsclc = 0;  // isVersionOf uniprot:Q9UK32

  // Parameters:
  gamma_IGFR = 0.02;
  kd_PI3K_a = 0.005;
  k_P90Rsk_ERKActive = 0.0213697;
  KM_P90Rsk_ERKActive = 763523;
  gamma_EGFR = 0.02;

  // Reactions:
  SOS_conformational_activation: D_SOS + EGFR_active => A_SOS + EGFR_active; k_SOS_E*EGFR_active*D_SOS^n_SOS/(KM_SOS_E^n_SOS + D_SOS^n_SOS);
    k_SOS_E = 694.731; n_SOS = 1; KM_SOS_E = 6086070;
  kRas_Activation: A_SOS + Ras => Ras_active + A_SOS; A_SOS*k_Ras_SOS*Ras^n_Ras_SOS/(KM_Ras_SOS^n_Ras_SOS + Ras^n_Ras_SOS);
    k_Ras_SOS = 32.344; n_Ras_SOS = 1; KM_Ras_SOS = 3.59543e4;
  EGFR_degradation: EGFR_active => ; gamma_EGFR*EGFR_active;
  ERK_activationBy_Mek: ERK + Mek_active => ERK_active + Mek_active; Mek_active*k_ERK_MekActive*ERK/(KM_ERK_MekActive + ERK); ERK_activationBy_Mek is "ERK activation by Mek";
    k_ERK_MekActive = 9.85367; KM_ERK_MekActive = 1007340;
  SOS_deactivationBy_P90: P90Rsk_Active + A_SOS => D_SOS + P90Rsk_Active; P90Rsk_Active*k_D_SOS_P90Rsk*A_SOS^n_D_SOS/(KM_D_SOS_P90Rsk^n_D_SOS + A_SOS^n_D_SOS); SOS_deactivationBy_P90 is "SOS deactivation by P90";
    k_D_SOS_P90Rsk = 161197; n_D_SOS = 1; KM_D_SOS_P90Rsk = 896896;
  SOS_activationBy_IGF: IGFR_active + D_SOS => A_SOS + IGFR_active; IGFR_active*k_A_SOS_I*D_SOS^n_A_SOS_I/(KM_A_SOS_I^n_A_SOS_I + D_SOS^n_A_SOS_I); SOS_activationBy_IGF is "SOS activation by IGF";
    k_A_SOS_I = 500; n_A_SOS_I = 1; KM_A_SOS_I = 100000;
  PI3KCA_activationBy_IGF1R: PI3KCA + IGFR_active => PI3KCA_active + IGFR_active; IGFR_active*k_PI3K_IGF1R*PI3KCA^n_PI3K_I/(KM_PI3K_IGF1R^n_PI3K_I + PI3KCA^n_PI3K_I); PI3KCA_activationBy_IGF1R is "PI3KCA activation by IGF1R";
    k_PI3K_IGF1R = 10.6737; n_PI3K_I = 1; KM_PI3K_IGF1R = 184912;
  PI3KCA_activationBy_EGF: PI3KCA + EGFR_active => PI3KCA_active + EGFR_active; EGFR_active*k_PI3K_EGF1R*EGFR_active*PI3KCA^n_PI3K_E/(KM_PI3K_EGF1R^n_PI3K_E + PI3KCA^n_PI3K_E); PI3KCA_activationBy_EGF is "PI3KCA activation by EGF";
    k_PI3K_EGF1R = 10.6737; n_PI3K_E = 1; KM_PI3K_EGF1R = 184912;
  Akt_activationBy_PI3KCA: AKT + PI3KCA_active => AKT_active + PI3KCA_active; PI3KCA_active*k_AKT_PI3K*AKT^n_AKT_PI3K/(KM_AKT_PI3K^n_AKT_PI3K + AKT^n_AKT_PI3K); Akt_activationBy_PI3KCA is "Akt activation by PI3KCA";
    k_AKT_PI3K = 0.0566279; n_AKT_PI3K = 1; KM_AKT_PI3K = 653951;
  Akt_deactivation: AKT_active => AKT; kd_AKT*AKT_active;
    kd_AKT = 0.005;
  ERK_deactivationBy_PP2A: ERK_active + PP2A => ERK + PP2A; PP2A*k_ERKactive_PP2A*ERK_active^n_ERKactive_PP2A/(KM_ERKactive_PP2A^n_ERKactive_PP2A + ERK_active^n_ERKactive_PP2A); ERK_deactivationBy_PP2A is "ERK deactivation by PP2A";
    k_ERKactive_PP2A = 8.8912; n_ERKactive_PP2A = 1; KM_ERKactive_PP2A = 3496490;
  PI3KCA_activationBy_kRas: PI3KCA + Ras_active => PI3KCA_active + Ras_active; Ras_active*k_PI3K_Ras*PI3KCA^n_PI3K_Ras/(KM_PI3K_Ras^n_PI3K_Ras + PI3KCA^n_PI3K_Ras); PI3KCA_activationBy_kRas is "PI3KCA activation by kRas";
    k_PI3K_Ras = 0.0771067; n_PI3K_Ras = 1; KM_PI3K_Ras = 272056;
  Raf_activationBy_kRas: Ras_active + Raf => Raf_active + Ras_active; Ras_active*k_Raf_RasActive*Raf^n_Raf_RasActive/(KM_Raf_RasActive + Raf^n_Raf_RasActive); Raf_activationBy_kRas is "Raf activation by kRas";
    k_Raf_RasActive = 0.884096; n_Raf_RasActive = 1; KM_Raf_RasActive = 6.24646e4;
  Mek_activationBy_Raf: Raf_active + Mek => Mek_active + Raf_active; Raf_active*k_Mek_PP2A*Mek^n_Mek_PP2A/(KM_MekPP2A^n_Mek_PP2A + Mek^n_Mek_PP2A); Mek_activationBy_Raf is "Mek activation by Raf";
    k_Mek_PP2A = 185.759; n_Mek_PP2A = 1; KM_MekPP2A = 4768350;
  Raf_deactivationBy_Akt: AKT_active + Raf_active => Raf + AKT_active; AKT_active*k_Raf_AKT*Raf_active^n_Raf_AKT/(KM_Raf_AKT^n_Raf_AKT + Raf_active^n_Raf_AKT); Raf_deactivationBy_Akt is "Raf deactivation by Akt";
    k_Raf_AKT = 15.1212; n_Raf_AKT = 1; KM_Raf_AKT = 119355;
  Ras_deactivation: RasGapActive + Ras_active => Ras + RasGapActive; RasGapActive*k_RasActiveRasGap*Ras_active^n_RasActiveRasGap/(KM_RasActiveRasGap^n_RasActiveRasGap + Ras_active^n_RasActiveRasGap); Ras_deactivation is "Ras deactivation by RasGab";
    k_RasActiveRasGap = 1509.36; n_RasActiveRasGap = 1; KM_RasActiveRasGap = 1432410;
  Mek_deactivation: PP2A + Mek_active => Mek + PP2A; PP2A*k_MekActivePP2A*Mek_active^n_MekActivePP2A/(KM_MekActivePP2A^n_MekActivePP2A + Mek_active^n_MekActivePP2A); Mek_deactivation is "Mek deactivation by PP2A";
    k_MekActivePP2A = 2.83243; n_MekActivePP2A = 1; KM_MekActivePP2A = 518753;
  IGFR_active_degradation: IGFR_active => ; gamma_IGFR*IGFR_active;
  PI3KCA_deactivation: PI3KCA_active => PI3KCA; kd_PI3K_a*PI3KCA_active;
  Raf_deactivation: RafPP + Raf_active => Raf + RafPP; RafPP*k_RasActive_RafPP*Raf_active^n_RasActive_RafPP/(KM_RasActive_RafPP^n_RasActive_RafPP + Raf_active^n_RasActive_RafPP); Raf_deactivation is "Raf deactivation by RafPP";
    k_RasActive_RafPP = 0.126329; n_RasActive_RafPP = 1; KM_RasActive_RafPP = 1061.71;
  P90_activationBy_ERK: P90RskInactive + ERK_active => P90Rsk_Active + ERK_active; ERK_active*k_P90Rsk_ERKActive*P90RskInactive/(KM_P90Rsk_ERKActive + P90RskInactive); P90_activationBy_ERK is "P90 activation by ERK";
  P90_deactivation: P90Rsk_Active => P90RskInactive; kd_P90Rsk*P90Rsk_Active;
    kd_P90Rsk = 0.005;
end
