// SBML level 2 version 4
// This model was downloaded from BioModels Database
// http://www.ebi.ac.uk/biomodels-static/

function Lateral_inhibition_1(theta, a, Xj, n)
  theta/(theta + a*Xj^n);
end
Lateral_inhibition_1 is "Lateral inhibition [1]";

function Lateral_stabilisation_1(theta, b, Yi, Yj, n, c, Xi)
  (theta + b*(Yi*Yj)^n)/(theta + c*Xi^n + b*(Yi*Yj)^n);
end
Lateral_stabilisation_1 is "Lateral stabilisation [1]";

model MODEL1211010000()
  // deBack2012 - Lineage Specification in Pancreas Development
  // This model of two neighbouring pancreas precursor cells, describes the exocrine versus endocrine lineage specification process. To account for the tissue scale patterns, this couplet model has been extended to hundreds of coupled cells.
  // This model is described in the article:
  // On the role of lateral stabilization during early patterning in the pancreas
  // de Back W., Zhou JX, Brusch L
  // J. R. Soc. Interface 6 February 2013 vol. 10 no. 79 20120766
  // Abstract:
  // The cell fate decision of multi-potent pancreatic progenitor cells between the exocrine and endocrine lineages is regulated by Notch signalling, mediated by cell–cell interactions. However, canonical models of Notch-mediated lateral inhibition cannot explain the scattered spatial distribution of endocrine cells and the cell-type ratio in the developing pancreas. Based on evidence from acinar-to-islet cell transdifferentiation in vitro, we propose that lateral stabilization, i.e. positive feedback between adjacent progenitor cells, acts in parallel with lateral inhibition to regulate pattern formation in the pancreas. A simple mathematical model of transcriptional regulation and cell–cell interaction reveals the existence of multi-stability of spatial patterns whose simultaneous occurrence causes scattering of endocrine cells in the presence of noise. The scattering pattern allows for control of the endocrine-to-exocrine cell-type ratio by modulation of lateral stabilization strength. These theoretical results suggest a previously unrecognized role for lateral stabilization in lineage specification, spatial patterning and cell-type ratio control in organ development.
  // This model is hosted on BioModels Database and identified by: MODEL1211010000 .
  // To cite BioModels Database, please use: BioModels Database: An enhanced, curated and annotated resource for published quantitative kinetic models .
  // To the extent possible under law, all copyright and related or neighbouring rights to this encoded model have been dedicated to the public domain worldwide. Please refer to CC0 Public Domain Dedication for more information.
  // biomodels.db:MODEL1211010000
  // biomodels.db:BIOMD0000000435
  // isDescribedBy pubmed:23193107
  // isPartOf GO:0031016
  // hasTaxon taxonomy:39107
  // isVersionOf GO:0007267

  // Compartments:
  compartment compartment_1 = 1;  // isVersionOf GO:0005623

  // Species:
  species Xi in compartment_1 = 0;  // isVersionOf uniprot:P70661
  species Yi in compartment_1 = 0;  // isVersionOf uniprot:Q9QX98
  species Xj in compartment_1 = 0;  // isVersionOf uniprot:P70661
  species Yj in compartment_1 = 0;  // isVersionOf uniprot:Q9QX98

  // Reactions:
  Xi_expr: => Xi; compartment_1*Lateral_inhibition_1(Xi_expr_theta, Xi_expr_a, Xj, Xi_expr_n);  // modifiers: Xj; isVersionOf GO:0006412
    Xi_expr_theta = 0.0001; Xi_expr_a = 1; Xi_expr_n = 4;
  Xi_degr: Xi => ; compartment_1*Xi_degr_k1*Xi;  // isVersionOf GO:0030163
    Xi_degr_k1 = 1;
  Yi_expr: => Yi; compartment_1*Lateral_stabilisation_1(Yi_expr_theta, Yi_expr_b, Yi, Yj, Yi_expr_n, Yi_expr_c, Xi);  // modifiers: Yj, Xi; isVersionOf GO:0006412
    Yi_expr_theta = 0.0001; Yi_expr_b = 21; Yi_expr_n = 4; Yi_expr_c = 1;
  Yi_degr: Yi => ; compartment_1*Yi_degr_k1*Yi;  // isVersionOf GO:0030163
    Yi_degr_k1 = 1;
  Xj_expr: => Xj; compartment_1*Lateral_inhibition_1(Xj_expr_theta, Xj_expr_a, Xi, Xj_expr_n);  // modifiers: Xi; isVersionOf GO:0006412
    Xj_expr_theta = 0.0001; Xj_expr_a = 1; Xj_expr_n = 4;
  Xj_degr: Xj => ; compartment_1*Xj_degr_k1*Xj;  // isVersionOf GO:0030163
    Xj_degr_k1 = 1;
  Yj_expr: => Yj; compartment_1*Lateral_stabilisation_1(Yj_expr_theta, Yj_expr_b, Yi, Yj, Yj_expr_n, Yj_expr_c, Xj);  // modifiers: Yi, Xj; isVersionOf GO:0006412
    Yj_expr_theta = 0.0001; Yj_expr_b = 21; Yj_expr_n = 4; Yj_expr_c = 1;
  Yj_degr: Yj => ; compartment_1*Yj_degr_k1*Yj;  // isVersionOf GO:0030163
    Yj_degr_k1 = 1;

  // Unit definitions:
  unit volume = 1e-3 litre;
  unit time = 60 second;
  unit substance = 1e-3 mole;
end
