// SBML level 2 version 4
// This model was downloaded from BioModels Database
// http://www.ebi.ac.uk/biomodels-static/
// dcterms:bibliographicCitation: http://identifiers.org/pubmed/23009856

function Constant_flux_irreversible(v)
  v;
end
Constant_flux_irreversible is "Constant flux (irreversible)";

model MODEL1303130000()
  // Venkatraman2012 - Interplay between PLS and TSP1 in TGF-β1 activation
  // The interplay between PLS (Plasmin) and TSP1 (Thrombospondin-1) in TGF-β1 (Transforming growth factor-β1)is shown using mathematical modelling and in vitro experimentents.
  // This model is described in the article:
  // Plasmin triggers a switch-like decrease in thrombospondin-dependent activation of TGF-β1.
  // Venkatraman L, Chia SM, Narmada BC, White JK, Bhowmick SS, Forbes Dewey C Jr, So PT, Tucker-Kellogg L, Yu H.
  // Biophys J. 2012 Sep 5;103(5):1060-8.
  // Abstract:
  // Transforming growth factor-β1 (TGF-β1) is a potent regulator of extracellular matrix production, wound healing, differentiation, and immune response, and is implicated in the progression of fibrotic diseases and cancer. Extracellular activation of TGF-β1 from its latent form provides spatiotemporal control over TGF-β1 signaling, but the current understanding of TGF-β1 activation does not emphasize cross talk between activators. Plasmin (PLS) and thrombospondin-1 (TSP1) have been studied individually as activators of TGF-β1, and in this work we used a systems-level approach with mathematical modeling and in vitro experiments to study the interplay between PLS and TSP1 in TGF-β1 activation. Simulations and steady-state analysis predicted a switch-like bistable transition between two levels of active TGF-β1, with an inverse correlation between PLS and TSP1. In particular, the model predicted that increasing PLS breaks a TSP1-TGF-β1 positive feedback loop and causes an unexpected net decrease in TGF-β1 activation. To test these predictions in vitro, we treated rat hepatocytes and hepatic stellate cells with PLS, which caused proteolytic cleavage of TSP1 and decreased activation of TGF-β1. The TGF-β1 activation levels showed a cooperative dose response, and a test of hysteresis in the cocultured cells validated that TGF-β1 activation is bistable. We conclude that switch-like behavior arises from natural competition between two distinct modes of TGF-β1 activation: a TSP1-mediated mode of high activation and a PLS-mediated mode of low activation. This switch suggests an explanation for the unexpected effects of the plasminogen activation system on TGF-β1 in fibrotic diseases in vivo, as well as novel prognostic and therapeutic approaches for diseases with TGF-β dysregulation.
  // This model is hosted on BioModels Database and identified by: MODEL1303130000 .
  // To cite BioModels Database, please use: BioModels Database: An enhanced, curated and annotated resource for published quantitative kinetic models .
  // To the extent possible under law, all copyright and related or neighbouring rights to this encoded model have been dedicated to the public domain worldwide. Please refer to CC0 Public Domain Dedication for more information.
  // biomodels.db:MODEL1303130000
  // biomodels.db:BIOMD0000000447
  // isDescribedBy pubmed:23009856
  // isDerivedFrom biomodels.db:MODEL1303130001
  // isVersionOf GO:0036363 GO:0070053
  // hasTaxon taxonomy:10117

  // Compartments:
  compartment compartment_1 = 1;  // isVersionOf GO:0005623

  // Species:
  species PLG in compartment_1 = 0.003;  // isVersionOf uniprot:Q01177
  species PLS in compartment_1 = 0;  // isVersionOf ec-code:3.4.21.7
  species scUPA in compartment_1 = 0.001;  // isVersionOf uniprot:P29598; hasProperty PATO:0002355
  species tcUPA in compartment_1 = 0;  // isVersionOf uniprot:P29598; hasProperty PATO:0002354
  species LTGFb1 in compartment_1 = 0.001;  // isVersionOf uniprot:P17246; hasProperty PATO:0002355
  species TGFb1 in compartment_1 = 0;  // isVersionOf uniprot:P17246
  species TSP1 in compartment_1 = 0;  // isVersionOf uniprot:Q71SA3
  species PAI1 in compartment_1 = 0;  // isVersionOf uniprot:P20961
  species TSP1_PLS in compartment_1 = 0; TSP1_PLS is "TSP1:PLS";  // hasPart ec-code:3.4.21.7 uniprot:Q71SA3
  species A2M in compartment_1 = 0.005;  // isVersionOf uniprot:P06238
  species A2M_PLS in compartment_1 = 0; A2M_PLS is "A2M:PLS";  // hasPart ec-code:3.4.21.7 uniprot:P06238
  species PAI1_tcUPA in compartment_1 = 0; PAI1_tcUPA is "PAI1:tcUPA";  // hasPart uniprot:P20961 uniprot:P29598; hasProperty PATO:0002354
  species PAI1_scUPA in compartment_1 = 0; PAI1_scUPA is "PAI1:scUPA";  // hasPart uniprot:P29598 uniprot:P20961; hasProperty PATO:0002355

  // Parameters:
  keff1 = 0.035;
  keff2 = 0.35;
  keff3 = 1.4;
  k1 = 0.035;
  k2 = 24.5;
  kothers = 0.005;
  kp1 = 0.35;
  kp2 = 1.05;
  k3 = 17.5;
  k_3 = 0.0245;
  k4 = 0.35;
  k5 = 24.5;
  k_5 = 0.0105;
  k6 = 0.035;
  k_6 = 0.0035;
  k7 = 0.07;
  k_7 = 0.0035;
  k8 = 24.5;
  k9 = 0.21;
  u_edeg = 0.0525;
  u_pdeg = 0.0175;
  alpha1 = 0.0035;
  alpha2 = 0.035;

  // Reactions:
  reaction_1: scUPA + PLG => PLS + scUPA; compartment_1*keff1*scUPA*PLG;
  reaction_2: PLS + scUPA => tcUPA + PLS; compartment_1*keff2*PLS*scUPA;
  reaction_3: tcUPA + PLG => PLS + tcUPA; compartment_1*keff3*tcUPA*PLG;
  reaction_4: PLS + LTGFb1 => TGFb1 + PLS; compartment_1*k1*PLS*LTGFb1;
  reaction_5: TSP1 + LTGFb1 => TGFb1; compartment_1*k2*TSP1*LTGFb1;
  reaction_6: LTGFb1 => TGFb1; compartment_1*kothers*LTGFb1;
  reaction_7: TGFb1 => TGFb1 + TSP1; compartment_1*kp1*TGFb1;
  reaction_8: TGFb1 => TGFb1 + PAI1; compartment_1*kp2*TGFb1;
  reaction_9: TSP1 + PLS -> TSP1_PLS; compartment_1*(k3*TSP1*PLS - k_3*TSP1_PLS);
  reaction_10: TSP1_PLS => PLS; compartment_1*k4*TSP1_PLS;
  reaction_11: A2M + PLS -> A2M_PLS; compartment_1*(k5*A2M*PLS - k_5*A2M_PLS);
  reaction_12: PAI1 + tcUPA -> PAI1_tcUPA; compartment_1*(k6*PAI1*tcUPA - k_6*PAI1_tcUPA);
  reaction_13: PAI1 + scUPA -> PAI1_scUPA; compartment_1*(k7*PAI1*scUPA - k_7*PAI1_scUPA);
  reaction_14: => scUPA; compartment_1*Constant_flux_irreversible(alpha1);
  reaction_15: => LTGFb1; compartment_1*Constant_flux_irreversible(alpha1);
  reaction_16: => A2M; compartment_1*Constant_flux_irreversible(alpha1);
  reaction_17: => PLG; compartment_1*Constant_flux_irreversible(alpha2);
  reaction_18: scUPA => ; compartment_1*u_edeg*scUPA;
  reaction_19: tcUPA => ; compartment_1*u_edeg*tcUPA;
  reaction_20: PLS => ; compartment_1*u_edeg*PLS;
  reaction_21: TSP1 => ; compartment_1*u_pdeg*TSP1;
  reaction_22: PAI1 => ; compartment_1*u_pdeg*PAI1;
  reaction_23: LTGFb1 => ; compartment_1*u_pdeg*LTGFb1;
  reaction_24: TGFb1 => ; compartment_1*u_pdeg*TGFb1;
  reaction_25: PLG => ; compartment_1*u_pdeg*PLG;
  reaction_26: A2M => ; compartment_1*u_pdeg*A2M;
  reaction_27: A2M_PLS => ; compartment_1*u_pdeg*A2M_PLS; reaction_27 is "reaction_28";
  reaction_28: PAI1_tcUPA => ; compartment_1*u_pdeg*PAI1_tcUPA; reaction_28 is "reaction_29";
  reaction_29: PAI1_scUPA => ; compartment_1*u_pdeg*PAI1_scUPA; reaction_29 is "reaction_30";
  reaction_30: TSP1_PLS => ; compartment_1*u_pdeg*TSP1_PLS; reaction_30 is "reaction_27";
  reaction_31: TSP1_PLS => ; compartment_1*k8*TSP1_PLS;
  reaction_32: TGFb1 => ; compartment_1*k9*TGFb1;

  // Unit definitions:
  unit substance = 1e-6 mole;
end
