// SBML level 2 version 4
// This model was downloaded from BioModels Database
// http://www.ebi.ac.uk/biomodels-static/

model BIOMD0000000462()
  // Proctor2012 - Role of Amyloid-beta dimers in aggregation formation
  // Proctor2012 - Amyloid-beta aggregation
  // This model supports the current thinking that levels of dimers are important in initiating the aggregation process.
  // This model is described in the article:
  // Aggregation, impaired degradation and immunization targeting of amyloid-beta dimers in Alzheimer's disease: a stochastic modelling approach.
  // Proctor CJ, Pienaar IS, Elson JL, Kirkwood TB
  // Molecular Neurodegeneration. 2012; 7:32
  // Abstract:
  // BACKGROUND: Alzheimer's disease (AD) is the most frequently diagnosed neurodegenerative disorder affecting humans, with advanced age being the most prominent risk factor for developing AD. Despite intense research efforts aimed at elucidating the precise molecular underpinnings of AD, a definitive answer is still lacking. In recent years, consensus has grown that dimerisation of the polypeptide amyloid-beta (Aß), particularly Aß₄₂, plays a crucial role in the neuropathology that characterise AD-affected post-mortem brains, including the large-scale accumulation of fibrils, also referred to as senile plaques. This has led to the realistic hope that targeting Aß₄₂ immunotherapeutically could drastically reduce plaque burden in the ageing brain, thus delaying AD onset or symptom progression. Stochastic modelling is a useful tool for increasing understanding of the processes underlying complex systems-affecting disorders such as AD, providing a rapid and inexpensive strategy for testing putative new therapies. In light of the tool's utility, we developed computer simulation models to examine Aß₄₂ turnover and its aggregation in detail and to test the effect of immunization against Aß dimers.
  // RESULTS: Our model demonstrates for the first time that even a slight decrease in the clearance rate of Aß₄₂ monomers is sufficient to increase the chance of dimers forming, which could act as instigators of protofibril and fibril formation, resulting in increased plaque levels. As the process is slow and levels of Aβ are normally low, stochastic effects are important. Our model predicts that reducing the rate of dimerisation leads to a significant reduction in plaque levels and delays onset of plaque formation. The model was used to test the effect of an antibody mediated immunological response. Our results showed that plaque levels were reduced compared to conditions where antibodies are not present.
  // CONCLUSION: Our model supports the current thinking that levels of dimers are important in initiating the aggregation process. Although substantial knowledge exists regarding the process, no therapeutic intervention is on offer that reliably decreases disease burden in AD patients. Computer modelling could serve as one of a number of tools to examine both the validity of reliable biomarkers and aid the discovery of successful intervention strategies.
  // This model is hosted on BioModels Database and identified by: BIOMD0000000462 .
  // To cite BioModels Database, please use: BioModels Database: An enhanced, curated and annotated resource for published quantitative kinetic models .
  // To the extent possible under law, all copyright and related or neighbouring rights to this encoded model have been dedicated to the public domain worldwide. Please refer to CC0 Public Domain Dedication for more information.
  // biomodels.db:MODEL1202290000
  // biomodels.db:BIOMD0000000462
  // isDescribedBy pubmed:22748062
  // hasProperty DOID:10652
  // isVersionOf GO:0097242 GO:0070841
  // hasTaxon taxonomy:9606

  // Compartments:
  compartment cell = 1;

  // Species:
  substanceOnly species Abeta in cell = 0; Abeta is "AbetaMonomer";  // isVersionOf CHEBI:64645
  substanceOnly species AbDim in cell = 0; AbDim is "AbetaDimer";  // isVersionOf CHEBI:64645 GO:0043234
  substanceOnly species AbP in cell = 0; AbP is "AbetaPlaque";  // isVersionOf CHEBI:64645 BTO:0002774
  substanceOnly species $Source in cell = 1;
  substanceOnly species $Sink in cell = 1;
  substanceOnly species Nep in cell = 1000; Nep is "Neprilysin";  // isVersionOf uniprot:P08473

  // Parameters:
  kprod = 1.86e-5;
  kdeg = 2.1e-5;
  kdimer = 1.1783e-7;
  kdedimer = 8.4655e-6;
  kdisagg = 5.4357e-5;
  kpf = 2.785e-6;
  kpg = 0.00574;
  kpghalf = 4;
  kdegNep = 1.8e-10;

  // Reactions:
  Abetaproduction: $Source => Abeta; kprod*Source;
  AbetaDegradation: Abeta + Nep => $Sink + Nep; kdeg*Abeta*Nep*0.001;
  AbetaDimerisation: 2 Abeta => AbDim; kdimer*Abeta*(Abeta - 1)*0.5;
  AbetaDedimerisation: AbDim => 2 Abeta; kdedimer*AbDim;
  AbetaPlaqueFormation: 2 AbDim => 4 AbP; kpf*AbDim*(AbDim - 1)*0.5;
  AbetaPlaqueGrowth: Abeta + AbP => 2 AbP; kpg*Abeta*AbP^2/(kpghalf^2 + AbP^2);
  AbetaDisaggregation: AbP => Abeta; kdisagg*AbP;
  NepDegradation: Nep => $Sink; kdegNep*Nep;

  // Unit definitions:
  unit substance = item;
end
