// SBML level 2 version 4
// This model was downloaded from BioModels Database
// http://www.ebi.ac.uk/biomodels-static/

model MODEL1302180004()
  // Koo2013 - Shear stress induced AKT and eNOS phosphorylation - Model 2
  // biomodels.db:MODEL1302180004
  // biomodels.db:BIOMD0000000465
  // isDescribedBy pubmed:23708369
  // hasTaxon taxonomy:9606
  // isVersionOf reactome:REACT_12443.3
  // isVersionOf GO:0034405

  // Compartments:
  compartment default = 1 volume;
  compartment Cell in default = 1 volume;  // GO:0005623

  // Species:
  substanceOnly species PDK1 in Cell = 0.246;  // isVersionOf uniprot:O15530
  substanceOnly species PP2A in Cell = 150;  // isVersionOf GO:0000159
  substanceOnly species AKT in Cell = 167.616;  // isVersionOf uniprot:P31749
  substanceOnly species PI3P in Cell = 0.345;  // isVersionOf pubchem.compound:53480352
  substanceOnly species PTEN in Cell = 0.1;  // isVersionOf uniprot:P60484
  substanceOnly species PIP2 in Cell = 6967.271;  // isVersionOf CHEBI:18348
  substanceOnly species p_PI3K in Cell = 0.03; p_PI3K is "p-PI3K";  // hasProperty MOD:00696; hasProperty interpro:IPR000403
  substanceOnly species s3 in Cell = 0;
  substanceOnly species PI3K in Cell = 99.97;  // hasProperty interpro:IPR000403
  substanceOnly species Time in Cell = 0;
  substanceOnly species PDK2 in Cell = 3;  // isVersionOf uniprot:Q15119
  substanceOnly species PDK1_cyto in Cell = 999.754;  // isVersionOf uniprot:O15530; occursIn GO:0005622
  substanceOnly species p_AKT_PI3P in Cell = 1.457; p_AKT_PI3P is "p-AKT:PI3P";  // hasPart uniprot:P31749 pubchem.compound:53480352; hasProperty MOD:00696
  substanceOnly species pp_AKT_PI3P in Cell = 1.723; pp_AKT_PI3P is "pp-AKT:PI3P";  // hasPart uniprot:P31749 pubchem.compound:53480352; hasProperty MOD:00696
  substanceOnly species AKT_PI3P in Cell = 29.203; AKT_PI3P is "AKT:PI3P";  // hasPart uniprot:P31749 pubchem.compound:53480352
  substanceOnly species Shear_Stress in default = 0;  // occursIn GO:0005576

  // Reactions:
  re57: PI3K -> p_PI3K; exp(unity - (Time/tf)^1.8)*normal*(Time/unimol)^0.8*(unity - (Time/tf)^1.8);  // modifiers: Time, Shear_Stress
    normal = 0.907 sub_sec; unity = 1 dimensionless; unimol = 1 substance; tf = 15 substance;
  re58: PIP2 => PI3P; k2*PIP2*p_PI3K/(Km2 + PIP2);  // modifiers: p_PI3K
    k2 = 0.2 inv_sec; Km2 = 6170 substance;
  re59: PI3P => PIP2; k3*PI3P*PTEN/(Km3 + PI3P);  // modifiers: PTEN
    k3 = 7.5 inv_sec; Km3 = 80.9 substance;
  re60: PI3P + AKT -> AKT_PI3P; k4*PI3P*AKT - kr4*AKT_PI3P;
    k4 = 0.045 inv_sec_sub; kr4 = 0.089 inv_sec;
  re61: AKT_PI3P => p_AKT_PI3P; k8*AKT_PI3P*PDK1/(Km8 + AKT_PI3P);  // modifiers: PDK1
    k8 = 20 inv_sec; Km8 = 80000 substance;
  re62: p_AKT_PI3P => pp_AKT_PI3P; k10*p_AKT_PI3P*PDK2/(Km10 + p_AKT_PI3P);  // modifiers: PDK2
    k10 = 20 inv_sec; Km10 = 80000 substance;
  re63: p_AKT_PI3P => AKT_PI3P; k7*p_AKT_PI3P*PP2A/(Km7 + p_AKT_PI3P);  // modifiers: PP2A
    k7 = 0.037 inv_sec; Km7 = 8800 substance;
  re64: pp_AKT_PI3P => p_AKT_PI3P; k9*pp_AKT_PI3P*PP2A/(Km9 + pp_AKT_PI3P);  // modifiers: PP2A
    k9 = 0.04 inv_sec; Km9 = 48000 substance;
  re65: pp_AKT_PI3P => PI3P + AKT; k11*pp_AKT_PI3P*PP2A/(Km11 + pp_AKT_PI3P);  // modifiers: PP2A
    k11 = 0.163 inv_sec; Km11 = 48000 substance;
  re66: PDK1_cyto => PDK1; k5*PI3P*PDK1_cyto;  // modifiers: PI3P
    k5 = 0.0007 inv_sec_sub;
  re67: PDK1 => PDK1_cyto; k6*PDK1;
    k6 = 0.98 inv_sec;
  re68: s3 => Time; unitime;
    unitime = 1 sub_sec;

  // Unit definitions:
  unit time = second;
  unit substance = 1e-9 mole;
  unit area = metre^2;
  unit length = metre;
  unit volume = litre;
  unit sub_sec = 1e-9 mole / second;
  unit inv_sec = 1 / second;
  unit inv_sec_sub = 1 / (1e-9 mole * second);
  unit nM_inv_s = 1e-9 mole / second;
  unit inv_nM_s = 1 / (1e-9 mole * second);
end
