// SBML level 2 version 4
// This model was downloaded from BioModels Database
// http://www.ebi.ac.uk/biomodels-static/

model MODEL1302180005()
  // Koo2013 - Shear stress induced eNOS expression - Model 3
  // biomodels.db:MODEL1302180005
  // biomodels.db:BIOMD0000000466
  // isDescribedBy pubmed:23708369
  // hasTaxon taxonomy:9606
  // isVersionOf reactome:REACT_12443.3
  // isVersionOf GO:0034405

  // Compartments:
  compartment default = 1 volume;
  compartment Cell in default = 1 volume;  // GO:0005623
  compartment nucleus in Cell = 1 volume;  // isVersionOf GO:0005634

  // Species:
  substanceOnly species s35 in Cell = 0;
  substanceOnly species s37 in Cell = 10000;
  substanceOnly species pre_time in Cell = 0;
  substanceOnly species Time in Cell = 0;
  substanceOnly species AP_1 in nucleus = 50; AP_1 is "AP-1";
  substanceOnly species pp_JNKK in Cell = 0.006; pp_JNKK is "pp-JNKK";  // isVersionOf uniprot:O14733; hasProperty MOD:00696
  substanceOnly species pp_JNK in Cell = 0; pp_JNK is "pp-JNK";  // isVersionOf uniprot:P45983; hasProperty MOD:00696
  substanceOnly species s49 in Cell = 10; s49 is "KLF2";  // isVersionOf uniprot:Q9Y5W3
  substanceOnly species eNOS_Cav_1 in Cell = 34.98; eNOS_Cav_1 is "eNOS-Cav-1";  // hasPart ensembl:ENST00000297494 uniprot:Q03135
  substanceOnly species Shc in Cell = 819.25;  // isVersionOf uniprot:P29353
  substanceOnly species p_Src in Cell = 18; p_Src is "p-Src";  // isVersionOf uniprot:P12931; hasProperty MOD:00696
  substanceOnly species p_FAK in Cell = 0.605; p_FAK is "p-FAK";  // isVersionOf uniprot:Q05397; hasProperty MOD:00696
  substanceOnly species Src in Cell = 72;  // isVersionOf uniprot:P12931
  substanceOnly species FAK in Cell = 57;  // isVersionOf uniprot:Q05397
  substanceOnly species JNKK in Cell = 299.706;  // isVersionOf uniprot:O14733
  substanceOnly species MEKK1 in Cell = 98.514;  // isVersionOf uniprot:Q13233
  substanceOnly species p_Shc in Cell = 157.162; p_Shc is "p-Shc";  // isVersionOf uniprot:P29353; hasProperty MOD:00696
  substanceOnly species JNK in Cell = 299.997;  // isVersionOf uniprot:P45983
  substanceOnly species p_JNKK in Cell = 0.288; p_JNKK is "p-JNKK";  // isVersionOf uniprot:O14733; hasProperty MOD:00696
  substanceOnly species p_MEKK1 in Cell = 1.486; p_MEKK1 is "p-MEKK1";  // isVersionOf uniprot:Q13233; hasProperty MOD:00696
  substanceOnly species Ras_GTP in Cell = 0.616; Ras_GTP is "Ras:GTP";  // hasPart CHEBI:57600 uniprot:P01112
  substanceOnly species Ras_GDP in Cell = 119.384; Ras_GDP is "Ras:GDP";  // hasPart CHEBI:17552 uniprot:P01112
  substanceOnly species p_JNK in Cell = 0.003; p_JNK is "p-JNK";  // isVersionOf uniprot:P45983; hasProperty MOD:00696
  substanceOnly species s105 in Cell = 0; s105 is "KLF2";  // encodes uniprot:Q9Y5W3
  substanceOnly species eNOS_Cell in Cell = 3.214;  // isEncodedBy ncbigene:4846
  substanceOnly species aAP_1 in nucleus = 0; aAP_1 is "aAP-1";  // hasProperty MOD:00000
  substanceOnly species s108 in nucleus = 0; s108 is "eNOS";  // isVersionOf ncbigene:4846
  substanceOnly species p_FAK_Shc in Cell = 0.857; p_FAK_Shc is "p-FAK:Shc";  // hasPart uniprot:Q05397 uniprot:P29353; hasProperty MOD:00696
  substanceOnly species Grb2_Sos in Cell = 3.23; Grb2_Sos is "Grb2:Sos";  // hasPart uniprot:Q07889 uniprot:P62993
  substanceOnly species p_FAK_p_Shc in Cell = 15.962; p_FAK_p_Shc is "p-FAK:p-Shc";  // hasPart uniprot:Q05397 uniprot:P29353; hasProperty MOD:00696
  substanceOnly species p_FAK_p_Shc_Grb2_Sos in Cell = 5.577; p_FAK_p_Shc_Grb2_Sos is "p-FAK:p-Shc:Grb2:Sos";  // hasPart uniprot:Q05397 uniprot:P29353 uniprot:Q07889 uniprot:P62993; hasProperty MOD:00696
  substanceOnly species p_Shc_Grb2_Sos in Cell = 1.193; p_Shc_Grb2_Sos is "p-Shc:Grb2:Sos";  // hasPart uniprot:Q07889 uniprot:P62993 uniprot:P29353; hasProperty MOD:00696
  substanceOnly species s115 in nucleus = 0.09; s115 is "eNOS";  // isEncodedBy ncbigene:4846
  substanceOnly species Shear_Stress in default = 0;  // occursIn GO:0005576

  // Reactions:
  re102: FAK -> p_FAK; exp(re102_unity - (Time/re102_tf)^0.35)*re102_normal*((Time + tiny_num)/re102_unimol)^(-0.65)*(re102_unity - (Time/re102_tf)^0.35);  // modifiers: Time, Shear_Stress
    re102_normal = 4 nM_inv_s; re102_tf = 60 substance; re102_unity = 1 dimensionless; re102_unimol = 1 substance; tiny_num = 1e-6 substance;
  re103: Src -> p_Src; exp(re103_unity - (Time/re103_tf)^1.3)*re103_normal*(Time/re103_unimol)^0.3*(re103_unity - (Time/re103_tf)^1.3);  // modifiers: Time, Shear_Stress
    re103_normal = 0.026 nM_inv_s; re103_tf = 540 substance; re103_unity = 1 dimensionless; re103_unimol = 1 substance;
  re104: Shc + p_FAK -> p_FAK_Shc; k3*Shc*p_FAK - kr3*p_FAK_Shc;
    k3 = 0.1 inv_nM_s; kr3 = 1 inv_sec;
  re105: p_FAK_Shc -> p_FAK_p_Shc; k4*p_FAK_Shc*p_Src - kr4*p_FAK_p_Shc;  // modifiers: p_Src
    k4 = 8.33 inv_nM_s; kr4 = 5 inv_sec;
  re106: p_FAK_p_Shc + Grb2_Sos -> p_FAK_p_Shc_Grb2_Sos; k5*Grb2_Sos*p_FAK_p_Shc - kr5*p_FAK_p_Shc_Grb2_Sos;
    k5 = 60 inv_nM_s; kr5 = 546 inv_sec;
  re107: p_FAK_p_Shc_Grb2_Sos -> p_Shc_Grb2_Sos + p_FAK; k6*p_FAK_p_Shc_Grb2_Sos - kr6*p_FAK*p_Shc_Grb2_Sos;
    k6 = 2040 inv_sec; kr6 = 15700 inv_nM_s;
  re108: p_Shc => Shc; V8*p_Shc/(Km8 + p_Shc);
    V8 = 154 nM_inv_s; Km8 = 340 substance;
  re109: p_Shc_Grb2_Sos => p_Shc + Grb2_Sos; k7*p_Shc_Grb2_Sos;
    k7 = 40.8 inv_sec;
  re110: s115 => eNOS_Cell; k25*s115;
    k25 = 0.001 inv_sec;
  re111: s108 => s115; k24t1*aAP_1 + k24t2*s49;  // modifiers: aAP_1, s49
    k24t1 = 0.00012 nM_inv_s; k24t2 = 9e-6 nM_inv_s;
  re112: Ras_GDP => Ras_GTP; k9*p_Shc_Grb2_Sos*Ras_GDP/(Ras_GDP + Km9);  // modifiers: p_Shc_Grb2_Sos
    k9 = 0.222 inv_sec; Km9 = 0.181 substance;
  re113: Ras_GTP => Ras_GDP; V10*Ras_GTP/(Km10 + Ras_GTP);
    V10 = 0.289 nM_inv_s; Km10 = 0.0571 substance;
  re114: MEKK1 => p_MEKK1; k11*Ras_GTP*MEKK1/(Km11 + MEKK1);  // modifiers: Ras_GTP
    k11 = 0.035 inv_sec; Km11 = 10 substance;
  re115: p_MEKK1 => MEKK1; V12*p_MEKK1/(Km12 + p_MEKK1);
    Km12 = 8 substance; V12 = 0.125 nM_inv_s;
  re116: JNKK => p_JNKK; k13*p_MEKK1*JNKK/(Km13 + JNKK);  // modifiers: p_MEKK1
    k13 = 0.005 inv_sec; Km13 = 15 substance;
  re117: p_JNKK => JNKK; V14*p_JNKK/(p_JNKK + Km14);
    Km14 = 15 substance; V14 = 0.375 nM_inv_s;
  re118: JNK => p_JNK; k17*JNK*pp_JNKK/(JNK + Km17);  // modifiers: pp_JNKK
    k17 = 0.002 inv_sec; Km17 = 30 substance;
  re119: p_JNK => JNK; V18*p_JNK/(p_JNK + Km18);
    Km18 = 15 substance; V18 = 0.05 nM_inv_s;
  re120: eNOS_Cell => s35; k26*eNOS_Cell;
    k26 = 2.8e-5 inv_sec;
  re121: s37 => eNOS_Cav_1; V27*eNOS_Cell/(eNOS_Cell + Km27);  // modifiers: eNOS_Cell
    V27 = 0.02824 nM_inv_s; Km27 = 16 substance;
  re122: pre_time => Time; unitime;
    unitime = 1 nM_inv_s;
  re123: pp_JNKK => p_JNKK; V16*pp_JNKK/(pp_JNKK + Km16);
    V16 = 0.375 nM_inv_s; Km16 = 15 substance;
  re124: p_JNKK => pp_JNKK; k15*p_JNKK*p_MEKK1/(Km15 + p_JNKK);  // modifiers: p_MEKK1
    k15 = 0.005 inv_sec; Km15 = 15 substance;
  re125: pp_JNK => p_JNK; V20*pp_JNK/(Km20 + pp_JNK);
    V20 = 0.05 nM_inv_s; Km20 = 15 substance;
  re126: p_JNK => pp_JNK; k19*p_JNK*pp_JNKK/(Km19 + p_JNK);  // modifiers: pp_JNKK
    k19 = 0.002 inv_sec; Km19 = 30 substance;
  re127: AP_1 => aAP_1; pp_JNK*AP_1*k21/(Km21 + AP_1);  // modifiers: pp_JNK
    Km21 = 25 substance; k21 = 4e-5 inv_sec;
  re128: aAP_1 => AP_1; V22*aAP_1/(aAP_1 + Km22);
    Km22 = 5 substance; V22 = 0.002 nM_inv_s;
  re129: s105 => s49; exp(tau*(delay - Time/tc))/(1 + 2*exp(tau*(delay - Time/tc)) + exp(2*tau*(delay - Time/tc)))/uc*29.256;  // modifiers: Time
    tau = 0.55 dimensionless; tc = 3600 substance; uc = 3600 dimensionless; delay = 5 dimensionless; re129_unity = 20 nM_inv_s;

  // Unit definitions:
  unit time = second;
  unit substance = 1e-9 mole;
  unit area = metre^2;
  unit length = metre;
  unit volume = litre;
  unit sub_sec = 1e-9 mole / second;
  unit inv_sec = 1 / second;
  unit inv_sec_sub = 1 / (1e-9 mole * second);
  unit nM_inv_s = 1e-9 mole / second;
  unit inv_nM_s = 1 / (1e-9 mole * second);
end
