// SBML level 2 version 4
// This model was downloaded from BioModels Database
// http://www.ebi.ac.uk/biomodels-static/

model MODEL1302180006()
  // Koo2013 - Shear stress induced NO production - Model 4
  // biomodels.db:MODEL1302180006
  // biomodels.db:BIOMD0000000467
  // isDescribedBy pubmed:23708369
  // hasTaxon taxonomy:9606
  // isVersionOf reactome:REACT_12443.3
  // isVersionOf GO:0006809 GO:0002537

  // Compartments:
  compartment default = 1 volume;
  compartment Cell in default = 1 volume;  // GO:0005623

  // Species:
  substanceOnly species $Ca_c in Cell = 117.2;  // CHEBI:29108; occursIn GO:0005623
  substanceOnly species pp_AKT_PI3P in Cell = 1.723; pp_AKT_PI3P is "pp-AKT:PI3P";  // hasPart uniprot:P31749 pubchem.compound:53480352; hasProperty MOD:00696
  substanceOnly species eNOS_CaM_Ca4 in Cell = 0.0415; eNOS_CaM_Ca4 is "eNOS-CaM-Ca4";  // hasPart CHEBI:29108 uniprot:P62158
  substanceOnly species CaM_Ca4 in Cell = 2.827; CaM_Ca4 is "CaM-Ca4";  // hasPart CHEBI:29108 uniprot:P62158
  substanceOnly species CaM_Ca2 in Cell = 347.52; CaM_Ca2 is "CaM-Ca2";  // hasPart CHEBI:29108 uniprot:P62158
  substanceOnly species eNOS_CaM_Ca2 in Cell = 2.12; eNOS_CaM_Ca2 is "eNOS-CaM-Ca2";  // hasPart CHEBI:29108 uniprot:P62158
  substanceOnly species eNOS_Cav_1 in Cell = 34.98; eNOS_Cav_1 is "eNOS-Cav-1";  // hasPart uniprot:Q03135; isVersionOf GO:0051001
  substanceOnly species Calmodulin in Cell = 7635.36;  // isVersionOf uniprot:P62158
  substanceOnly species Hsp90 in Cell = 199987;  // isVersionOf uniprot:P08238
  substanceOnly species Hsp90_eNOS_CaM_Ca4 in Cell = 1.037; Hsp90_eNOS_CaM_Ca4 is "Hsp90-eNOS-CaM-Ca4";  // hasPart CHEBI:29108 uniprot:P08238 uniprot:P62158
  substanceOnly species Hsp90_p_eNOS_CaM_Ca4 in Cell = 0.0089; Hsp90_p_eNOS_CaM_Ca4 is "Hsp90-p-eNOS-CaM-Ca4";  // hasProperty CHEBI:29108 uniprot:P08238 uniprot:P62158; hasProperty MOD:00696
  substanceOnly species Hsp90_eNOS_CaM_Ca2 in Cell = 10.98; Hsp90_eNOS_CaM_Ca2 is "Hsp90-eNOS-CaM-Ca2";  // hasPart CHEBI:29108 uniprot:P08238 uniprot:P62158
  substanceOnly species Hsp90_p_eNOS_CaM_Ca2 in Cell = 0.106; Hsp90_p_eNOS_CaM_Ca2 is "Hsp90-p-eNOS-CaM-Ca2";  // hasProperty MOD:00696; hasPart CHEBI:29108 uniprot:P08238 uniprot:P62158
  substanceOnly species L_Arg in Cell = 500000; L_Arg is "L-Arg";  // isVersionOf CHEBI:16467
  substanceOnly species NO in Cell = 0;  // isVersionOf CHEBI:16480
  substanceOnly species Hsp90_p_eNOS in Cell = 0.643; Hsp90_p_eNOS is "Hsp90-p-eNOS";  // hasPart uniprot:P08238; hasProperty MOD:00696
  substanceOnly species Hsp90_eNOS in Cell = 0.083; Hsp90_eNOS is "Hsp90-eNOS";  // hasPart uniprot:P08238
  substanceOnly species sa49_degraded in Cell = 0;
  substanceOnly species s117 in Cell = 0;
  substanceOnly species s118 in Cell = 0;

  // Parameters:
  k1 = 0.004 inv_sec_sub;
  k1r = 10.3 inv_sec;
  k2 = 0.08 inv_sec_sub;
  k2r = 1152 inv_sec;
  k4 = 0.015 inv_sec_sub;
  k3 = 0.00015 inv_sec_sub;
  k3r = 1.5 inv_sec;
  k10 = 0.1 inv_sec;
  Km10 = 5 substance;
  Km10r = 20 substance;
  V10r = 4 sub_sec;
  k6 = 0.002 inv_sec_sub;
  k7 = 1.5 inv_sec;
  kD = 9.45e-5 inv_sec;
  k5 = 115.2 inv_sec;

  // Reactions:
  re37: eNOS_Cav_1 + CaM_Ca4 => eNOS_CaM_Ca4; k4*CaM_Ca4*eNOS_Cav_1;
  re38: CaM_Ca2 + eNOS_Cav_1 -> eNOS_CaM_Ca2; k3*eNOS_Cav_1*CaM_Ca2 - k3r*eNOS_CaM_Ca2;
  re41: Calmodulin -> CaM_Ca2; k1*Ca_c*Calmodulin - k1r*CaM_Ca2;  // modifiers: Ca_c
  re42: CaM_Ca2 => CaM_Ca4; k2*Ca_c*CaM_Ca2 - k2r*CaM_Ca4;  // modifiers: Ca_c
  re50: eNOS_CaM_Ca4 -> eNOS_CaM_Ca2; k5*eNOS_CaM_Ca4 - k2*Ca_c*eNOS_CaM_Ca2;  // modifiers: Ca_c
  re51: eNOS_CaM_Ca4 + Hsp90 => Hsp90_eNOS_CaM_Ca4; k6*eNOS_CaM_Ca4*Hsp90;
  re52: Hsp90_eNOS_CaM_Ca4 -> Hsp90_eNOS_CaM_Ca2; k5*Hsp90_eNOS_CaM_Ca4 - k2*Ca_c*Hsp90_eNOS_CaM_Ca2;  // modifiers: Ca_c
  re53: Hsp90_eNOS_CaM_Ca2 => eNOS_CaM_Ca2 + Hsp90; k7*Hsp90_eNOS_CaM_Ca2;
  re54: Hsp90_p_eNOS_CaM_Ca4 -> Hsp90_p_eNOS_CaM_Ca2; k5*Hsp90_p_eNOS_CaM_Ca4 - k2*Ca_c*Hsp90_p_eNOS_CaM_Ca2;  // modifiers: Ca_c
  re55: Hsp90_eNOS_CaM_Ca4 -> Hsp90_p_eNOS_CaM_Ca4; k10*Hsp90_eNOS_CaM_Ca4*pp_AKT_PI3P/(Hsp90_eNOS_CaM_Ca4 + Km10) - V10r*Hsp90_p_eNOS_CaM_Ca4/(Hsp90_p_eNOS_CaM_Ca4 + Km10r);  // modifiers: pp_AKT_PI3P
  re56: Hsp90_eNOS_CaM_Ca2 -> Hsp90_p_eNOS_CaM_Ca2; k10*Hsp90_eNOS_CaM_Ca2*pp_AKT_PI3P/(Hsp90_eNOS_CaM_Ca2 + Km10) - V10r*Hsp90_p_eNOS_CaM_Ca2/(Hsp90_p_eNOS_CaM_Ca2 + Km10r);  // modifiers: pp_AKT_PI3P
  re69: L_Arg => NO; kCaM*(eNOS_CaM_Ca4 + Hsp90_eNOS_CaM_Ca4) + kp*(Hsp90_p_eNOS_CaM_Ca2 + Hsp90_p_eNOS) + kpCaM*Hsp90_p_eNOS_CaM_Ca4;  // modifiers: eNOS_CaM_Ca4, eNOS_CaM_Ca2, Hsp90_eNOS_CaM_Ca2, Hsp90_p_eNOS_CaM_Ca2, Hsp90_eNOS_CaM_Ca4, Hsp90_p_eNOS_CaM_Ca4, Hsp90_p_eNOS
    kCaM = 17 inv_sec; kp = 5 inv_sec; kpCaM = 17 inv_sec;
  re70: Hsp90_p_eNOS => Hsp90_eNOS; V10r*Hsp90_p_eNOS/(Hsp90_p_eNOS + Km10r);
  re71: Hsp90_eNOS => eNOS_Cav_1 + Hsp90; k7*Hsp90_eNOS;
  re72: Hsp90_p_eNOS_CaM_Ca2 -> Hsp90_p_eNOS + CaM_Ca2; k3r*Hsp90_p_eNOS_CaM_Ca2 - k3*Hsp90_p_eNOS*CaM_Ca2;
  re131: eNOS_Cav_1 => sa49_degraded; kD*eNOS_Cav_1;
  re132: eNOS_CaM_Ca4 => s117 + CaM_Ca4; kD*eNOS_CaM_Ca4;
  re133: eNOS_CaM_Ca2 => s117 + CaM_Ca2; kD*eNOS_CaM_Ca2;
  re134: Hsp90_eNOS => Hsp90 + s118; kD*Hsp90_eNOS;
  re135: Hsp90_p_eNOS => s118 + Hsp90; kD*Hsp90_p_eNOS;
  re136: Hsp90_eNOS_CaM_Ca2 => Hsp90 + CaM_Ca2; kD*Hsp90_eNOS_CaM_Ca2;
  re137: Hsp90_p_eNOS_CaM_Ca2 => Hsp90 + CaM_Ca2; kD*Hsp90_p_eNOS_CaM_Ca2;
  re138: Hsp90_eNOS_CaM_Ca4 => Hsp90 + CaM_Ca4; kD*Hsp90_eNOS_CaM_Ca4;
  re139: Hsp90_p_eNOS_CaM_Ca4 => Hsp90 + CaM_Ca4; kD*Hsp90_p_eNOS_CaM_Ca4;

  // Unit definitions:
  unit time = second;
  unit substance = 1e-9 mole;
  unit area = metre^2;
  unit length = metre;
  unit volume = litre;
  unit sub_sec = 1e-9 mole / second;
  unit inv_sec = 1 / second;
  unit inv_sec_sub = 1 / (1e-9 mole * second);
  unit nM_inv_s = 1e-9 mole / second;
  unit inv_nM_s = 1 / (1e-9 mole * second);
end
