// SBML level 2 version 4
// This model was downloaded from BioModels Database
// http://www.ebi.ac.uk/biomodels-static/

model MODEL1308080000()
  // Mol2013 - Immune Signal Transduction in Leishmaniasis
  // Created by The MathWorks, Inc. SimBiology tool, Version 3.3
  // biomodels.db:MODEL1308080000
  // biomodels.db:BIOMD0000000477
  // isDescribedBy pubmed:23994140
  // hasTaxon taxonomy:9606
  // isVersionOf GO:0002764
  // hasPart reactome:REACT_9417.7

  // Compartments:
  compartment cytoplasm = 1;
  compartment nucleus in cytoplasm = 1;

  // Species:
  substanceOnly species TNF_cytoplasm in cytoplasm = 1.5;  // substance in MWBUILTINPREFIX_nano_MWBUILTINUNIT_mole; isVersionOf uniprot:P01375
  substanceOnly species TNFR1 in cytoplasm = 1.3;  // substance in MWBUILTINPREFIX_nano_MWBUILTINUNIT_mole; isVersionOf uniprot:P19438
  substanceOnly species TRADD_TRAF2_RIP in cytoplasm = 1.3;  // substance in MWBUILTINPREFIX_nano_MWBUILTINUNIT_mole; isVersionOf GO:0002947; hasPart uniprot:Q13546 uniprot:Q15628 uniprot:Q12933
  substanceOnly species IkB in cytoplasm = 0.8;  // substance in MWBUILTINPREFIX_nano_MWBUILTINUNIT_mole; isVersionOf GO:0008385
  substanceOnly species NIK in cytoplasm = 1.5;  // substance in MWBUILTINPREFIX_nano_MWBUILTINUNIT_mole; hasProperty GO:0004704
  substanceOnly species IkK_NFkB in cytoplasm = 1.4;  // substance in MWBUILTINPREFIX_nano_MWBUILTINUNIT_mole; hasProperty GO:0007252
  substanceOnly species NFkB_cytoplasm in cytoplasm = 1.2;  // substance in MWBUILTINPREFIX_nano_MWBUILTINUNIT_mole; isVersionOf uniprot:P19838
  substanceOnly species MEKK1 in cytoplasm = 1.4;  // substance in MWBUILTINPREFIX_nano_MWBUILTINUNIT_mole; isVersionOf uniprot:Q13233
  substanceOnly species MKK4_7 in cytoplasm = 1.2; MKK4_7 is "MKK4/7";  // substance in MWBUILTINPREFIX_nano_MWBUILTINUNIT_mole; isVersionOf uniprot:O43318
  substanceOnly species JNK_cytoplasm in cytoplasm = 1.2;  // substance in MWBUILTINPREFIX_nano_MWBUILTINUNIT_mole; isVersionOf uniprot:P45983
  substanceOnly species ASK in cytoplasm = 1.5;  // substance in MWBUILTINPREFIX_nano_MWBUILTINUNIT_mole; isVersionOf uniprot:Q99683
  substanceOnly species p38_cytoplasm in cytoplasm = 0.9;  // substance in MWBUILTINPREFIX_nano_MWBUILTINUNIT_mole; hasProperty GO:0048273
  substanceOnly species LPG in cytoplasm = 1.5;  // substance in MWBUILTINPREFIX_nano_MWBUILTINUNIT_mole; isVersionOf CHEBI:59681
  substanceOnly species CD14_TLR in cytoplasm = 1.5; CD14_TLR is "CD14-TLR";  // substance in MWBUILTINPREFIX_nano_MWBUILTINUNIT_mole; isPartOf reactome:REACT_6966.5; hasPart uniprot:P08571; hasPart uniprot:O60603
  substanceOnly species MyD88 in cytoplasm = 0.85;  // substance in MWBUILTINPREFIX_nano_MWBUILTINUNIT_mole; isVersionOf uniprot:Q99836
  substanceOnly species IRAK1_4 in cytoplasm = 1; IRAK1_4 is "IRAK1/4";  // substance in MWBUILTINPREFIX_nano_MWBUILTINUNIT_mole; isVersionOf uniprot:P51617
  substanceOnly species TRAF6 in cytoplasm = 1.1;  // substance in MWBUILTINPREFIX_nano_MWBUILTINUNIT_mole; isVersionOf uniprot:Q9Y4K3
  substanceOnly species TAB2_TAK1_TAB1 in cytoplasm = 1.3;  // substance in MWBUILTINPREFIX_nano_MWBUILTINUNIT_mole; hasPart uniprot:O43318 uniprot:Q8N5C8
  substanceOnly species MKK1_2 in cytoplasm = 1.1; MKK1_2 is "MKK1/2";  // substance in MWBUILTINPREFIX_nano_MWBUILTINUNIT_mole; isVersionOf uniprot:P36507; hasProperty ec-code:2.7.12.2
  substanceOnly species ERK1_2_cytoplasm in cytoplasm = 0.8; ERK1_2_cytoplasm is "ERK1/2";  // substance in MWBUILTINPREFIX_nano_MWBUILTINUNIT_mole; isVersionOf uniprot:P27361; hasProperty ec-code:2.7.11.24
  substanceOnly species MKK3_6 in cytoplasm = 1.5; MKK3_6 is "MKK3/6";  // substance in MWBUILTINPREFIX_nano_MWBUILTINUNIT_mole; isVersionOf uniprot:P46734; hasProperty ec-code:2.7.12.2
  substanceOnly species EGF in cytoplasm = 1.6;  // substance in MWBUILTINPREFIX_nano_MWBUILTINUNIT_mole; isVersionOf uniprot:P01133
  substanceOnly species EGFR in cytoplasm = 1.3;  // substance in MWBUILTINPREFIX_nano_MWBUILTINUNIT_mole; isVersionOf uniprot:P00533
  substanceOnly species PLC_gamma in cytoplasm = 1.6;  // substance in MWBUILTINPREFIX_nano_MWBUILTINUNIT_mole; isVersionOf uniprot:P19174; hasProperty GO:0019221
  substanceOnly species PIP2 in cytoplasm = 1.45;  // substance in MWBUILTINPREFIX_nano_MWBUILTINUNIT_mole; isVersionOf CHEBI:18348
  substanceOnly species DAG in cytoplasm = 0.9;  // substance in MWBUILTINPREFIX_nano_MWBUILTINUNIT_mole; isVersionOf CHEBI:18035
  substanceOnly species PKC in cytoplasm = 1.5;  // substance in MWBUILTINPREFIX_nano_MWBUILTINUNIT_mole; isVersionOf uniprot:P17252; hasProperty ec-code:2.7.11.1
  substanceOnly species PI3K in cytoplasm = 1.6;  // substance in MWBUILTINPREFIX_nano_MWBUILTINUNIT_mole; isVersionOf uniprot:O00443
  substanceOnly species Akt_cytoplasm in cytoplasm = 1.2;  // substance in MWBUILTINPREFIX_nano_MWBUILTINUNIT_mole; isVersionOf uniprot:Q06187
  substanceOnly species Shc_Grb2_Sos1 in cytoplasm = 0.3; Shc_Grb2_Sos1 is "Shc/Grb2/Sos1";  // substance in MWBUILTINPREFIX_nano_MWBUILTINUNIT_mole; hasPart uniprot:P62993 uniprot:Q07890; hasPart interpro:IPR000980
  substanceOnly species Ras in cytoplasm = 1.2;  // substance in MWBUILTINPREFIX_nano_MWBUILTINUNIT_mole; isVersionOf interpro:IPR020849
  substanceOnly species Raf in cytoplasm = 1.2;  // substance in MWBUILTINPREFIX_nano_MWBUILTINUNIT_mole; isVersionOf uniprot:P04049
  substanceOnly species JAK in cytoplasm = 1.6;  // substance in MWBUILTINPREFIX_nano_MWBUILTINUNIT_mole; isVersionOf uniprot:P23458
  substanceOnly species STAT1_3_cytoplasm in cytoplasm = 1.1; STAT1_3_cytoplasm is "STAT1/3";  // substance in MWBUILTINPREFIX_nano_MWBUILTINUNIT_mole; isVersionOf uniprot:P42224
  substanceOnly species NFkB_nucleus in nucleus = 0.2;  // substance in MWBUILTINPREFIX_nano_MWBUILTINUNIT_mole; isVersionOf uniprot:P19838
  substanceOnly species JNK_nucleus in nucleus = 0.6;  // substance in MWBUILTINPREFIX_nano_MWBUILTINUNIT_mole; isVersionOf uniprot:P45983
  substanceOnly species cjun in nucleus = 0.91;  // substance in MWBUILTINPREFIX_nano_MWBUILTINUNIT_mole; isVersionOf uniprot:P05412
  substanceOnly species p38_nucleus in nucleus = 0.8;  // substance in MWBUILTINPREFIX_nano_MWBUILTINUNIT_mole; hasProperty GO:0048273
  substanceOnly species cfos in nucleus = 0.5;  // substance in MWBUILTINPREFIX_nano_MWBUILTINUNIT_mole; isVersionOf uniprot:P01100
  substanceOnly species ERK1_2_nucleus in nucleus = 0; ERK1_2_nucleus is "ERK1/2";  // substance in MWBUILTINPREFIX_nano_MWBUILTINUNIT_mole; isVersionOf uniprot:P27361; hasProperty ec-code:2.7.11.24
  substanceOnly species Akt_nucleus in nucleus = 0;  // substance in MWBUILTINPREFIX_nano_MWBUILTINUNIT_mole; isVersionOf uniprot:Q06187
  substanceOnly species STAT1_3_nucleus in nucleus = 0; STAT1_3_nucleus is "STAT1/3";  // substance in MWBUILTINPREFIX_nano_MWBUILTINUNIT_mole; isVersionOf uniprot:P42224
  substanceOnly species TNF_nucleus in nucleus = 0;  // substance in MWBUILTINPREFIX_nano_MWBUILTINUNIT_mole; isVersionOf uniprot:P01375

  // Reactions:
  _1: TNF_cytoplasm => TNFR1; k1*TNF_cytoplasm;
    k1 = 1.2 MWDERIVEDUNIT_1__second;
  _2: TNFR1 => TRADD_TRAF2_RIP; k2*TNFR1;
    k2 = 1.18 MWDERIVEDUNIT_1__second;
  _3: TRADD_TRAF2_RIP => NIK; v3*TRADD_TRAF2_RIP/(k3 + TRADD_TRAF2_RIP);
    k3 = 0.6 MWBUILTINPREFIX_nano_MWBUILTINUNIT_mole; v3 = 0.6 MWDERIVEDUNIT_nanomole__second;
  _4: TRADD_TRAF2_RIP => MEKK1; v4*TRADD_TRAF2_RIP/(k4 + TRADD_TRAF2_RIP);
    v4 = 0.28 MWDERIVEDUNIT_nanomole__second; k4 = 1.5 MWBUILTINPREFIX_nano_MWBUILTINUNIT_mole;
  _5: NIK => IkB; v5*NIK/(k5 + NIK);
    k5 = 0.15 MWBUILTINPREFIX_nano_MWBUILTINUNIT_mole; v5 = 1.3 MWDERIVEDUNIT_nanomole__second;
  _6: IkK_NFkB => NFkB_cytoplasm; v6*IkK_NFkB/(k6 + IkK_NFkB);
    k6 = 0.1 MWBUILTINPREFIX_nano_MWBUILTINUNIT_mole; v6 = 2.2 MWDERIVEDUNIT_nanomole__second;
  _7: NFkB_cytoplasm => NFkB_nucleus; k7*NFkB_cytoplasm;
    k7 = 1.4 MWDERIVEDUNIT_1__second;
  _8: IkB => IkK_NFkB; v8*IkB/(k8 + IkB);
    k8 = 0.56 MWBUILTINPREFIX_nano_MWBUILTINUNIT_mole; v8 = 1.3 MWDERIVEDUNIT_nanomole__second;
  _9: MEKK1 => MKK4_7; v9*MEKK1/(k9 + MEKK1);
    v9 = 0.6 MWDERIVEDUNIT_nanomole__second; k9 = 0.2 MWBUILTINPREFIX_nano_MWBUILTINUNIT_mole;
  _10: MKK4_7 => JNK_cytoplasm; v10*MKK4_7/(k10 + MKK4_7);
    v10 = 0.98 MWDERIVEDUNIT_nanomole__second; k10 = 0.15 MWBUILTINPREFIX_nano_MWBUILTINUNIT_mole;
  _11: JNK_cytoplasm => JNK_nucleus; k11*JNK_cytoplasm;
    k11 = 0.61 MWDERIVEDUNIT_1__second;
  _12: JNK_nucleus => cjun; v12*JNK_nucleus/(k12 + JNK_nucleus);
    v12 = 1.14 MWDERIVEDUNIT_nanomole__second; k12 = 0.62 MWBUILTINPREFIX_nano_MWBUILTINUNIT_mole;
  _13: TRADD_TRAF2_RIP => ASK; v13*TRADD_TRAF2_RIP/(k13 + TRADD_TRAF2_RIP);
    k13 = 0.08 MWBUILTINPREFIX_nano_MWBUILTINUNIT_mole; v13 = 0.99 MWDERIVEDUNIT_nanomole__second;
  _14: ASK => MKK3_6; v14*ASK/(k14 + ASK);
    v14 = 1.2 MWDERIVEDUNIT_nanomole__second; k14 = 0.02 MWBUILTINPREFIX_nano_MWBUILTINUNIT_mole;
  _15: p38_cytoplasm => p38_nucleus; k15*p38_cytoplasm;
    k15 = 1 MWDERIVEDUNIT_1__second;
  _16: p38_nucleus => cfos; v16*p38_nucleus/(k16 + p38_nucleus);
    v16 = 1.5 MWDERIVEDUNIT_nanomole__second; k16 = 0.2 MWBUILTINPREFIX_nano_MWBUILTINUNIT_mole;
  _17: LPG => CD14_TLR; k17*LPG;
    k17 = 0.6 MWDERIVEDUNIT_1__second;
  _18: CD14_TLR => MyD88; k18*CD14_TLR;
    k18 = 2 MWDERIVEDUNIT_1__second;
  _19: MyD88 => IRAK1_4; k19*MyD88;
    k19 = 0.72 MWDERIVEDUNIT_1__second;
  _20: IRAK1_4 => TRAF6; k20*IRAK1_4;
    k20 = 0.55 MWDERIVEDUNIT_1__second;
  _21: TRAF6 => TAB2_TAK1_TAB1; k21*TRAF6;
    k21 = 0.48 MWDERIVEDUNIT_1__second;
  _22: TAB2_TAK1_TAB1 => NIK; v22*TAB2_TAK1_TAB1/(k22 + TAB2_TAK1_TAB1);
    v22 = 0.5 MWDERIVEDUNIT_nanomole__second; k22 = 0.2 MWBUILTINPREFIX_nano_MWBUILTINUNIT_mole;
  _23: TAB2_TAK1_TAB1 => MKK1_2; v23*TAB2_TAK1_TAB1/(k23 + TAB2_TAK1_TAB1);
    v23 = 0.2 MWDERIVEDUNIT_nanomole__second; k23 = 0.01 MWBUILTINPREFIX_nano_MWBUILTINUNIT_mole;
  _24: MKK1_2 => ERK1_2_cytoplasm; v24*MKK1_2/(k24 + MKK1_2);
    v24 = 0.9 MWDERIVEDUNIT_nanomole__second; k24 = 0.2 MWBUILTINPREFIX_nano_MWBUILTINUNIT_mole;
  _25: ERK1_2_cytoplasm => ERK1_2_nucleus; k25*ERK1_2_cytoplasm;
    k25 = 0.42 MWDERIVEDUNIT_1__second;
  _26: TAB2_TAK1_TAB1 => MKK4_7; v26*TAB2_TAK1_TAB1/(k26 + TAB2_TAK1_TAB1);
    v26 = 0.3 MWDERIVEDUNIT_nanomole__second; k26 = 0.01 MWBUILTINPREFIX_nano_MWBUILTINUNIT_mole;
  _27: TAB2_TAK1_TAB1 => MKK3_6; v27*TAB2_TAK1_TAB1/(k27 + TAB2_TAK1_TAB1);
    v27 = 0.1 MWDERIVEDUNIT_nanomole__second; k27 = 0.01 MWBUILTINPREFIX_nano_MWBUILTINUNIT_mole;
  _28: MKK3_6 => p38_cytoplasm; v28*MKK3_6/(k28 + MKK3_6);
    v28 = 1.5 MWDERIVEDUNIT_nanomole__second; k28 = 0.03 MWBUILTINPREFIX_nano_MWBUILTINUNIT_mole;
  _29: EGF => EGFR; k29*EGF;
    k29 = 0.6 MWDERIVEDUNIT_1__second;
  _30: EGFR => PLC_gamma; v30*EGFR/(k30 + EGFR);
    v30 = 0.0002 MWDERIVEDUNIT_nanomole__second; k30 = 0.5 MWBUILTINPREFIX_nano_MWBUILTINUNIT_mole;
  _31: PLC_gamma => PIP2; v31*PLC_gamma/(k31 + PLC_gamma);
    v31 = 0.6 MWDERIVEDUNIT_nanomole__second; k31 = 1 MWBUILTINPREFIX_nano_MWBUILTINUNIT_mole;
  _32: PIP2 => DAG; v32*PIP2/(k32 + PIP2);
    v32 = 0.9 MWDERIVEDUNIT_nanomole__second; k32 = 0.3 MWBUILTINPREFIX_nano_MWBUILTINUNIT_mole;
  _33: DAG => PKC; k33*DAG;
    k33 = 0.35 MWDERIVEDUNIT_1__second;
  _34: PKC => IkK_NFkB; v34*PKC/(k34 + PKC);
    v34 = 1.2 MWDERIVEDUNIT_nanomole__second; k34 = 0.2 MWBUILTINPREFIX_nano_MWBUILTINUNIT_mole;
  _35: EGFR => PI3K; v35*EGFR/(k35 + EGFR);
    v35 = 0.2 MWDERIVEDUNIT_nanomole__second; k35 = 0.8 MWBUILTINPREFIX_nano_MWBUILTINUNIT_mole;
  _36: PI3K => Akt_cytoplasm; v36*PI3K/(k36 + PI3K);
    v36 = 0.8 MWDERIVEDUNIT_nanomole__second; k36 = 1.5 MWBUILTINPREFIX_nano_MWBUILTINUNIT_mole;
  _37: Akt_cytoplasm => Akt_nucleus; k37*Akt_cytoplasm;
    k37 = 0.2 MWDERIVEDUNIT_1__second;
  _38: EGFR => Shc_Grb2_Sos1; k38*EGFR;
    k38 = 0.299 MWDERIVEDUNIT_1__second;
  _39: Shc_Grb2_Sos1 => Ras; v39*Shc_Grb2_Sos1/(k39 + Shc_Grb2_Sos1);
    v39 = 0.24 MWDERIVEDUNIT_nanomole__second; k39 = 1.2 MWBUILTINPREFIX_nano_MWBUILTINUNIT_mole;
  _40: Ras => Raf; v40*Ras/(k40 + Ras);
    v40 = 0.2 MWDERIVEDUNIT_nanomole__second; k40 = 1.5 MWBUILTINPREFIX_nano_MWBUILTINUNIT_mole;
  _41: Raf => MKK1_2; v41*Raf/(k41 + Raf);
    v41 = 0.7 MWDERIVEDUNIT_nanomole__second; k41 = 1.5 MWBUILTINPREFIX_nano_MWBUILTINUNIT_mole;
  _42: Ras => MKK4_7; v42*Ras/(k42 + Ras);
    v42 = 0.4 MWDERIVEDUNIT_nanomole__second; k42 = 1.5 MWBUILTINPREFIX_nano_MWBUILTINUNIT_mole;
  _43: EGFR => JAK; v43*EGFR/(k43 + EGFR);
    v43 = 0.01 MWDERIVEDUNIT_nanomole__second; k43 = 1.8 MWBUILTINPREFIX_nano_MWBUILTINUNIT_mole;
  _44: JAK => STAT1_3_cytoplasm; v44*JAK/(k44 + JAK);
    v44 = 1 MWDERIVEDUNIT_nanomole__second; k44 = 1.5 MWBUILTINPREFIX_nano_MWBUILTINUNIT_mole;
  _45: STAT1_3_cytoplasm => STAT1_3_nucleus; k45*STAT1_3_cytoplasm;
    k45 = 0.19 MWDERIVEDUNIT_1__second;
  _46: NFkB_nucleus => TNF_nucleus; v46*NFkB_nucleus^n46/(kp47 + NFkB_nucleus^n46);
    v46 = 2.35 MWDERIVEDUNIT_nanomole__second; n46 = 1; kp47 = 0.43 MWBUILTINPREFIX_nano_MWBUILTINUNIT_mole;
  _47: TNF_nucleus => TNF_cytoplasm; k47*TNF_nucleus;
    k47 = 1.1 MWDERIVEDUNIT_1__second;
  _48: PKC => Ras; v48*PKC/(k48 + PKC);
    v48 = 1 MWDERIVEDUNIT_nanomole__second; k48 = 1 MWBUILTINPREFIX_nano_MWBUILTINUNIT_mole;
  _49: PKC => Raf; v49*PKC/(k49 + PKC);
    v49 = 1 MWDERIVEDUNIT_nanomole__second; k49 = 1 MWBUILTINPREFIX_nano_MWBUILTINUNIT_mole;

  // Unit definitions:
  unit MWBUILTINPREFIX_nano_MWBUILTINUNIT_mole = 1e-9 mole; MWBUILTINPREFIX_nano_MWBUILTINUNIT_mole is "nanomole";
  unit MWDERIVEDUNIT_1__second = dimensionless / second; MWDERIVEDUNIT_1__second is "1/second";
  unit MWDERIVEDUNIT_nanomole__second = mole * 1e-9 dimensionless / second; MWDERIVEDUNIT_nanomole__second is "nanomole/second";
end
