// SBML level 2 version 4
// This model was downloaded from BioModels Database
// http://www.ebi.ac.uk/biomodels-static/
// Created by The MathWorks, Inc. SimBiology tool, Version 4.0

model MODEL1301020001()
  // Noguchi2013 - Insulin dependent glucose metabolism
  // biomodels.db:MODEL1301020001
  // biomodels.db:BIOMD0000000482
  // isDescribedBy pubmed:23670537
  // isDerivedFrom biomodels.db:MODEL1204060000
  // hasProperty mamo:MAMO_0000046
  // occursIn BTO:0000608

  // Compartments:
  compartment default = 1;  // isVersionOf GO:0005623
  compartment Vex in default = 0.004 litre;  // isVersionOf GO:0005576
  compartment Vin in default = 2.64e-5 litre;  // isVersionOf GO:0005622

  // Species:
  species GP in default = 0.4726/default;  // isVersionOf uniprot:P09811
  species pGP in default = 0.1723/default;  // isVersionOf uniprot:P09811 kegg.compound:C00562
  species mRNA in default = 2.905/default;  // isVersionOf CHEBI:33699
  species PEPCK in default = 0.7686/default;  // isVersionOf uniprot:P07379
  species IRS in default = 888.77/default;  // isVersionOf uniprot:P35570
  species p1IRS in default = 0;  // isVersionOf uniprot:P35570 kegg.compound:C00562
  species p2IRS in default = 0;  // isVersionOf uniprot:P35570 kegg.compound:C00562
  species p1p2IRS in default = 0;  // isVersionOf uniprot:P35570 kegg.compound:C00562
  species Akt in default = 1.1182/default;  // isVersionOf uniprot:P47197
  species pAkt in default = 0;  // isVersionOf uniprot:P47197 kegg.compound:C00562
  species mTOR in default = 880.25/default;  // isVersionOf uniprot:P42346
  species pmTOR in default = 0;  // isVersionOf uniprot:P42346 kegg.compound:C00562
  species Foxo in default = 1.069e-5/default;  // isVersionOf uniprot:D3ZV21
  species pFoxo in default = 0;  // isVersionOf uniprot:D3ZV21 kegg.compound:C00562
  species PYRout in Vex = 137.5/Vex;  // isVersionOf CHEBI:15361
  species GLCex in Vex = 114.9/Vex;  // isVersionOf CHEBI:17234
  species F16P in Vin = 9.571/Vin;  // isVersionOf CHEBI:40595
  species PYRin in Vin = 0.9872/Vin;  // isVersionOf CHEBI:15361 GO:0005622
  species LAC in Vin = 1001/Vin;  // isVersionOf CHEBI:24996
  species OAA in Vin = 0.0022/Vin;  // isVersionOf CHEBI:16452
  species GLY in Vin = 4.8248/Vin;  // isVersionOf CHEBI:28087
  species G1P in Vin = 5.303/Vin;  // isVersionOf CHEBI:29042
  species G6P in Vin = 0.5188/Vin;

  // Parameters:
  V1 = 8.97;
  K1 = 0.0451;
  V2_G6P = 7.71;
  K2_G6P = 925;
  V2_F16P = 0.0839;
  K2_F16P = 0.597;
  V3 = 0.00229;
  K3 = 2.92;
  V6 = 0.00247;
  K6 = 0.996;
  V7 = 2.84e-5;
  K7 = 8.43;
  V4_PYR = 23.6;
  K4_PYR = 56.4;
  V4_LAC = 1.2e-6;
  K4_LAC = 0.0154;
  V8_G6P = 2.02e-5;
  K8_G6P = 0.791;
  V8_G1P = 0.04;
  K8_G1P = 69.8;
  V5 = 0.00112;
  K5 = 0.228;
  V9_G1P = 0.488;
  K9_G1P = 2.69;
  V9_GLY = 1.02e-6;
  K9_GLY = 0.000623;
  k3 = 112.76;
  k4 = 1.9448;
  s1 = 1.722;
  s2 = 214.7; s2 is "s4";
  s3 = 46.54; s3 is "s2";
  s4 = 1.19; s4 is "s3";
  k1_PEPCK = 0.12225;
  k2_PEPCK = 0.0045985;
  k3_PEPCK = 486.28;
  k4_PEPCK = 0.0046101;
  k5_PEPCK = 0.00010958;
  k6_PEPCK = 0.0018592;
  param1 = 5.5702;
  param2 = 2.3969;
  param3 = 0.020934;
  param4 = 1.214e-5;
  param5 = 0.2751;
  param6 = 0.0072509;
  param7 = 758.12;
  param8 = 0.91758;
  param9 = 0.041292;
  param10 = 0.00013032;
  param11 = 0.000192;
  param12 = 0.029311;
  param13 = 4.4307e-5;
  param14 = 0.35211;
  param15 = 3.1385e-5;
  param16 = 0.0095934;
  proIRS = 888.77;
  insulin = 100 MWDERIVEDUNIT_nanomole__litre;

  // Reactions:
  v1: GLCex -> G6P; (V1*(GLCex/K1) - V1*(G6P/K1))/(1 + GLCex/K1 + G6P/K1);
  v2: pAkt + G6P -> pAkt + F16P; ((1 + s1*pAkt)*V2_G6P*G6P/K2_G6P - V2_F16P*F16P/K2_F16P)/(1 + G6P/K2_G6P + F16P/K2_F16P);
  v3: F16P => PYRin; V3*F16P/(K3 + F16P);
  v4: PYRin -> LAC; (V4_PYR*PYRin/K4_PYR - V4_LAC*LAC/K4_LAC)/(1 + PYRin/K4_PYR + LAC/K4_LAC);
  v5: PYRout -> PYRin; (V5*PYRout/K5 - V5*PYRin/K5)/(1 + PYRout/K5 + PYRin/K5);
  v6: PYRin => OAA; V6*PYRin/(K6 + PYRin);
  v7: PEPCK + OAA => PEPCK + F16P; (1 + s3*PEPCK)*V7*OAA/(K7 + OAA);
  v8: pAkt + G6P -> pAkt + G1P; ((1 + s4*pAkt)*V8_G6P*G6P/K8_G6P - V8_G1P*G1P/K8_G1P)/(1 + G6P/K8_G6P + G1P/K8_G1P);
  v9: pGP + G1P -> pGP + GLY; (V9_G1P*G1P/K9_G1P - (1 + s2*pGP)*V9_GLY*GLY/K9_GLY)/(1 + G1P/K9_G1P + GLY/K9_GLY);
  metabolicENZ: pGP + G6P => GP + G6P; pGP*G6P*k4; metabolicENZ is "metabolicENZ1";
  reaction1: => IRS; (proIRS - IRS)*param1;
  reaction2: IRS -> p1IRS; IRS*insulin*param2 - p1IRS*param3;
  reaction3: p1IRS => ; p1IRS*param4;
  reaction4: p1IRS + pmTOR => p1p2IRS + pmTOR; p1IRS*pmTOR*param5;
  reaction5: p1p2IRS => p1IRS; p1p2IRS*param6;
  reaction6: IRS + pmTOR => p2IRS + pmTOR; IRS*pmTOR*param7;
  reaction7: p2IRS => IRS; p2IRS*param8;
  reaction8: p2IRS => ; p2IRS*param9;
  reaction9: p2IRS -> p1p2IRS; p2IRS*insulin*param10 - p1p2IRS*param11;
  reaction10: p1p2IRS => ; p1p2IRS*param12;
  reaction11: Akt + p1IRS => pAkt + p1IRS; p1IRS*Akt*param13;
  reaction12: pAkt => Akt; pAkt*param14;
  reaction13: mTOR + pAkt => pmTOR + pAkt; mTOR*pAkt*param15;
  reaction14: pmTOR => mTOR; pmTOR*param16;
  reaction15: Foxo + pAkt => pFoxo + pAkt; pAkt*Foxo*k1_PEPCK;
  reactionPEP1: Foxo => mRNA + Foxo; Foxo*k3_PEPCK - mRNA*k4_PEPCK;
  reactionPEP2: mRNA => PEPCK + mRNA; k5_PEPCK*mRNA - k6_PEPCK*PEPCK;
  reaction16: pFoxo => Foxo; pFoxo*k2_PEPCK;
  metabolicENZ2: GP => pGP; GP*k3;

  // Unit definitions:
  unit MWDERIVEDUNIT_nanomole__litre = mole * 1e-6 dimensionless / metre^3; MWDERIVEDUNIT_nanomole__litre is "nanomole/litre";
end
