// SBML level 2 version 4
// This model was downloaded from BioModels Database
// http://www.ebi.ac.uk/biomodels-static/

model MODEL1308080008()
  // Cao2008 - Network of a toggle switch
  // biomodels.db:MODEL1308080008
  // biomodels.db:BIOMD0000000483
  // isDescribedBy pubmed:18373871
  // hasTaxon taxonomy:131567
  // hasProperty mamo:MAMO_0000046
  // isVersionOf GO:0010468

  // Compartments:
  compartment default = 1;  // isVersionOf GO:0005623

  // Species:
  species Pa in default = 0;  // isVersionOf CHEBI:16541
  species Pb in default = 0;  // isVersionOf CHEBI:16541
  species Da in default = 0;  // isVersionOf FMA:74402
  species Db in default = 0;  // isVersionOf FMA:74402
  species BDa in default = 0;  // hasPart CHEBI:16541 FMA:74402
  species BDb in default = 0;  // hasPart CHEBI:16541 FMA:74402
  species ESA in default = 0;
  species ESB in default = 0;

  // Parameters:
  da = 1;
  db = 1;
  sa = 100;
  sb = 100;
  ba = 1e-5;
  bb = 1e-5;
  ua = 0.1;
  ub = 0.1;

  // Reactions:
  re2: ESA => Pa; default*sa*Da;  // modifiers: Da; isVersionOf GO:0006412
  re1: ESB => Pb; default*sb*Db;  // modifiers: Db; isVersionOf GO:0006412
  re12: Pa => ESA; default*da*Pa;  // isVersionOf GO:0030163
  re11: Pb => ESB; default*db*Pb;  // isVersionOf GO:0030163
  re13: 2 Pa + Db => BDb; default*bb*(Pa*(Pa - 1)/2)*Db;  // isVersionOf GO:0065003
  re5: 2 Pb + Da => BDa; default*ba*(Pb*(Pb - 1)/2)*Da;  // isVersionOf GO:0065003
  re7: BDa => Da + 2 Pb; default*ua*BDa;  // isVersionOf GO:0032984
  re14: BDb => 2 Pa + Db; default*ub*BDb;  // isVersionOf GO:0032984
end
