// SBML level 2 version 4
// This model was downloaded from BioModels Database
// http://www.ebi.ac.uk/biomodels-static/

model MODEL1308080004()
  // Cao2013 - Application of ABSIS method in birth-death process
  // biomodels.db:MODEL1308080004
  // biomodels.db:BIOMD0000000484
  // isDescribedBy pubmed:23862966
  // isDerivedFrom pubmed:21054005 pubmed:21280690
  // hasTaxon taxonomy:131567
  // isVersionOf GO:0040008

  // Compartments:
  compartment default = 1;

  // Species:
  species S in default = 0;
  species ES in default = 0;

  // Parameters:
  k1 = 1;
  k2 = 0.025;

  // Reactions:
  re2: ES => S; default*k1;
  re12: S => ES; k2*S;
end
