// SBML level 2 version 4
// This model was downloaded from BioModels Database
// http://www.ebi.ac.uk/biomodels-static/

model MODEL1308080005()
  // Cao2013 - Application of ABSIS method in the bistable Schlögl model
  // biomodels.db:MODEL1308080005
  // biomodels.db:BIOMD0000000485
  // isDescribedBy pubmed:23862966
  // isDerivedFrom doi:10.1007/BF01379769
  // hasTaxon taxonomy:131567
  // isVersionOf GO:0003824

  // Compartments:
  compartment default = 1;

  // Species:
  species X in default = 1/default;
  species ES in default = 1/default;

  // Parameters:
  k1 = 3;
  k2 = 0.6;
  k3 = 0.25;
  k4 = 2.95;
  A = 1;
  B = 2;
  V = 25;
  value = 1;

  // Reactions:
  Reaction1: ES => X; default*k1*A*X*(X - 1)/V;
  Reaction2: X => ES; default*(k2/1)*X*(X - 1)*(X - 2)/V^2;
  Reaction6: ES => X; default*k3*B*V;
  Reaction7: X => ES; default*k4*X;
end
