// SBML level 2 version 4
// This model was downloaded from BioModels Database
// http://www.ebi.ac.uk/biomodels-static/

model MODEL1308080006()
  // Cao2013 - Application of ABSIS method in the reversible isomerization model
  // biomodels.db:MODEL1308080006
  // biomodels.db:BIOMD0000000486
  // isDescribedBy pubmed:23862966
  // isDerivedFrom pubmed:22191865
  // hasTaxon taxonomy:131567
  // isVersionOf GO:0043412

  // Compartments:
  compartment default = 1;

  // Species:
  species A in default = 0;
  species B in default = 0;

  // Parameters:
  k1 = 0.12;
  k2 = 1;

  // Reactions:
  re2: B => A; k2*B;
  re12: A => B; k1*A;
end
