// SBML level 2 version 4
// This model was downloaded from BioModels Database
// http://www.ebi.ac.uk/biomodels-static/

model MODEL1308080007()
  // Cao2013 - Application of ABSIS in the the enzymatic futile cycle
  // biomodels.db:MODEL1308080007
  // biomodels.db:BIOMD0000000487
  // isDescribedBy pubmed:23862966
  // isDerivedFrom pubmed:15701703
  // isVersionOf GO:0031649
  // hasProperty mamo:MAMO_0000046

  // Compartments:
  compartment default = 1;

  // Species:
  species S1 in default = 0;
  species S2 in default = 0;
  species S3 in default = 0;
  species S4 in default = 0;
  species S5 in default = 0;
  species S6 in default = 0;

  // Parameters:
  k1 = 1;
  k2 = 1;
  k3 = 0.1;
  k4 = 1;
  k5 = 1;
  k6 = 0.1;

  // Reactions:
  re1: S1 + S2 => S3; k1*S1*S2;  // isVersionOf GO:0009059
  re2: S3 => S1 + S2; k2*S3;  // isVersionOf GO:0032984
  re3: S3 => S1 + S5; k3*S3;  // isVersionOf GO:0043412
  re4: S4 + S5 => S6; k4*S4*S5;  // isVersionOf GO:0009059
  re5: S6 => S4 + S5; k5*S6;  // isVersionOf GO:0032984
  re6: S6 => S4 + S2; k6*S6;  // isVersionOf GO:0043412
end
