// SBML level 3 version 1
// This model was downloaded from BioModels Database
// http://www.ebi.ac.uk/biomodels-static/

model MODEL1310150000()
  // Schittler2010 - Cell fate of progenitor cells, osteoblasts or chondrocytes
  // Mathematical model describing the mechanism of differentiation of mesenchymal stem cells to bone (osteoblasts) or cartilage (chondrocytes) cells.
  // This model is described in the article:
  // Cell differentiation modeled via a coupled two-switch regulatory network.
  // Schittler D, Hasenauer J, Allgöwer F, Waldherr S.
  // Chaos 2010 Dec; 20(4): 045121
  // Abstract:
  // Mesenchymal stem cells can give rise to bone and other tissue cells, but their differentiation still escapes full control. In this paper we address this issue by mathematical modeling. We present a model for a genetic switch determining the cell fate of progenitor cells which can differentiate into osteoblasts (bone cells) or chondrocytes (cartilage cells). The model consists of two switch mechanisms and reproduces the experimentally observed three stable equilibrium states: a progenitor, an osteogenic, and a chondrogenic state. Conventionally, the loss of an intermediate (progenitor) state and the entailed attraction to one of two opposite (differentiated) states is modeled as a result of changing parameters. In our model in contrast, we achieve this by distributing the differentiation process to two functional switch parts acting in concert: one triggering differentiation and the other determining cell fate. Via stability and bifurcation analysis, we investigate the effects of biochemical stimuli associated with different system inputs. We employ our model to generate differentiation scenarios on the single cell as well as on the cell population level. The single cell scenarios allow to reconstruct the switching upon extrinsic signals, whereas the cell population scenarios provide a framework to identify the impact of intrinsic properties and the limiting factors for successful differentiation.
  // This model is hosted on BioModels Database and identified by: BIOMD0000000493 .
  // To cite BioModels Database, please use: BioModels Database: An enhanced, curated and annotated resource for published quantitative kinetic models .
  // To the extent possible under law, all copyright and related or neighbouring rights to this encoded model have been dedicated to the public domain worldwide. Please refer to CC0 Public Domain Dedication for more information.
  // biomodels.db:MODEL1310150000
  // biomodels.db:BIOMD0000000493
  // isDescribedBy pubmed:21198133
  // hasProperty mamo:MAMO_0000046
  // hasTaxon taxonomy:131567
  // isVersionOf GO:0048762

  // Compartments:
  compartment default_compartment = 1;  // isVersionOf BTO:0000421

  // Species:
  species P in default_compartment = 12.03;  // isVersionOf BTO:0000725
  species O in default_compartment = 0.14;  // isVersionOf BTO:0002050
  species C in default_compartment = 0.14;  // isVersionOf BTO:0005092

  // Parameters:
  // Autoactivation of xP
  aP = 0.2;
  // Hill coefficient
  n = 2;
  // Basal activity
  bP = 0.5;
  // Inflection point
  mP = 10;
  // lineage-unspecific pro-differentiation stimulus
  zD = 0;
  // Self-inhibition strength of xP
  cPP = 0.1;
  // Decay rate of xP
  kP = 0.1;
  // Autoactivation of xO, xC
  aO = 0.1;
  // Basal activity of xO, xC
  bO = 1;
  // pro-osteogenic stimuli
  zO = 0;
  // Inflection point of xO, xC
  mO = 1;
  // Mutual inhibition strength of xO, xC
  cOC = 0.1;
  // Inhibition strength of xP on xO, xC
  cOP = 0.5;
  // Self-inhition strength of xO, xC
  cOO = 0.1;
  // Decay reates of xO, xC
  kO = 0.1;
  // Autoactivation of xO, xC
  aC = 0.1;
  // Basal activity of xO, xC
  bC = 1;
  // pro-chondrogenic stimuli
  zC = 0;
  // Inflection point for xO, xC
  mC = 1;
  // Mutual inhibition strength of xO, xC
  cCO = 0.1;
  // Inhibition strength of xP on xO, xC
  cCP = 0.5;
  // Self-inhibition strength of xO, xC
  cCC = 0.1;
  // Decay rates of xO, xC
  kC = 0.1;

  // Reactions:
  a1: -> P; (aP*P^n + bP)/(mP + zD + cPP*P^n);
  a2: P -> ; kP*P;
  a3: -> O; (aO*O^n + bO + zO)/(mO + cOC*C^n + cOP*P^n + cOO*O^n);  // modifiers: P, C
  a4: O -> ; kO*O;
  a5: -> C; (aC*C^n + bC + zC)/(mC + cCO*O^n + cCP*P^n + cCC*C^n);  // modifiers: P, O
  a6: C -> ; kC*C;

  // Events:
  _E0: at (100) after (P > 12.03): zO = 1, zD = 0.8;
  _E1: at (800) after (P > 12.03): zO = 0, zD = 0;
end
