// SBML level 2 version 4
// This model was downloaded from BioModels Database
// http://www.ebi.ac.uk/biomodels-static/

model MODEL1310130000()
  // Sen2013 - Phospholipid Synthesis in P.knowlesi
  // The model describes the multiple phospholipid synthetic pathways in Plasmodium knowlesi.
  // This model is described in the article:
  // Kinetic modelling of phospholipid synthesis in Plasmodium knowlesi unravels crucial steps and relative importance of multiple pathways.
  // Sen P, Vial HJ, Radulescu O.
  // BMC Syst Biol 2013 Nov; 7(1): 123
  // Abstract:
  // BACKGROUND: Plasmodium is the causal parasite of malaria, infectious disease responsible for the death of up to one million people each year. Glycerophospholipid and consequently membrane biosynthesis are essential for the survival of the parasite and are targeted by a new class of antimalarial drugs developed in our lab. In order to understand the highly redundant phospholipid synthethic pathways and eventual mechanism of resistance to various drugs, an organism specific kinetic model of these metabolic pathways need to be developed in Plasmodium species. RESULTS: Fluxomic data were used to build a quantitative kinetic model of glycerophospholipid pathways in Plasmodium knowlesi. In vitro incorporation dynamics of phospholipids unravels multiple synthetic pathways. A detailed metabolic network with values of the kinetic parameters (maximum rates and Michaelis constants) has been built. In order to obtain a global search in the parameter space, we have designed a hybrid, discrete and continuous, optimization method. Discrete parameters were used to sample the cone of admissible fluxes, whereas the continuous Michaelis and maximum rates constants were obtained by local minimization of an objective function.The model was used to predict the distribution of fluxes within the network of various metabolic precursors.The quantitative analysis was used to understand eventual links between different pathways. The major source of phosphatidylcholine (PC) is the CDP-choline Kennedy pathway.In silico knock-out experiments showed comparable importance of phosphoethanolamine-N-methyltransferase (PMT) and phosphatidylethanolamine-N-methyltransferase (PEMT) for PC synthesis.The flux values indicate that, major part of serine derived phosphatidylethanolamine (PE) is formed via serine decarboxylation, whereas major part of phosphatidylserine (PS) is formed by base-exchange reactions.Sensitivity analysis of CDP-choline pathway shows that the carrier-mediated choline entry into the parasite and the phosphocholine cytidylyltransferase reaction have the largest sensitivity coefficients in this pathway, but does not distinguish a reaction as an unique rate-limiting step. CONCLUSION: We provide a fully parametrized kinetic model for the multiple phospholipid synthetic pathways in P. knowlesi. This model has been used to clarify the relative importance of the various reactions in these metabolic pathways. Future work extensions of this modelling strategy will serve to elucidate the regulatory mechanisms governing the development of Plasmodium during its blood stages, as well as the mechanisms of action of drugs on membrane biosynthetic pathways and eventual mechanisms of resistance.
  // This model is hosted on BioModels Database and identified by: BIOMD0000000495 .
  // To cite BioModels Database, please use: BioModels Database: An enhanced, curated and annotated resource for published quantitative kinetic models .
  // To the extent possible under law, all copyright and related or neighbouring rights to this encoded model have been dedicated to the public domain worldwide. Please refer to CC0 Public Domain Dedication for more information.
  // biomodels.db:MODEL1310130000
  // biomodels.db:BIOMD0000000495
  // isDescribedBy pubmed:24209716
  // hasProperty mamo:MAMO_0000046
  // isVersionOf GO:0008654
  // hasTaxon taxonomy:5850

  // Compartments:
  compartment unnamed = 1 MWBUILTINUNIT_liter;  // isVersionOf BTO:0000757

  // Species:
  species $SerE in unnamed = 0.0001;  // substance in mole; isVersionOf CHEBI:17822
  species Ser in unnamed = 0;  // isVersionOf CHEBI:17822
  species PS in unnamed = 0;  // isVersionOf CHEBI:72738
  species Etn in unnamed = 0;  // isVersionOf CHEBI:16000
  species PEtn in unnamed = 0;  // isVersionOf CHEBI:17553
  species PCho in unnamed = 0;  // isVersionOf CHEBI:18132
  species PE in unnamed = 0;  // isVersionOf CHEBI:16038
  species PC in unnamed = 0;  // isVersionOf CHEBI:49183
  species $ChoE in unnamed = 5e-5;  // substance in mole; isVersionOf CHEBI:15354
  species Cho in unnamed = 0;  // isVersionOf CHEBI:15354
  species $EtnE in unnamed = 0;  // isVersionOf CHEBI:16000

  // Parameters:
  Vm1 = 3.409365e-6 MWDERIVEDUNIT_mole__liter__minute;
  km1 = 0.0003628943 MWDERIVEDUNIT_mole__liter;
  Vm2 = 1.305681e-6 MWDERIVEDUNIT_mole__liter__minute;
  km2 = 0.0007967225 MWDERIVEDUNIT_mole__liter;
  Vm3 = 2.62039e-6 MWDERIVEDUNIT_mole__liter__minute;
  km3 = 2.395912e-5 MWDERIVEDUNIT_mole__liter;
  Vm4 = 8.62083e-6 MWDERIVEDUNIT_mole__liter__minute;
  km4 = 0.0001086085 MWDERIVEDUNIT_mole__liter;
  Vm5 = 1.078061e-6 MWDERIVEDUNIT_mole__liter__minute;
  km5 = 0.0001222237 MWDERIVEDUNIT_mole__liter;
  Vm6 = 2.245185e-6 MWDERIVEDUNIT_mole__liter__minute;
  km6 = 0.0002038682 MWDERIVEDUNIT_mole__liter;
  Vm7 = 5.613527e-6 MWDERIVEDUNIT_mole__liter__minute;
  km7 = 0.0002273683 MWDERIVEDUNIT_mole__liter;
  Vm8 = 4.127884e-7 MWDERIVEDUNIT_mole__liter__minute;
  km8 = 3.104989e-5 MWDERIVEDUNIT_mole__liter;
  Vm9 = 0.001416783 MWDERIVEDUNIT_mole__liter__minute;
  km9 = 0.3211254 MWDERIVEDUNIT_mole__liter;
  Vm10 = 6.97333e-7 MWDERIVEDUNIT_mole__liter__minute;
  km10 = 3.760852e-6 MWDERIVEDUNIT_mole__liter;
  Vm11 = 8.990547e-5 MWDERIVEDUNIT_mole__liter__minute;
  km11 = 0.171123 MWDERIVEDUNIT_mole__liter;
  Vm12 = 1.566283e-6 MWDERIVEDUNIT_mole__liter__minute;
  km12 = 2.413084e-5 MWDERIVEDUNIT_mole__liter;
  Vm13 = 1.537542e-6 MWDERIVEDUNIT_mole__liter__minute;
  km13 = 0.0002037771 MWDERIVEDUNIT_mole__liter;
  Vm14 = 0.0007737527 MWDERIVEDUNIT_mole__liter__minute;
  km14 = 0.1551646 MWDERIVEDUNIT_mole__liter;
  Vm15 = 2.324327e-7 MWDERIVEDUNIT_mole__liter__minute;
  km15 = 0.0001023269 MWDERIVEDUNIT_mole__liter;
  Vm16 = 5.556584e-7 MWDERIVEDUNIT_mole__liter__minute;
  km16 = 3.040726e-5 MWDERIVEDUNIT_mole__liter;
  kf17 = 0.0005 MWDERIVEDUNIT_1__minute;
  kb17 = 0.0001328102 MWDERIVEDUNIT_1__minute;

  // Reactions:
  R1: $SerE => Ser; Vm1*SerE/(km1 + SerE);
  R2: Ser => PS; Vm2*Ser/(km2 + Ser);
  R3: Ser => Etn; Vm3*Ser/(km3 + Ser);
  R4: Etn => PEtn; Vm4*Etn/(km4 + Etn);
  R5: PEtn => PCho; Vm5*PEtn/(km5 + PEtn);
  R6: PS => PE; Vm6*PS/(km6 + PS);
  R7: PEtn => PE; Vm7*PEtn/(km7 + PEtn);
  R8: PCho => PC; Vm8*PCho/(km8 + PCho);
  R9: PE => PC; Vm9*PE/(km9 + PE);
  R10: PC => PS; Vm10*PC/(km10 + PC);
  R11: PE => PS; Vm11*PE/(km11 + PE);
  R12: PC => ; Vm12*PC/(km12 + PC);
  R13: PS => ; Vm13*PS/(km13 + PS);
  R14: PE => ; Vm14*PS/(km14 + PS);  // modifiers: PS
  R15: $ChoE => Cho; Vm15*ChoE/(km15 + ChoE);
  R16: Cho => PCho; Vm16*Cho/(km16 + Cho);
  R17: $EtnE -> Etn; kf17*EtnE - kb17*Etn;

  // Unit definitions:
  unit MWBUILTINUNIT_liter = metre^3 * 1e-3 dimensionless;
  unit MWDERIVEDUNIT_mole__liter__minute = mole * 16.66667 dimensionless / (metre^3 * second); MWDERIVEDUNIT_mole__liter__minute is "mole/liter/minute";
  unit MWDERIVEDUNIT_mole__liter = mole * 1000 dimensionless / metre^3; MWDERIVEDUNIT_mole__liter is "mole/liter";
  unit MWDERIVEDUNIT_1__minute = 0.01666667 dimensionless / second; MWDERIVEDUNIT_1__minute is "1/minute";
end
