// SBML level 2 version 4
// This model was downloaded from BioModels Database
// http://www.ebi.ac.uk/biomodels-static/
// dcterms:bibliographicCitation: urn:miriam:doi:10.1093/nar/gku465

function mRNA_synthesis_1(k_syn_mRNA, TF_mRNA)
  k_syn_mRNA*TF_mRNA;
end

function miRNA_2_synthesis_1(k_syn_miRNA_2, TF_miRNA_2)
  k_syn_miRNA_2*TF_miRNA_2;
end

function protein_synthesis_1(k_syn_prot, mRNA)
  k_syn_prot*mRNA;
end

function miRNA_1_synthesis_1(k_syn_miRNA_1, TF_miRNA_1)
  k_syn_miRNA_1*TF_miRNA_1;
end

model Model_1()
  // Schmitz2014 - RNA triplex formation
  // The model is parameterized using the parameters for gene CCDC3 from Supplementary Table S1. The two miRNAs which form the triplex together with CCDC3 are miR-551b and miR-138.
  // This model is described in the article:
  // Cooperative gene regulation by microRNA pairs and their identification using a computational workflow.
  // Schmitz U, Lai X, Winter F, Wolkenhauer O, Vera J, Gupta SK.
  // Nucleic Acids Res. 2014 Jul; 42(12): 7539-7552
  // Abstract:
  // MicroRNAs (miRNAs) are an integral part of gene regulation at the post-transcriptional level. Recently, it has been shown that pairs of miRNAs can repress the translation of a target mRNA in a cooperative manner, which leads to an enhanced effectiveness and specificity in target repression. However, it remains unclear which miRNA pairs can synergize and which genes are target of cooperative miRNA regulation. In this paper, we present a computational workflow for the prediction and analysis of cooperating miRNAs and their mutual target genes, which we refer to as RNA triplexes. The workflow integrates methods of miRNA target prediction; triplex structure analysis; molecular dynamics simulations and mathematical modeling for a reliable prediction of functional RNA triplexes and target repression efficiency. In a case study we analyzed the human genome and identified several thousand targets of cooperative gene regulation. Our results suggest that miRNA cooperativity is a frequent mechanism for an enhanced target repression by pairs of miRNAs facilitating distinctive and fine-tuned target gene expression patterns. Human RNA triplexes predicted and characterized in this study are organized in a web resource at www.sbi.uni-rostock.de/triplexrna/.
  // This model is hosted on BioModels Database and identified by: BIOMD0000000530.
  // To cite BioModels Database, please use: BioModels Database: An enhanced, curated and annotated resource for published quantitative kinetic models.
  // To the extent possible under law, all copyright and related or neighbouring rights to this encoded model have been dedicated to the public domain worldwide. Please refer to CC0 Public Domain Dedication for more information.
  // biomodels.db:MODEL1402210000
  // biomodels.db:BIOMD0000000530
  // isDescribedBy pubmed:24875477
  // isVersionOf GO:0010468
  // hasTaxon taxonomy:9606

  // Compartments:
  compartment compartment_1 = 1;

  // Species:
  species mRNA in compartment_1 = 1;  // ensembl:ENSG00000151468; CHEBI:33699
  species miRNA_1 in compartment_1 = 0;  // mirbase:MI0003575
  species miRNA_2 in compartment_1 = 0;  // mirbase:MI0000476
  species duplex_1 in compartment_1 = 0;  // hasPart ensembl:ENSG00000151468; hasPart mirbase:MI0003575
  species duplex_2 in compartment_1 = 0;  // hasPart ensembl:ENSG00000151468; hasPart mirbase:MI0000476
  species triplex in compartment_1 = 0;  // hasPart ensembl:ENSG00000151468; hasPart mirbase:MI0003575; hasPart mirbase:MI0000476
  species TF_mRNA in compartment_1 = 1;
  species TF_miRNA_1 in compartment_1 = 1;
  species TF_miRNA_2 in compartment_1 = 1;
  species protein in compartment_1 = 1;  // isEncodedBy ensembl:ENSG00000151468

  // Reactions:
  duplex_1_association: mRNA + miRNA_1 => duplex_1; compartment_1*duplex_1_association_k1*mRNA*miRNA_1;
    duplex_1_association_k1 = 0.00045298;
  duplex_2_association: mRNA + miRNA_2 => duplex_2; compartment_1*duplex_2_association_k1*mRNA*miRNA_2;
    duplex_2_association_k1 = 1.30837e-5;
  triplex_association: mRNA + miRNA_1 + miRNA_2 => triplex; compartment_1*triplex_association_k1*mRNA*miRNA_1*miRNA_2;
    triplex_association_k1 = 0.999534;
  mRNA_synthesis: => mRNA; compartment_1*mRNA_synthesis_1(k_syn_mRNA, TF_mRNA);  // modifiers: TF_mRNA
    k_syn_mRNA = 1;
  miRNA_1_synthesis: => miRNA_1; compartment_1*miRNA_1_synthesis_1(k_syn_miRNA_1, TF_miRNA_1);  // modifiers: TF_miRNA_1
    k_syn_miRNA_1 = 1;
  miRNA_2_synthesis: => miRNA_2; compartment_1*miRNA_2_synthesis_1(k_syn_miRNA_2, TF_miRNA_2);  // modifiers: TF_miRNA_2
    k_syn_miRNA_2 = 1;
  mRNA_degradation: mRNA => ; compartment_1*mRNA_degradation_k1*mRNA;
    mRNA_degradation_k1 = 1;
  miRNA_1_degradation: miRNA_1 => ; compartment_1*miRNA_1_degradation_k1*miRNA_1;
    miRNA_1_degradation_k1 = 1;
  miRNA_2_degradation: miRNA_2 => ; compartment_1*miRNA_2_degradation_k1*miRNA_2;
    miRNA_2_degradation_k1 = 1;
  duplex_1_dissociation: duplex_1 => miRNA_1 + mRNA; compartment_1*duplex_1_dissociation_k1*duplex_1;
    duplex_1_dissociation_k1 = 0.249955;
  duplex_2_dissociation: duplex_2 => miRNA_2 + mRNA; compartment_1*duplex_2_dissociation_k1*duplex_2;
    duplex_2_dissociation_k1 = 0.241033;
  triplex_dissociation: triplex => miRNA_1 + miRNA_2 + mRNA; compartment_1*triplex_dissociation_k1*triplex;
    triplex_dissociation_k1 = 0.187796;
  duplex_1_degradation: duplex_1 => ; compartment_1*duplex_1_degradation_k1*duplex_1;
    duplex_1_degradation_k1 = 1;
  duplex_2_degradation: duplex_2 => ; compartment_1*duplex_2_degradation_k1*duplex_2;
    duplex_2_degradation_k1 = 1;
  triplex_degradation: triplex => ; compartment_1*triplex_degradation_k1*triplex;
    triplex_degradation_k1 = 1;
  protein_synthesis: => protein; compartment_1*protein_synthesis_1(k_syn_prot, mRNA);  // modifiers: mRNA
    k_syn_prot = 1;
  protein_degradation: protein => ; compartment_1*protein_degradation_k1*protein;
    protein_degradation_k1 = 1;

  // Unit definitions:
  unit substance = 1e-3 mole;
end
