// SBML level 2 version 4
// This model was downloaded from BioModels Database
// http://www.ebi.ac.uk/biomodels-static/
// dcterms:bibliographicCitation: http://identifiers.org/doi/10.1016/j.jtbi.2014.06.025
// dcterms:bibliographicCitation: http://identifiers.org/pubmed/24997239

function Constant_flux__irreversible(v)
  v;
end
Constant_flux__irreversible is "Constant flux (irreversible)";

function Michaellis_Menten(substrate, Km, Vmax)
  Vmax*substrate/(Km + substrate);
end

model MODEL1503180001()
  // Aguilera 2014 - HIV latency. Interaction between HIV proteins and immune response
  // This model is described in the article:
  // Studying HIV latency by modeling the interaction between HIV proteins and the innate immune response.
  // Aguilera LU, Rodríguez-González J.
  // J. Theor. Biol. 2014 Nov; 360: 67-77
  // Abstract:
  // HIV infection leads to two cell fates, the viral productive state or viral latency (a reversible non-productive state). HIV latency is relevant because infected active CD4+ T-lymphocytes can reach a resting memory state in which the provirus remains silent for long periods of time. Despite experimental and theoretical efforts, the causal molecular mechanisms responsible for HIV latency are only partially understood. Studies have determined that HIV latency is influenced by the innate immune response carried out by cell restriction factors that inhibit the postintegration steps in the virus replication cycle. In this study, we present a mathematical study that combines deterministic and stochastic approaches to analyze the interactions between HIV proteins and the innate immune response. Using wide ranges of parameter values, we observed the following: (1) a phenomenological description of the viral productive and latent cell phenotypes is obtained by bistable and bimodal dynamics, (2) biochemical noise reduces the probability that an infected cell adopts the latent state, (3) the effects of the innate immune response enhance the HIV latency state, (4) the conditions of the cell before infection affect the latent phenotype, i.e., the existing expression of cell restriction factors propitiates HIV latency, and existing expression of HIV proteins reduces HIV latency.
  // This model is hosted on BioModels Database and identified by: BIOMD0000000573.
  // To cite BioModels Database, please use: BioModels Database: An enhanced, curated and annotated resource for published quantitative kinetic models.
  // To the extent possible under law, all copyright and related or neighbouring rights to this encoded model have been dedicated to the public domain worldwide. Please refer to CC0 Public Domain Dedication for more information.
  // biomodels.db:MODEL1503180001
  // biomodels.db:BIOMD0000000573
  // isDescribedBy pubmed:24997239
  // hasTaxon taxonomy:9606
  // hasProperty DOID:526
  // isVersionOf GO:0045087

  // Compartments:
  compartment compartment = 1; compartment is "cell";  // GO:0005623

  // Species:
  species V in compartment = 1;  // hasPart GO:0039660; hasPart GO:0019021
  species C in compartment = 0;

  // Reactions:
  Kb: => V; compartment*Constant_flux__irreversible(Kb_v);
    Kb_v = 0.00134;
  Kv: V => 2 V; compartment*Michaellis_Menten(V, Km, Vmax);
    Km = 380; Vmax = 0.134;
  Kcv: V + C => C; compartment*Kcv_k1*V*C; Kcv is "Kvc";
    Kcv_k1 = 0.0295;
  Kdv: V => ; compartment*Kdv_k1*V;
    Kdv_k1 = 6.85e-5;
  Kc: => C; compartment*Constant_flux__irreversible(Kc_v);
    Kc_v = 0.07;
  Kvc: V + C => V; compartment*Kvc_k1*V*C; Kvc is "Kcv";
    Kvc_k1 = 0.927;
  Kdc: C => ; compartment*Kdc_k1*C;
    Kdc_k1 = 5.01e-5;

  // Unit definitions:
  unit substance = item;
end
