// SBML level 2 version 4
// This model was downloaded from BioModels Database
// http://www.ebi.ac.uk/biomodels-static/

function function_4_IR_beta_phosphorylation_by_Insulin(IR_beta, IR_beta_phosphorylation_by_Insulin, Insulin)
  IR_beta_phosphorylation_by_Insulin*IR_beta*Insulin;
end

function function_4_IRS1_phosphorylation_by_IR_beta_pY1146(IRS1, IRS1_phosphorylation_by_IR_beta_pY1146, IR_beta_pY1146)
  IRS1_phosphorylation_by_IR_beta_pY1146*IRS1*IR_beta_pY1146;
end

function function_4_IRS1_p_phosphorylation_by_p70S6K_pT389(IRS1_p, IRS1_p_phosphorylation_by_p70S6K_pT389, p70S6K_pT389)
  IRS1_p_phosphorylation_by_p70S6K_pT389*IRS1_p*p70S6K_pT389;
end

function function_4_AMPK_T172_phosphorylation(AMPK, AMPK_T172_phosphorylation, IRS1_p)
  AMPK_T172_phosphorylation*AMPK*IRS1_p;
end

function function_4_Akt_S473_phosphorylation_by_mTORC2_pS2481_n_IRS1_p(Akt_S473, Akt_S473_phosphorylation_by_mTORC2_pS2481_n_IRS1_p, IRS1_p, mTORC2_pS2481)
  Akt_S473_phosphorylation_by_mTORC2_pS2481_n_IRS1_p*Akt_S473*mTORC2_pS2481*IRS1_p;
end

function function_4_Akt_T308_phosphorylation_by_IRS1_p(Akt_T308, Akt_T308_phosphorylation_by_IRS1_p, IRS1_p)
  Akt_T308_phosphorylation_by_IRS1_p*Akt_T308*IRS1_p;
end

function function_4_mTORC1_pS2448_dephosphorylation_by_TSC1_TSC2_pS1387(TSC1_TSC2_pS1387, mTORC1_pS2448, mTORC1_pS2448_dephosphorylation_by_TSC1_TSC2_pS1387)
  mTORC1_pS2448_dephosphorylation_by_TSC1_TSC2_pS1387*mTORC1_pS2448*TSC1_TSC2_pS1387;
end

function function_4_mTORC1_S2448_activation_by_Amino_Acids(Amino_Acids, mTORC1, mTORC1_S2448_activation_by_Amino_Acids)
  mTORC1_S2448_activation_by_Amino_Acids*mTORC1*Amino_Acids;
end

function function_4_mTORC2_S2481_phosphorylation_by_PI3K_variant_p(PI3K_variant_p, mTORC2, mTORC2_S2481_phosphorylation_by_PI3K_variant_p)
  mTORC2_S2481_phosphorylation_by_PI3K_variant_p*mTORC2*PI3K_variant_p;
end

function function_4_p70S6K_T389_phosphorylation_by_mTORC1_pS2448(mTORC1_pS2448, p70S6K, p70S6K_T389_phosphorylation_by_mTORC1_pS2448)
  p70S6K_T389_phosphorylation_by_mTORC1_pS2448*p70S6K*mTORC1_pS2448;
end

function function_4_PRAS40_S183_phosphorylation_by_mTORC1_pS2448(PRAS40_S183, PRAS40_S183_phosphorylation_by_mTORC1_pS2448, mTORC1_pS2448)
  PRAS40_S183_phosphorylation_by_mTORC1_pS2448*PRAS40_S183*mTORC1_pS2448;
end

function function_4_PRAS40_T246_phosphorylation_by_Akt_pT308(Akt_pT308, PRAS40_T246, PRAS40_T246_phosphorylation_by_Akt_pT308)
  PRAS40_T246_phosphorylation_by_Akt_pT308*PRAS40_T246*Akt_pT308;
end

function function_4_TSC1_TSC2_S1387_phosphorylation_by_AMPK_pT172(AMPK_pT172, TSC1_TSC2_S1387_phosphorylation_by_AMPK_pT172, TSC1_TSC2_pT1462)
  TSC1_TSC2_S1387_phosphorylation_by_AMPK_pT172*TSC1_TSC2_pT1462*AMPK_pT172;
end

function function_4_TSC1_TSC2_T1462_phosphorylation_by_Akt_pT308(Akt_pT308, TSC1_TSC2_T1462_phosphorylation_by_Akt_pT308, TSC1_TSC2_pS1387)
  TSC1_TSC2_T1462_phosphorylation_by_Akt_pT308*TSC1_TSC2_pS1387*Akt_pT308;
end

function function_4_PI3K_variant_phosphorylation_by_IR_beta_pY1146(IR_beta_pY1146, PI3K_variant, PI3K_variant_phosphorylation_by_IR_beta_pY1146)
  PI3K_variant_phosphorylation_by_IR_beta_pY1146*PI3K_variant*IR_beta_pY1146;
end

model MODEL1506230002()
  // Sonntag2012 - mTOR model - IRS dependent regulation of AMPK by insulin
  // TSC1-TSC2 complex has two states: 1) active (TSC1_TSC2_pS1387), regulated by AMPK_pT172; 2) inactive (TSC1_TSC2_pT1462) regulated by Akt_pT308. Particularly, mTORC1 is inhibited by TSC1_TSC2 in active state. AMPK is activated at T172 by the species IRS1_p activated by the insulin receptor upon insulin stimulation. Consequently, AMPK_pT172 is inhibited by mTORC1_pS2448 indirectly by the p70-S6K-negative feedback loop.
  // This model is described in the article:
  // A modelling-experimental approach reveals insulin receptor substrate (IRS)-dependent regulation of adenosine monosphosphate-dependent kinase (AMPK) by insulin.
  // Sonntag AG, Dalle Pezze P, Shanley DP, Thedieck K.
  // FEBS J. 2012 Sep; 279(18): 3314-3328
  // Abstract:
  // Mammalian target of rapamycin (mTOR) kinase responds to growth factors, nutrients and cellular energy status and is a central controller of cellular growth. mTOR exists in two multiprotein complexes that are embedded into a complex signalling network. Adenosine monophosphate-dependent kinase (AMPK) is activated by energy deprivation and shuts off adenosine 5'-triphosphate (ATP)-consuming anabolic processes, in part via the inactivation of mTORC1. Surprisingly, we observed that AMPK not only responds to energy deprivation but can also be activated by insulin, and is further induced in mTORC1-deficient cells. We have recently modelled the mTOR network, covering both mTOR complexes and their insulin and nutrient inputs. In the present study we extended the network by an AMPK module to generate the to date most comprehensive data-driven dynamic AMPK-mTOR network model. In order to define the intersection via which AMPK is activated by the insulin network, we compared simulations for six different hypothetical model structures to our observed AMPK dynamics. Hypotheses ranking suggested that the most probable intersection between insulin and AMPK was the insulin receptor substrate (IRS) and that the effects of canonical IRS downstream cues on AMPK would be mediated via an mTORC1-driven negative-feedback loop. We tested these predictions experimentally in multiple set-ups, where we inhibited or induced players along the insulin-mTORC1 signalling axis and observed AMPK induction or inhibition. We confirmed the identified model and therefore report a novel connection within the insulin-mTOR-AMPK network: we conclude that AMPK is positively regulated by IRS and can be inhibited via the negative-feedback loop.
  // This model is hosted on BioModels Database and identified by: BIOMD0000000580.
  // To cite BioModels Database, please use: BioModels Database: An enhanced, curated and annotated resource for published quantitative kinetic models.
  // To the extent possible under law, all copyright and related or neighbouring rights to this encoded model have been dedicated to the public domain worldwide. Please refer to CC0 Public Domain Dedication for more information.
  // biomodels.db:MODEL1506230002
  // biomodels.db:BIOMD0000000580
  // isDescribedBy pubmed:22452783
  // isDerivedFrom biomodels.db:BIOMD0000000581
  // occursIn BTO:0000567 BTO:0000165
  // hasTaxon taxonomy:9606 taxonomy:10090

  // Compartments:
  compartment Cell = 1;  // isVersionOf BTO:0000567

  // Species:
  species IR_beta in Cell = 16.5607;  // uniprot:P06213
  species IR_beta_pY1146 in Cell = 0;  // uniprot:P06213
  species IR_beta_refractory in Cell = 0;  // uniprot:P06213
  species IRS1 in Cell = 18.9345;  // isPartOf uniprot:P35568; isPartOf uniprot:P42336
  species IRS1_p in Cell = 0;  // isPartOf uniprot:P35568; isPartOf uniprot:P42336
  species IRS1_pS636 in Cell = 0;  // isPartOf uniprot:P35568; isPartOf uniprot:P42336
  species AMPK in Cell = 20.5064;  // isPartOf uniprot:Q9Y478; isPartOf uniprot:P54619; isPartOf uniprot:Q13131
  species AMPK_pT172 in Cell = 0;  // isPartOf uniprot:P54619; isPartOf uniprot:Q9Y478; isPartOf uniprot:Q13131
  species Akt_T308 in Cell = 21.4109;  // uniprot:P31749
  species Akt_pT308 in Cell = 0;  // uniprot:P31749
  species Akt_S473 in Cell = 12.2517;  // uniprot:P31749
  species Akt_pS473 in Cell = 0;  // uniprot:P31749
  species mTORC1 in Cell = 25.14;  // uniprot:P42345
  species mTORC1_pS2448 in Cell = 0;  // uniprot:P42345
  species mTORC2 in Cell = 18.7959;  // uniprot:P42345
  species mTORC2_pS2481 in Cell = 0;  // uniprot:P42345
  species p70S6K in Cell = 14.301;  // uniprot:P23443
  species p70S6K_pT389 in Cell = 0;  // uniprot:P23443
  species PRAS40_T246 in Cell = 13.5613;  // uniprot:Q96B36
  species PRAS40_pT246 in Cell = 0;  // uniprot:Q96B36
  species PRAS40_S183 in Cell = 17.55;  // uniprot:Q96B36
  species PRAS40_pS183 in Cell = 0;  // uniprot:Q96B36
  species TSC1_TSC2_pT1462 in Cell = 14.9175;  // isPartOf uniprot:Q92574; isPartOf uniprot:P49815
  species TSC1_TSC2_pS1387 in Cell = 0;  // isPartOf uniprot:P49815; isPartOf uniprot:Q92574
  species PI3K_variant in Cell = 18.9345;
  species PI3K_variant_p in Cell = 0;
  species $Insulin in Cell;  // uniprot:P01308
  species $Amino_Acids in Cell;
  species $IR_beta_pY1146_obs in Cell;  // uniprot:P06213
  species $IRS1_pS636_obs in Cell;  // isPartOf uniprot:P42336; isPartOf uniprot:P35568
  species $AMPK_pT172_obs in Cell;  // isPartOf uniprot:P54619; isPartOf uniprot:Q13131; isPartOf uniprot:Q9Y478
  species $Akt_pT308_obs in Cell;  // uniprot:P31749
  species $Akt_pS473_obs in Cell;  // uniprot:P31749
  species $TSC1_TSC2_pS1387_obs in Cell;  // isPartOf uniprot:P49815; isPartOf uniprot:Q92574
  species $mTOR_pS2448_obs in Cell;  // uniprot:P42345
  species $mTOR_pS2481_obs in Cell;  // uniprot:P42345
  species $p70S6K_pT389_obs in Cell;  // uniprot:P23443
  species $PRAS40_pT246_obs in Cell;  // uniprot:Q96B36
  species $PRAS40_pS183_obs in Cell;  // uniprot:Q96B36

  // Parameters:
  IR_beta_phosphorylation_by_Insulin = 0.1242732;
  IR_beta_pY1146_dephosphorylation = 0.3962351;
  IR_beta_ready = 0.05327699;
  IRS1_phosphorylation_by_IR_beta_pY1146 = 0.004915987;
  IRS1_p_phosphorylation_by_p70S6K_pT389 = 1682.748;
  IRS1_pS636_dephosphorylation = 0.01305;
  AMPK_T172_phosphorylation = 9.797658;
  AMPK_pT172_dephosphorylation = 0.01072147;
  Akt_pT308_dephosphorylation = 0.003355446;
  Akt_pS473_dephosphorylation = 0.006402156;
  Akt_S473_phosphorylation_by_mTORC2_pS2481_n_IRS1_p = 13.14417;
  Akt_T308_phosphorylation_by_IRS1_p = 6.918106;
  mTORC1_pS2448_dephosphorylation_by_TSC1_TSC2_pS1387 = 0.0106652;
  mTORC1_S2448_activation_by_Amino_Acids = 0.004389155;
  mTORC2_pS2481_dephosphorylation = 0.01837345;
  mTORC2_S2481_phosphorylation_by_PI3K_variant_p = 0.3753526;
  p70S6K_pT389_dephosphorylation = 0.01135116;
  p70S6K_T389_phosphorylation_by_mTORC1_pS2448 = 0.001840428;
  PRAS40_pS183_dephosphorylation = 2.330144;
  PRAS40_pT246_dephosphorylation = 1.605125;
  PRAS40_S183_phosphorylation_by_mTORC1_pS2448 = 0.1876211;
  PRAS40_T246_phosphorylation_by_Akt_pT308 = 0.1377295;
  TSC1_TSC2_S1387_phosphorylation_by_AMPK_pT172 = 0.03655886;
  TSC1_TSC2_T1462_phosphorylation_by_Akt_pT308 = 0.01775618;
  PI3K_variant_p_dephosphorylation = 10;
  PI3K_variant_phosphorylation_by_IR_beta_pY1146 = 0.01;
  scale_IR_beta_pY1146_obs = 1;
  scale_IRS1_pS636_obs = 1;
  scale_AMPK_pT172_obs = 1;
  scale_Akt_pT308_obs = 1;
  scale_Akt_pS473_obs = 1;
  scale_TSC1_TSC2_pS1387_obs = 1;
  scale_mTOR_pS2448_obs = 1;
  scale_mTOR_pS2481_obs = 1;
  scale_p70S6K_pT389_obs = 1;
  scale_PRAS40_pT246_obs = 1;
  scale_PRAS40_pS183_obs = 1;

  // Assignment rules:
  Amino_Acids := piecewise(0, time < -1, piecewise(0, time < 0, 10));
  Akt_pT308_obs := scale_Akt_pT308_obs*Akt_pT308;
  TSC1_TSC2_pS1387_obs := scale_TSC1_TSC2_pS1387_obs*TSC1_TSC2_pS1387;
  PRAS40_pS183_obs := scale_PRAS40_pS183_obs*PRAS40_pS183;
  IR_beta_pY1146_obs := scale_IR_beta_pY1146_obs*IR_beta_pY1146;
  Insulin := piecewise(0, time < -1, piecewise(0, time < 0, 10));
  IRS1_pS636_obs := scale_IRS1_pS636_obs*IRS1_pS636;
  Akt_pS473_obs := scale_Akt_pS473_obs*Akt_pS473;
  AMPK_pT172_obs := scale_AMPK_pT172_obs*AMPK_pT172;
  mTOR_pS2448_obs := scale_mTOR_pS2448_obs*mTORC1_pS2448;
  p70S6K_pT389_obs := scale_p70S6K_pT389_obs*p70S6K_pT389;
  mTOR_pS2481_obs := scale_mTOR_pS2481_obs*mTORC2_pS2481;
  PRAS40_pT246_obs := scale_PRAS40_pT246_obs*PRAS40_pT246;

  // Reactions:
  reaction_1: IR_beta => IR_beta_pY1146; Cell*function_4_IR_beta_phosphorylation_by_Insulin(IR_beta, IR_beta_phosphorylation_by_Insulin, Insulin); reaction_1 is "IR_beta_phosphorylation_by_Insulin";  // modifiers: Insulin
  reaction_2: IR_beta_pY1146 => IR_beta_refractory; Cell*IR_beta_pY1146_dephosphorylation*IR_beta_pY1146; reaction_2 is "IR_beta_pY1146_dephosphorylation";
  reaction_3: IR_beta_refractory => IR_beta; Cell*IR_beta_ready*IR_beta_refractory; reaction_3 is "IR_beta_ready";
  reaction_4: IRS1 => IRS1_p; Cell*function_4_IRS1_phosphorylation_by_IR_beta_pY1146(IRS1, IRS1_phosphorylation_by_IR_beta_pY1146, IR_beta_pY1146); reaction_4 is "IRS1_phosphorylation_by_IR_beta_pY1146";  // modifiers: IR_beta_pY1146
  reaction_5: IRS1_p => IRS1_pS636; Cell*function_4_IRS1_p_phosphorylation_by_p70S6K_pT389(IRS1_p, IRS1_p_phosphorylation_by_p70S6K_pT389, p70S6K_pT389); reaction_5 is "IRS1_p_phosphorylation_by_p70S6K_pT389";  // modifiers: p70S6K_pT389
  reaction_6: IRS1_pS636 => IRS1; Cell*IRS1_pS636_dephosphorylation*IRS1_pS636; reaction_6 is "IRS1_pS636_dephosphorylation";
  reaction_7: AMPK => AMPK_pT172; Cell*function_4_AMPK_T172_phosphorylation(AMPK, AMPK_T172_phosphorylation, IRS1_p); reaction_7 is "AMPK_T172_phosphorylation";  // modifiers: IRS1_p
  reaction_8: AMPK_pT172 => AMPK; Cell*AMPK_pT172_dephosphorylation*AMPK_pT172; reaction_8 is "AMPK_pT172_dephosphorylation";
  reaction_9: Akt_pT308 => Akt_T308; Cell*Akt_pT308_dephosphorylation*Akt_pT308; reaction_9 is "Akt_pT308_dephosphorylation";
  reaction_10: Akt_pS473 => Akt_S473; Cell*Akt_pS473_dephosphorylation*Akt_pS473; reaction_10 is "Akt_pS473_dephosphorylation";
  reaction_11: Akt_S473 => Akt_pS473; Cell*function_4_Akt_S473_phosphorylation_by_mTORC2_pS2481_n_IRS1_p(Akt_S473, Akt_S473_phosphorylation_by_mTORC2_pS2481_n_IRS1_p, IRS1_p, mTORC2_pS2481); reaction_11 is "Akt_S473_phosphorylation_by_mTORC2_pS2481_n_IRS1_p";  // modifiers: mTORC2_pS2481, IRS1_p
  reaction_12: Akt_T308 => Akt_pT308; Cell*function_4_Akt_T308_phosphorylation_by_IRS1_p(Akt_T308, Akt_T308_phosphorylation_by_IRS1_p, IRS1_p); reaction_12 is "Akt_T308_phosphorylation_by_IRS1_p";  // modifiers: IRS1_p
  reaction_13: mTORC1_pS2448 => mTORC1; Cell*function_4_mTORC1_pS2448_dephosphorylation_by_TSC1_TSC2_pS1387(TSC1_TSC2_pS1387, mTORC1_pS2448, mTORC1_pS2448_dephosphorylation_by_TSC1_TSC2_pS1387); reaction_13 is "mTORC1_pS2448_dephosphorylation_by_TSC1_TSC2_pS1387";  // modifiers: TSC1_TSC2_pS1387
  reaction_14: mTORC1 => mTORC1_pS2448; Cell*function_4_mTORC1_S2448_activation_by_Amino_Acids(Amino_Acids, mTORC1, mTORC1_S2448_activation_by_Amino_Acids); reaction_14 is "mTORC1_S2448_activation_by_Amino_Acids";  // modifiers: Amino_Acids
  reaction_15: mTORC2_pS2481 => mTORC2; Cell*mTORC2_pS2481_dephosphorylation*mTORC2_pS2481; reaction_15 is "mTORC2_pS2481_dephosphorylation";
  reaction_16: mTORC2 => mTORC2_pS2481; Cell*function_4_mTORC2_S2481_phosphorylation_by_PI3K_variant_p(PI3K_variant_p, mTORC2, mTORC2_S2481_phosphorylation_by_PI3K_variant_p); reaction_16 is "mTORC2_S2481_phosphorylation_by_PI3K_variant_p";  // modifiers: PI3K_variant_p
  reaction_17: p70S6K_pT389 => p70S6K; Cell*p70S6K_pT389_dephosphorylation*p70S6K_pT389; reaction_17 is "p70S6K_pT389_dephosphorylation";
  reaction_18: p70S6K => p70S6K_pT389; Cell*function_4_p70S6K_T389_phosphorylation_by_mTORC1_pS2448(mTORC1_pS2448, p70S6K, p70S6K_T389_phosphorylation_by_mTORC1_pS2448); reaction_18 is "p70S6K_T389_phosphorylation_by_mTORC1_pS2448";  // modifiers: mTORC1_pS2448
  reaction_19: PRAS40_pS183 => PRAS40_S183; Cell*PRAS40_pS183_dephosphorylation*PRAS40_pS183; reaction_19 is "PRAS40_pS183_dephosphorylation";
  reaction_20: PRAS40_pT246 => PRAS40_T246; Cell*PRAS40_pT246_dephosphorylation*PRAS40_pT246; reaction_20 is "PRAS40_pT246_dephosphorylation";
  reaction_21: PRAS40_S183 => PRAS40_pS183; Cell*function_4_PRAS40_S183_phosphorylation_by_mTORC1_pS2448(PRAS40_S183, PRAS40_S183_phosphorylation_by_mTORC1_pS2448, mTORC1_pS2448); reaction_21 is "PRAS40_S183_phosphorylation_by_mTORC1_pS2448";  // modifiers: mTORC1_pS2448
  reaction_22: PRAS40_T246 => PRAS40_pT246; Cell*function_4_PRAS40_T246_phosphorylation_by_Akt_pT308(Akt_pT308, PRAS40_T246, PRAS40_T246_phosphorylation_by_Akt_pT308); reaction_22 is "PRAS40_T246_phosphorylation_by_Akt_pT308";  // modifiers: Akt_pT308
  reaction_23: TSC1_TSC2_pT1462 => TSC1_TSC2_pS1387; Cell*function_4_TSC1_TSC2_S1387_phosphorylation_by_AMPK_pT172(AMPK_pT172, TSC1_TSC2_S1387_phosphorylation_by_AMPK_pT172, TSC1_TSC2_pT1462); reaction_23 is "TSC1_TSC2_S1387_phosphorylation_by_AMPK_pT172";  // modifiers: AMPK_pT172
  reaction_24: TSC1_TSC2_pS1387 => TSC1_TSC2_pT1462; Cell*function_4_TSC1_TSC2_T1462_phosphorylation_by_Akt_pT308(Akt_pT308, TSC1_TSC2_T1462_phosphorylation_by_Akt_pT308, TSC1_TSC2_pS1387); reaction_24 is "TSC1_TSC2_T1462_phosphorylation_by_Akt_pT308";  // modifiers: Akt_pT308
  reaction_25: PI3K_variant_p => PI3K_variant; Cell*PI3K_variant_p_dephosphorylation*PI3K_variant_p; reaction_25 is "PI3K_variant_p_dephosphorylation";
  reaction_26: PI3K_variant => PI3K_variant_p; Cell*function_4_PI3K_variant_phosphorylation_by_IR_beta_pY1146(IR_beta_pY1146, PI3K_variant, PI3K_variant_phosphorylation_by_IR_beta_pY1146); reaction_26 is "PI3K_variant_phosphorylation_by_IR_beta_pY1146";  // modifiers: IR_beta_pY1146

  // Unit definitions:
  unit volume = dimensionless;
  unit time = 60 second;
  unit substance = dimensionless;
end
