// SBML level 2 version 4
// This model was downloaded from BioModels Database
// http://www.ebi.ac.uk/biomodels-static/

model MODEL1506230001()
  // DallePezze2012 - TSC-independent mTORC2 regulation
  // This model is described in the article:
  // A dynamic network model of mTOR signaling reveals TSC-independent mTORC2 regulation.
  // Dalle Pezze P, Sonntag AG, Thien A, Prentzell MT, Gödel M, Fischer S, Neumann-Haefelin E, Huber TB, Baumeister R, Shanley DP, Thedieck K.
  // Sci Signal 2012 Mar; 5(217): ra25
  // Abstract:
  // The kinase mammalian target of rapamycin (mTOR) exists in two multiprotein complexes (mTORC1 and mTORC2) and is a central regulator of growth and metabolism. Insulin activation of mTORC1, mediated by phosphoinositide 3-kinase (PI3K), Akt, and the inhibitory tuberous sclerosis complex 1/2 (TSC1-TSC2), initiates a negative feedback loop that ultimately inhibits PI3K. We present a data-driven dynamic insulin-mTOR network model that integrates the entire core network and used this model to investigate the less well understood mechanisms by which insulin regulates mTORC2. By analyzing the effects of perturbations targeting several levels within the network in silico and experimentally, we found that, in contrast to current hypotheses, the TSC1-TSC2 complex was not a direct or indirect (acting through the negative feedback loop) regulator of mTORC2. Although mTORC2 activation required active PI3K, this was not affected by the negative feedback loop. Therefore, we propose an mTORC2 activation pathway through a PI3K variant that is insensitive to the negative feedback loop that regulates mTORC1. This putative pathway predicts that mTORC2 would be refractory to Akt, which inhibits TSC1-TSC2, and, indeed, we found that mTORC2 was insensitive to constitutive Akt activation in several cell types. Our results suggest that a previously unknown network structure connects mTORC2 to its upstream cues and clarifies which molecular connectors contribute to mTORC2 activation.
  // This model is hosted on BioModels Database and identified by: BIOMD0000000581.
  // To cite BioModels Database, please use: BioModels Database: An enhanced, curated and annotated resource for published quantitative kinetic models.
  // To the extent possible under law, all copyright and related or neighbouring rights to this encoded model have been dedicated to the public domain worldwide. Please refer to CC0 Public Domain Dedication for more information.
  // biomodels.db:MODEL1506230001
  // biomodels.db:BIOMD0000000581
  // isDescribedBy pubmed:22457331
  // hasTaxon taxonomy:10090 taxonomy:9606
  // occursIn BTO:0000567 BTO:0000165
  // isVersionOf GO:0032869

  // Compartments:
  compartment Membrane = 1;  // isVersionOf GO:0005886
  compartment Cytoplasm = 1;  // isVersionOf GO:0005737

  // Species:
  species IR_beta in Membrane = 12.1175;  // uniprot:P06213
  species IR_beta_pY1146 in Membrane = 0;  // uniprot:P06213
  species IR_beta_refractory in Membrane = 0;  // uniprot:P06213
  species $Insulin in Membrane = 100;  // uniprot:P01308
  species $Amino_Acids in Cytoplasm = 100;
  species Sink in Cytoplasm = 0;
  species mTORC2 in Cytoplasm = 6.2175;  // uniprot:P42345
  species mTORC1_pS2448 in Cytoplasm = 0;  // uniprot:P42345
  species mTORC1 in Cytoplasm = 4.3225;  // uniprot:P42345
  species IRS1_pS636_PI3K in Cytoplasm = 0;  // hasPart uniprot:P35568; hasPart uniprot:P42336
  species IRS1_p_PI3K in Cytoplasm = 0;  // hasPart uniprot:P42336; hasPart uniprot:P35568
  species mTORC2_pS2481 in Cytoplasm = 0;  // uniprot:P42345
  species p70S6K_pT389 in Cytoplasm = 0;  // uniprot:P23443
  species IRS1_PI3K in Cytoplasm = PI3K;  // hasPart uniprot:P42336; hasPart uniprot:P35568
  species Akt_pT308 in Cytoplasm = 0;  // uniprot:P31749
  species TSC_clx in Cytoplasm = 10;  // hasPart uniprot:Q92574; hasPart uniprot:P49815
  species PRAS40 in Cytoplasm = 73.2175;  // uniprot:Q96B36
  species PRAS40_pS183 in Cytoplasm = 0;  // uniprot:Q96B36
  species PRAS40_pT246 in Cytoplasm = 0;  // uniprot:Q96B36
  species Akt in Cytoplasm = 144.13;  // uniprot:P31749
  species Akt_pT308_pS473 in Cytoplasm = 0;  // uniprot:P31749
  species p70S6K in Cytoplasm = 127.0725;  // uniprot:P23443
  species TSC_p_clx in Cytoplasm = 0;  // hasPart uniprot:P49815; hasPart uniprot:Q92574
  species PDK2 in Cytoplasm = 12.1175;  // uniprot:P49137; uniprot:P78527; uniprot:Q13315; uniprot:Q13153
  species PDK2_p in Cytoplasm = 0;  // uniprot:P78527; uniprot:Q13315; uniprot:Q13153; uniprot:P49137
  species PI3K_variant_p in Cytoplasm = 0;  // isVersionOf uniprot:P27986
  species PI3K_variant in Cytoplasm = PI3K;  // isVersionOf uniprot:P27986
  species $PI3K in Cytoplasm = 2.965;  // isVersionOf uniprot:P27986

  // Reactions:
  TSC_p_clx_dephosphorylation: TSC_p_clx => TSC_clx; Cytoplasm*TSC_p_clx_dephosphorylation_k1*TSC_p_clx;
    TSC_p_clx_dephosphorylation_k1 = 0.00812537;
  reaction_16: p70S6K + mTORC1_pS2448 => p70S6K_pT389 + mTORC1_pS2448; Cytoplasm*reaction_16_k1*p70S6K*mTORC1_pS2448; reaction_16 is "p70S6K_T389_phosphorylation_by_mTORC1_pS2448";
    reaction_16_k1 = 0.00573896;
  p70S6K_pT389_dephosphorylation: p70S6K_pT389 => p70S6K; Cytoplasm*p70S6K_pT389_dephosphorylation_k1*p70S6K_pT389;
    p70S6K_pT389_dephosphorylation_k1 = 0.00528455;
  reaction_22: IRS1_PI3K + p70S6K_pT389 => IRS1_pS636_PI3K + p70S6K_pT389; Cytoplasm*reaction_22_k1*IRS1_PI3K*p70S6K_pT389; reaction_22 is "IRS1_S636_phosphorylation_by_p70S6K_pT389";
    reaction_22_k1 = 1;
  reaction_23: IRS1_PI3K + IR_beta_pY1146 => IRS1_p_PI3K + IR_beta_pY1146; reaction_23_k1*IRS1_PI3K*IR_beta_pY1146; reaction_23 is "IRS1_PI3K_phosphorylation_by_IR_beta_pY1146";
    reaction_23_k1 = 0.134664;
  reaction_31: Akt + IRS1_p_PI3K => Akt_pT308 + IRS1_p_PI3K; Cytoplasm*reaction_31_k1*Akt*IRS1_p_PI3K; reaction_31 is "Akt_T308_phosphorylation_by_IRS1_phos_PI3K";
    reaction_31_k1 = 0.699505;
  reaction_32: Akt_pT308 + mTORC2_pS2481 => Akt_pT308_pS473 + mTORC2_pS2481; Cytoplasm*reaction_32_k1*Akt_pT308*mTORC2_pS2481; reaction_32 is "Akt_pT308_S473_phosphorylation_by_mTORC2_pS2481";
    reaction_32_k1 = 4.50769;
  reaction_33: TSC_clx + Akt_pT308 => TSC_p_clx + Akt_pT308; Cytoplasm*reaction_33_k1*TSC_clx*Akt_pT308; reaction_33 is "TSC_clx_phosphorylation_by_Akt_pT308";
    reaction_33_k1 = 0.00627315;
  reaction_40: mTORC1 + $Amino_Acids => mTORC1_pS2448; Cytoplasm*reaction_40_k1*mTORC1*Amino_Acids; reaction_40 is "mTORC1_S2448_activation_by_Amino_Acids";
    reaction_40_k1 = 0.0513784;
  IR_beta_Y1146_phosphorylation: IR_beta + $Insulin => IR_beta_pY1146; Membrane*IR_beta_Y1146_phosphorylation_k1*IR_beta*Insulin;
    IR_beta_Y1146_phosphorylation_k1 = 0.0253763;
  reaction_46: IRS1_p_PI3K + p70S6K_pT389 => IRS1_pS636_PI3K + p70S6K_pT389; Cytoplasm*reaction_46_k1*IRS1_p_PI3K*p70S6K_pT389; reaction_46 is "IRS1_p_pi3K_phosphorylation_by_p70S6K_pT389";
    reaction_46_k1 = 0.0001;
  IRS1_pS636_degradation: IRS1_pS636_PI3K => Sink; Cytoplasm*IRS1_pS636_degradation_k1*IRS1_pS636_PI3K;
    IRS1_pS636_degradation_k1 = 0.000100001;
  IRS1_p_PI3K_dephosphorylation: IRS1_p_PI3K => IRS1_PI3K; Cytoplasm*IRS1_p_PI3K_dephosphorylation_k1*IRS1_p_PI3K;
    IRS1_p_PI3K_dephosphorylation_k1 = 0.00328283;
  reaction_44: Akt_pT308_pS473 => Akt_pT308; Cytoplasm*reaction_44_k1*Akt_pT308_pS473; reaction_44 is "Akt_pT308_pS473_dephosphorylation";
    reaction_44_k1 = 7.52842;
  Akt_pT308_dephosphorylation: Akt_pT308 => Akt; Cytoplasm*Akt_pT308_dephosphorylation_k1*Akt_pT308;
    Akt_pT308_dephosphorylation_k1 = 4.0739;
  mTORC2_pS2481_dephosphorylation: mTORC2_pS2481 => mTORC2; Cytoplasm*mTORC2_pS2481_dephosphorylation_k1*mTORC2_pS2481;
    mTORC2_pS2481_dephosphorylation_k1 = 0.0255714;
  IR_beta_pY1146_dephosphorylation: IR_beta_pY1146 => IR_beta_refractory; Membrane*IR_beta_pY1146_dephosphorylation_k1*IR_beta_pY1146;
    IR_beta_pY1146_dephosphorylation_k1 = 0.149328;
  reaction_3: TSC_clx + Akt_pT308_pS473 => TSC_p_clx + Akt_pT308_pS473; Cytoplasm*reaction_3_k1*TSC_clx*Akt_pT308_pS473; reaction_3 is "TSC_clx_phosphorylation_by_Akt_pT308_pS473";
    reaction_3_k1 = 0.000100039;
  IRS1_synthesis: Sink => IRS1_PI3K; Cytoplasm*IRS1_synthesis_k1*Sink;
    IRS1_synthesis_k1 = 0.0999968;
  IR_beta_ready: IR_beta_refractory => IR_beta; Membrane*IR_beta_ready_k1*IR_beta_refractory;
    IR_beta_ready_k1 = 0.0309731;
  reaction_6: PRAS40 + Akt_pT308_pS473 => PRAS40_pT246 + Akt_pT308_pS473; Cytoplasm*reaction_6_k1*PRAS40*Akt_pT308_pS473; reaction_6 is "PRAS40_T246_phosphorylation_by_Akt_pT308_pS473";
    reaction_6_k1 = 0.000100001;
  reaction_7: mTORC1_pS2448 + TSC_clx => mTORC1 + TSC_clx; Cytoplasm*reaction_7_k1*mTORC1_pS2448*TSC_clx; reaction_7 is "mTORC1_pS2448_dephosphorylation_by_TSC_clx";
    reaction_7_k1 = 0.999989;
  reaction_8: PRAS40 + Akt_pT308 => PRAS40_pT246 + Akt_pT308; Cytoplasm*reaction_8_k1*PRAS40*Akt_pT308; reaction_8 is "PRAS40_T246_phosphorylation_by_Akt_pT308";
    reaction_8_k1 = 0.0239178;
  PRAS40_pT246_dephosphorylation: PRAS40_pT246 => PRAS40; Cytoplasm*PRAS40_pT246_dephosphorylation_k1*PRAS40_pT246;
    PRAS40_pT246_dephosphorylation_k1 = 0.999991;
  PRAS40_pS183_dephosphorylation: PRAS40_pS183 => PRAS40; Cytoplasm*PRAS40_pS183_dephosphorylation_k1*PRAS40_pS183;
    PRAS40_pS183_dephosphorylation_k1 = 0.403706;
  reaction_12: PRAS40 + mTORC1_pS2448 => PRAS40_pS183 + mTORC1_pS2448; Cytoplasm*reaction_12_k1*PRAS40*mTORC1_pS2448; reaction_12 is "PRAS40_S183_phosphorylation_by_mTORC1_pS2448";
    reaction_12_k1 = 0.073093;
  reaction_18: mTORC2 + PI3K_variant_p => mTORC2_pS2481 + PI3K_variant_p; Cytoplasm*reaction_18_k1*mTORC2*PI3K_variant_p; reaction_18 is "mTORC2_S2481_phosphorylation_by_PI3K_variant_p";
    reaction_18_k1 = 0.0318902;
  reaction_13: Akt_pT308 + PDK2_p => Akt_pT308_pS473 + PDK2_p; Cytoplasm*reaction_13_k1*Akt_pT308*PDK2_p; reaction_13 is "Akt_pT308_S473_phosphorylation_by_PDK2";
    reaction_13_k1 = 5.90372;
  PDK2_p_dephosphorylation: PDK2_p => PDK2; Cytoplasm*PDK2_p_dephosphorylation_k1*PDK2_p;
    PDK2_p_dephosphorylation_k1 = 1;
  PDK2_phosphorylation: PDK2 + IR_beta_pY1146 => PDK2_p + IR_beta_pY1146; PDK2_phosphorylation_k1*PDK2*IR_beta_pY1146;
    PDK2_phosphorylation_k1 = 0.1;
  reaction_19: PI3K_variant + IR_beta_pY1146 => PI3K_variant_p + IR_beta_pY1146; reaction_19_k1*PI3K_variant*IR_beta_pY1146; reaction_19 is "PI3K_variant_phosphorylation_by_IR_beta_pY1146";
    reaction_19_k1 = 0.999985;
  PI3K_variant_p_dephosphorylation: PI3K_variant_p => PI3K_variant; Cytoplasm*PI3K_variant_p_dephosphorylation_k1*PI3K_variant_p;
    PI3K_variant_p_dephosphorylation_k1 = 0.000232165;

  // Unit definitions:
  unit volume = dimensionless;
  unit time = 60 second;
  unit substance = dimensionless;
end
