// SBML level 2 version 4
// This model was downloaded from BioModels Database
// http://www.ebi.ac.uk/biomodels-static/

model MODEL1601290000()
  // Benson2013 - Identification of key drug targets in nerve growth factor pathway
  // This model is described in the article:
  // Systems pharmacology of the nerve growth factor pathway: use of a systems biology model for the identification of key drug targets using sensitivity analysis and the integration of physiology and pharmacology.
  // Benson N, Matsuura T, Smirnov S, Demin O, Jones HM, Dua P, van der Graaf PH.
  // Interface Focus 2013 Apr; 3(2): 20120071
  // Abstract:
  // The nerve growth factor (NGF) pathway is of great interest as a potential source of drug targets, for example in the management of certain types of pain. However, selecting targets from this pathway either by intuition or by non-contextual measures is likely to be challenging. An alternative approach is to construct a mathematical model of the system and via sensitivity analysis rank order the targets in the known pathway, with respect to an endpoint such as the diphosphorylated extracellular signal-regulated kinase concentration in the nucleus. Using the published literature, a model was created and, via sensitivity analysis, it was concluded that, after NGF itself, tropomyosin receptor kinase A (TrkA) was one of the most sensitive druggable targets. This initial model was subsequently used to develop a further model incorporating physiological and pharmacological parameters. This allowed the exploration of the characteristics required for a successful hypothetical TrkA inhibitor. Using these systems models, we were able to identify candidates for the optimal drug targets in the known pathway. These conclusions were consistent with clinical and human genetic data. We also found that incorporating appropriate physiological context was essential to drawing accurate conclusions about important parameters such as the drug dose required to give pathway inhibition. Furthermore, the importance of the concentration of key reactants such as TrkA kinase means that appropriate contextual data are required before clear conclusions can be drawn. Such models could be of great utility in selecting optimal targets and in the clinical evaluation of novel drugs.
  // This model is hosted on BioModels Database and identified by: BIOMD0000000588.
  // To cite BioModels Database, please use: BioModels Database: An enhanced, curated and annotated resource for published quantitative kinetic models.
  // To the extent possible under law, all copyright and related or neighbouring rights to this encoded model have been dedicated to the public domain worldwide. Please refer to CC0 Public Domain Dedication for more information.
  // biomodels.db:MODEL1601290000
  // biomodels.db:BIOMD0000000588
  // isDescribedBy pubmed:24427523
  // isDerivedFrom biomodels.db:BIOMD0000000049 pubmed:16418172
  // isVersionOf GO:0051387 GO:0038180
  // hasProperty EFO:0003843

  // Compartments:
  compartment Neuron = 0.001 MWBUILTINUNIT_liter;
  compartment Interstitial_fluid = 12 MWBUILTINUNIT_liter;

  // Species:
  species NGFR in Neuron = 0.06189368;  // substance in MWBUILTINPREFIX_micro_MWBUILTINUNIT_mole
  species L_NGFR in Neuron = 0;  // substance in MWBUILTINPREFIX_micro_MWBUILTINUNIT_mole
  species pTrkA in Neuron = 0;  // substance in MWBUILTINPREFIX_micro_MWBUILTINUNIT_mole
  species pTrkA_endo in Neuron = 0;  // substance in MWBUILTINPREFIX_micro_MWBUILTINUNIT_mole
  species Shc_pTrkA in Neuron = 0;  // substance in MWBUILTINPREFIX_micro_MWBUILTINUNIT_mole
  species Shc_pTrkA_endo in Neuron = 0;  // substance in MWBUILTINPREFIX_micro_MWBUILTINUNIT_mole
  species pShc_pTrkA in Neuron = 0;  // substance in MWBUILTINPREFIX_micro_MWBUILTINUNIT_mole
  species pShc_pTrkA_endo in Neuron = 0;  // substance in MWBUILTINPREFIX_micro_MWBUILTINUNIT_mole
  species Grb2_SOS_pShc_pTrkA in Neuron = 0;  // substance in MWBUILTINPREFIX_micro_MWBUILTINUNIT_mole
  species Grb2_SOS_pShc_pTrkA_endo in Neuron = 0;  // substance in MWBUILTINPREFIX_micro_MWBUILTINUNIT_mole
  species FRS2_pTrkA in Neuron = 0;  // substance in MWBUILTINPREFIX_micro_MWBUILTINUNIT_mole
  species FRS2_pTrkA_endo in Neuron = 0;  // substance in MWBUILTINPREFIX_micro_MWBUILTINUNIT_mole
  species pFRS2_pTrkA in Neuron = 0;  // substance in MWBUILTINPREFIX_micro_MWBUILTINUNIT_mole
  species pFRS2_pTrkA_endo in Neuron = 0;  // substance in MWBUILTINPREFIX_micro_MWBUILTINUNIT_mole
  species Crk_C3G_pFRS2_pTrkA in Neuron = 0;  // substance in MWBUILTINPREFIX_micro_MWBUILTINUNIT_mole
  species Crk_C3G_pFRS2_pTrkA_endo in Neuron = 0;  // substance in MWBUILTINPREFIX_micro_MWBUILTINUNIT_mole
  species Shc in Neuron = 1;  // substance in MWBUILTINPREFIX_micro_MWBUILTINUNIT_mole
  species Grb2_SOS_pShc in Neuron = 0;  // substance in MWBUILTINPREFIX_micro_MWBUILTINUNIT_mole
  species FRS2 in Neuron = 1;  // substance in MWBUILTINPREFIX_micro_MWBUILTINUNIT_mole
  species Crk_C3G in Neuron = 0.4980158;  // substance in MWBUILTINPREFIX_micro_MWBUILTINUNIT_mole
  species Dok in Neuron = 0.2993032;  // substance in MWBUILTINPREFIX_micro_MWBUILTINUNIT_mole
  species pDok in Neuron = 0.000612296;  // substance in MWBUILTINPREFIX_micro_MWBUILTINUNIT_mole
  species Grb2 in Neuron = 0.9373994;  // substance in MWBUILTINPREFIX_micro_MWBUILTINUNIT_mole
  species SOS in Neuron = 0.03739938;  // substance in MWBUILTINPREFIX_micro_MWBUILTINUNIT_mole
  species Grb2_SOS in Neuron = 0.06260062;  // substance in MWBUILTINPREFIX_micro_MWBUILTINUNIT_mole
  species Ras_GTP in Neuron = 0;  // substance in MWBUILTINPREFIX_micro_MWBUILTINUNIT_mole
  species Ras_GDP in Neuron = 0.1;  // substance in MWBUILTINPREFIX_micro_MWBUILTINUNIT_mole
  species B_Raf_Ras_GTP in Neuron = 0;  // substance in MWBUILTINPREFIX_micro_MWBUILTINUNIT_mole
  species B_Raf in Neuron = 0.2;  // substance in MWBUILTINPREFIX_micro_MWBUILTINUNIT_mole
  species c_Raf in Neuron = 0.5;  // substance in MWBUILTINPREFIX_micro_MWBUILTINUNIT_mole
  species Rap1_GTP in Neuron = 0;  // substance in MWBUILTINPREFIX_micro_MWBUILTINUNIT_mole
  species ppMEKcyt_ERKcyt in Neuron = 0;  // substance in MWBUILTINPREFIX_micro_MWBUILTINUNIT_mole
  species ppMEKcyt in Neuron = 0;  // substance in MWBUILTINPREFIX_micro_MWBUILTINUNIT_mole
  species ppERKcyt in Neuron = 0;  // substance in MWBUILTINPREFIX_micro_MWBUILTINUNIT_mole
  species dppERKcyt in Neuron = 0;  // substance in MWBUILTINPREFIX_micro_MWBUILTINUNIT_mole
  species MEKcyt in Neuron = 0.1469897;  // substance in MWBUILTINPREFIX_micro_MWBUILTINUNIT_mole
  species ERKcyt in Neuron = 0.02803697;  // substance in MWBUILTINPREFIX_micro_MWBUILTINUNIT_mole
  species MEKcyt_ERKcyt in Neuron = 0.1121076;  // substance in MWBUILTINPREFIX_micro_MWBUILTINUNIT_mole
  species pMEKcyt in Neuron = 0;  // substance in MWBUILTINPREFIX_micro_MWBUILTINUNIT_mole
  species pMEKcyt_ERKcyt in Neuron = 0;  // substance in MWBUILTINPREFIX_micro_MWBUILTINUNIT_mole
  species ppMEKnuc_ERKnuc in Neuron = 0;  // substance in MWBUILTINPREFIX_micro_MWBUILTINUNIT_mole
  species ppMEKnuc in Neuron = 0;  // substance in MWBUILTINPREFIX_micro_MWBUILTINUNIT_mole
  species ppERKnuc in Neuron = 0;  // substance in MWBUILTINPREFIX_micro_MWBUILTINUNIT_mole
  species dppERKnuc in Neuron = 0;  // substance in MWBUILTINPREFIX_micro_MWBUILTINUNIT_mole
  species MEKnuc in Neuron = 1.941234;  // substance in MWBUILTINPREFIX_micro_MWBUILTINUNIT_mole
  species ERKnuc in Neuron = 0.01599799;  // substance in MWBUILTINPREFIX_micro_MWBUILTINUNIT_mole
  species MEKnuc_ERKnuc in Neuron = 0.8432791;  // substance in MWBUILTINPREFIX_micro_MWBUILTINUNIT_mole
  species pMEKnuc in Neuron = 0;  // substance in MWBUILTINPREFIX_micro_MWBUILTINUNIT_mole
  species pMEKnuc_ERKnuc in Neuron = 0;  // substance in MWBUILTINPREFIX_micro_MWBUILTINUNIT_mole
  species c_Raf_Ras_GTP in Neuron = 0;  // substance in MWBUILTINPREFIX_micro_MWBUILTINUNIT_mole
  species B_Raf_Rap1_GTP in Neuron = 0;  // substance in MWBUILTINPREFIX_micro_MWBUILTINUNIT_mole
  species Rap1_GDP in Neuron = 0.2;  // substance in MWBUILTINPREFIX_micro_MWBUILTINUNIT_mole
  species Crk in Neuron = 0.5019842;  // substance in MWBUILTINPREFIX_micro_MWBUILTINUNIT_mole
  species C3G in Neuron = 0.001984189;  // substance in MWBUILTINPREFIX_micro_MWBUILTINUNIT_mole
  species pDok_RasGAP in Neuron = 8.45291e-5;  // substance in MWBUILTINPREFIX_micro_MWBUILTINUNIT_mole
  species RasGAP in Neuron = 0.09991547;  // substance in MWBUILTINPREFIX_micro_MWBUILTINUNIT_mole
  species Grb2_pSOS in Neuron = 0;  // substance in MWBUILTINPREFIX_micro_MWBUILTINUNIT_mole
  species pShc in Neuron = 0;  // substance in MWBUILTINPREFIX_micro_MWBUILTINUNIT_mole
  species pSOS in Neuron = 0;  // substance in MWBUILTINPREFIX_micro_MWBUILTINUNIT_mole
  species pFRS2 in Neuron = 0;  // substance in MWBUILTINPREFIX_micro_MWBUILTINUNIT_mole
  species trkaI_int in Neuron = 0;  // substance in MWBUILTINPREFIX_micro_MWBUILTINUNIT_mole
  species $pro_TrkA in Neuron = 0.020631;  // substance in MWBUILTINPREFIX_micro_MWBUILTINUNIT_mole
  species L_NGFR_I in Neuron = 0;  // substance in MWBUILTINPREFIX_micro_MWBUILTINUNIT_mole
  species NGFR_I in Neuron = 0;  // substance in MWBUILTINPREFIX_micro_MWBUILTINUNIT_mole
  species NGFR_I_deg in Neuron = 0;  // substance in MWBUILTINPREFIX_micro_MWBUILTINUNIT_mole
  species L_NGFR_I_deg in Neuron = 0;  // substance in MWBUILTINPREFIX_micro_MWBUILTINUNIT_mole
  species NGFR_interstitial_fluid in Interstitial_fluid = 5e-6;  // substance in MWBUILTINPREFIX_micro_MWBUILTINUNIT_mole
  species $source in Interstitial_fluid = 1;  // substance in MWBUILTINPREFIX_micro_MWBUILTINUNIT_mole
  species NGF in Interstitial_fluid = 3e-5;  // substance in MWBUILTINPREFIX_micro_MWBUILTINUNIT_mole
  species NGFdeg in Interstitial_fluid = 0;  // substance in MWBUILTINPREFIX_micro_MWBUILTINUNIT_mole
  species NGFR_L_interstitial_fluid in Interstitial_fluid = 0;  // substance in MWBUILTINPREFIX_micro_MWBUILTINUNIT_mole
  species tanezumab in Interstitial_fluid = 0;  // substance in MWBUILTINPREFIX_micro_MWBUILTINUNIT_mole; hasProperty CHEBI:52217
  species NGF_tanezumab in Interstitial_fluid = 0;  // substance in MWBUILTINPREFIX_micro_MWBUILTINUNIT_mole
  species tz_deg in Interstitial_fluid = 0;  // substance in MWBUILTINPREFIX_micro_MWBUILTINUNIT_mole
  species trkaI in Interstitial_fluid = 0;  // substance in MWBUILTINPREFIX_micro_MWBUILTINUNIT_mole
  species trkaI_deg in Interstitial_fluid = 0;  // substance in MWBUILTINPREFIX_micro_MWBUILTINUNIT_mole

  // Parameters:
  Km_104 = 15.657 MWBUILTINPREFIX_micro_MWBUILTINUNIT_molarity;
  Km_105 = 15.657 MWBUILTINPREFIX_micro_MWBUILTINUNIT_molarity;
  Km_106 = 15.657 MWBUILTINPREFIX_micro_MWBUILTINUNIT_molarity;
  Km_107 = 15.657 MWBUILTINPREFIX_micro_MWBUILTINUNIT_molarity;
  Km_108 = 0.02 MWBUILTINPREFIX_micro_MWBUILTINUNIT_molarity;
  Km_109 = 0.02 MWBUILTINPREFIX_micro_MWBUILTINUNIT_molarity;
  Km_39 = 0.1 MWBUILTINPREFIX_micro_MWBUILTINUNIT_molarity;
  Km_40 = 0.1 MWBUILTINPREFIX_micro_MWBUILTINUNIT_molarity;
  Km_41 = 0.1 MWBUILTINPREFIX_micro_MWBUILTINUNIT_molarity;
  Km_42 = 0.1 MWBUILTINPREFIX_micro_MWBUILTINUNIT_molarity;
  Km_43 = 0.1 MWBUILTINPREFIX_micro_MWBUILTINUNIT_molarity;
  Km_44 = 0.1 MWBUILTINPREFIX_micro_MWBUILTINUNIT_molarity;
  Km_45 = 0.1 MWBUILTINPREFIX_micro_MWBUILTINUNIT_molarity;
  Km_58 = 0.02 MWBUILTINPREFIX_micro_MWBUILTINUNIT_molarity;
  Km_59 = 25.641 MWBUILTINPREFIX_micro_MWBUILTINUNIT_molarity;
  Km_60 = 25.641 MWBUILTINPREFIX_micro_MWBUILTINUNIT_molarity;
  Km_61 = 25.641 MWBUILTINPREFIX_micro_MWBUILTINUNIT_molarity;
  Km_62 = 1 MWBUILTINPREFIX_micro_MWBUILTINUNIT_molarity;
  Km_63 = 1 MWBUILTINPREFIX_micro_MWBUILTINUNIT_molarity;
  Km_64 = 1 MWBUILTINPREFIX_micro_MWBUILTINUNIT_molarity;
  Km_70 = 0.01 MWBUILTINPREFIX_micro_MWBUILTINUNIT_molarity;
  Km_71 = 1 MWBUILTINPREFIX_micro_MWBUILTINUNIT_molarity;
  Km_72 = 1 MWBUILTINPREFIX_micro_MWBUILTINUNIT_molarity;
  Km_81 = 0.16 MWBUILTINPREFIX_micro_MWBUILTINUNIT_molarity;
  Km_82 = 0.16 MWBUILTINPREFIX_micro_MWBUILTINUNIT_molarity;
  Km_83 = 0.16 MWBUILTINPREFIX_micro_MWBUILTINUNIT_molarity;
  Km_84 = 0.16 MWBUILTINPREFIX_micro_MWBUILTINUNIT_molarity;
  Km_85 = 0.16 MWBUILTINPREFIX_micro_MWBUILTINUNIT_molarity;
  Km_86 = 0.16 MWBUILTINPREFIX_micro_MWBUILTINUNIT_molarity;
  Km_87 = 0.16 MWBUILTINPREFIX_micro_MWBUILTINUNIT_molarity;
  Km_88 = 0.16 MWBUILTINPREFIX_micro_MWBUILTINUNIT_molarity;
  Km_89 = 0.16 MWBUILTINPREFIX_micro_MWBUILTINUNIT_molarity;
  Km_90 = 0.16 MWBUILTINPREFIX_micro_MWBUILTINUNIT_molarity;
  Km_91 = 0.16 MWBUILTINPREFIX_micro_MWBUILTINUNIT_molarity;
  Km_92 = 0.16 MWBUILTINPREFIX_micro_MWBUILTINUNIT_molarity;
  Km_93 = 15.657 MWBUILTINPREFIX_micro_MWBUILTINUNIT_molarity;
  Km_94 = 15.657 MWBUILTINPREFIX_micro_MWBUILTINUNIT_molarity;
  Km_95 = 15.657 MWBUILTINPREFIX_micro_MWBUILTINUNIT_molarity;
  Km_96 = 15.657 MWBUILTINPREFIX_micro_MWBUILTINUNIT_molarity;
  Km_97 = 0.02 MWBUILTINPREFIX_micro_MWBUILTINUNIT_molarity;
  Km_98 = 0.02 MWBUILTINPREFIX_micro_MWBUILTINUNIT_molarity;
  MKP3cyt = 0.018 MWBUILTINPREFIX_micro_MWBUILTINUNIT_molarity;
  MKP3nuc = 0.006 MWBUILTINPREFIX_micro_MWBUILTINUNIT_molarity;
  PP2Acyt = 0.24 MWBUILTINPREFIX_micro_MWBUILTINUNIT_molarity;
  PP2Anuc = 0.08 MWBUILTINPREFIX_micro_MWBUILTINUNIT_molarity;
  Rap1GAP = 0.012 MWBUILTINPREFIX_micro_MWBUILTINUNIT_molarity;
  Vmax_104 = 180 MWDERIVEDUNIT_1__minute;
  Vmax_105 = 180 MWDERIVEDUNIT_1__minute;
  Vmax_106 = 180 MWDERIVEDUNIT_1__minute;
  Vmax_107 = 180 MWDERIVEDUNIT_1__minute;
  Vmax_108 = 3.6 MWDERIVEDUNIT_1__minute;
  Vmax_109 = 3.6 MWDERIVEDUNIT_1__minute;
  Vmax_39 = 1.2 MWDERIVEDUNIT_1__minute;
  Vmax_40 = 1.2 MWDERIVEDUNIT_1__minute;
  Vmax_41 = 1.2 MWDERIVEDUNIT_1__minute;
  Vmax_42 = 1.2 MWDERIVEDUNIT_1__minute;
  Vmax_43 = 1.2 MWDERIVEDUNIT_1__minute;
  Vmax_44 = 1.2 MWDERIVEDUNIT_1__minute;
  Vmax_45 = 1.2 MWDERIVEDUNIT_1__minute;
  Vmax_58 = 120 MWDERIVEDUNIT_1__minute;
  Vmax_59 = 60 MWDERIVEDUNIT_1__minute;
  Vmax_60 = 60 MWDERIVEDUNIT_1__minute;
  Vmax_61 = 60 MWDERIVEDUNIT_1__minute;
  Vmax_62 = 600 MWDERIVEDUNIT_1__minute;
  Vmax_63 = 600 MWDERIVEDUNIT_1__minute;
  Vmax_64 = 600 MWDERIVEDUNIT_1__minute;
  Vmax_70 = 2.88 MWDERIVEDUNIT_1__minute;
  Vmax_71 = 120 MWDERIVEDUNIT_1__minute;
  Vmax_72 = 120 MWDERIVEDUNIT_1__minute;
  Vmax_81 = 30 MWDERIVEDUNIT_1__minute;
  Vmax_82 = 30 MWDERIVEDUNIT_1__minute;
  Vmax_83 = 30 MWDERIVEDUNIT_1__minute;
  Vmax_84 = 30 MWDERIVEDUNIT_1__minute;
  Vmax_85 = 12 MWDERIVEDUNIT_1__minute;
  Vmax_86 = 12 MWDERIVEDUNIT_1__minute;
  Vmax_87 = 12 MWDERIVEDUNIT_1__minute;
  Vmax_88 = 12 MWDERIVEDUNIT_1__minute;
  Vmax_89 = 18 MWDERIVEDUNIT_1__minute;
  Vmax_90 = 18 MWDERIVEDUNIT_1__minute;
  Vmax_91 = 18 MWDERIVEDUNIT_1__minute;
  Vmax_92 = 18 MWDERIVEDUNIT_1__minute;
  Vmax_93 = 180 MWDERIVEDUNIT_1__minute;
  Vmax_94 = 180 MWDERIVEDUNIT_1__minute;
  Vmax_95 = 180 MWDERIVEDUNIT_1__minute;
  Vmax_96 = 180 MWDERIVEDUNIT_1__minute;
  Vmax_97 = 3.6 MWDERIVEDUNIT_1__minute;
  Vmax_98 = 3.6 MWDERIVEDUNIT_1__minute;
  kb_1 = 0.0166668 MWDERIVEDUNIT_1__minute;
  kb_100 = 4.5 MWDERIVEDUNIT_1__minute;
  kb_101 = 36 MWDERIVEDUNIT_1__minute;
  kb_102 = 36 MWDERIVEDUNIT_1__minute;
  kb_103 = 36 MWDERIVEDUNIT_1__minute;
  kb_18 = 12 MWDERIVEDUNIT_1__minute;
  kb_19 = 12 MWDERIVEDUNIT_1__minute;
  kb_20 = 12 MWDERIVEDUNIT_1__minute;
  kb_21 = 12 MWDERIVEDUNIT_1__minute;
  kb_22 = 12 MWDERIVEDUNIT_1__minute;
  kb_23 = 12 MWDERIVEDUNIT_1__minute;
  kb_24 = 6 MWDERIVEDUNIT_1__minute;
  kb_25 = 6 MWDERIVEDUNIT_1__minute;
  kb_26 = 6 MWDERIVEDUNIT_1__minute;
  kb_27 = 6 MWDERIVEDUNIT_1__minute;
  kb_46 = 1.008 MWDERIVEDUNIT_1__minute;
  kb_47 = 1.008 MWDERIVEDUNIT_1__minute;
  kb_48 = 12 MWDERIVEDUNIT_1__minute;
  kb_49 = 12 MWDERIVEDUNIT_1__minute;
  kb_50 = 12 MWDERIVEDUNIT_1__minute;
  kb_55 = 1.99999998 MWDERIVEDUNIT_1__minute;
  kb_56 = 0.0006 MWDERIVEDUNIT_1__minute;
  kb_65 = 0.12 MWDERIVEDUNIT_1__minute;
  kb_66 = 12 MWDERIVEDUNIT_1__minute;
  kb_67 = 12 MWDERIVEDUNIT_1__minute;
  kb_73 = 30 MWDERIVEDUNIT_1__minute;
  kb_74 = 30 MWDERIVEDUNIT_1__minute;
  kb_75 = 30 MWDERIVEDUNIT_1__minute;
  kb_77 = 4.5 MWDERIVEDUNIT_1__minute;
  kb_78 = 36 MWDERIVEDUNIT_1__minute;
  kb_79 = 36 MWDERIVEDUNIT_1__minute;
  kb_80 = 36 MWDERIVEDUNIT_1__minute;
  kf_1 = 0.049998 MWDERIVEDUNIT_1__minute;
  kf_10 = 0.0378 MWDERIVEDUNIT_1__minute;
  kf_100 = 600 MWDERIVEDUNIT_1__micromolarity_minute;
  kf_101 = 978.24 MWDERIVEDUNIT_1__micromolarity_minute;
  kf_102 = 978.24 MWDERIVEDUNIT_1__micromolarity_minute;
  kf_103 = 978.24 MWDERIVEDUNIT_1__micromolarity_minute;
  kf_11 = 0.0252 MWDERIVEDUNIT_1__minute;
  kf_110 = 6.48 MWDERIVEDUNIT_1__minute;
  kf_111 = 32.4 MWDERIVEDUNIT_1__minute;
  kf_112 = 0.48 MWDERIVEDUNIT_1__minute;
  kf_113 = 2.4 MWDERIVEDUNIT_1__minute;
  kf_114 = 3.12 MWDERIVEDUNIT_1__minute;
  kf_115 = 15.6 MWDERIVEDUNIT_1__minute;
  kf_116 = 0.42 MWDERIVEDUNIT_1__minute;
  kf_117 = 2.1 MWDERIVEDUNIT_1__minute;
  kf_118 = 0.216 MWDERIVEDUNIT_1__minute;
  kf_119 = 1.08 MWDERIVEDUNIT_1__minute;
  kf_12 = 0.0252 MWDERIVEDUNIT_1__minute;
  kf_120 = 0.1032 MWDERIVEDUNIT_1__minute;
  kf_121 = 0.516 MWDERIVEDUNIT_1__minute;
  kf_122 = 7.32 MWDERIVEDUNIT_1__minute;
  kf_123 = 36.6 MWDERIVEDUNIT_1__minute;
  kf_124 = 0.552 MWDERIVEDUNIT_1__minute;
  kf_125 = 2.76 MWDERIVEDUNIT_1__minute;
  kf_126 = 0.156 MWDERIVEDUNIT_1__minute;
  kf_127 = 0.78 MWDERIVEDUNIT_1__minute;
  kf_128 = 0.084 MWDERIVEDUNIT_1__minute;
  kf_129 = 0.42 MWDERIVEDUNIT_1__minute;
  kf_13 = 0.0252 MWDERIVEDUNIT_1__minute;
  kf_130 = 6.48 MWDERIVEDUNIT_1__minute;
  kf_131 = 32.4 MWDERIVEDUNIT_1__minute;
  kf_132 = 0.48 MWDERIVEDUNIT_1__minute;
  kf_133 = 2.4 MWDERIVEDUNIT_1__minute;
  kf_134 = 3.12 MWDERIVEDUNIT_1__minute;
  kf_135 = 15.6 MWDERIVEDUNIT_1__minute;
  kf_136 = 0.42 MWDERIVEDUNIT_1__minute;
  kf_137 = 2.1 MWDERIVEDUNIT_1__minute;
  kf_138 = 0.156 MWDERIVEDUNIT_1__minute;
  kf_139 = 0.78 MWDERIVEDUNIT_1__minute;
  kf_14 = 0.0252 MWDERIVEDUNIT_1__minute;
  kf_140 = 0.084 MWDERIVEDUNIT_1__minute;
  kf_141 = 0.42 MWDERIVEDUNIT_1__minute;
  kf_142 = 3.12 MWDERIVEDUNIT_1__minute;
  kf_143 = 15.6 MWDERIVEDUNIT_1__minute;
  kf_144 = 0.42 MWDERIVEDUNIT_1__minute;
  kf_145 = 2.1 MWDERIVEDUNIT_1__minute;
  kf_15 = 0.0252 MWDERIVEDUNIT_1__minute;
  kf_16 = 0.0252 MWDERIVEDUNIT_1__minute;
  kf_17 = 0.0252 MWDERIVEDUNIT_1__minute;
  kf_19 = 600 MWDERIVEDUNIT_1__micromolarity_minute;
  kf_20 = 600 MWDERIVEDUNIT_1__micromolarity_minute;
  kf_21 = 600 MWDERIVEDUNIT_1__micromolarity_minute;
  kf_22 = 600 MWDERIVEDUNIT_1__micromolarity_minute;
  kf_23 = 600 MWDERIVEDUNIT_1__micromolarity_minute;
  kf_24 = 300 MWDERIVEDUNIT_1__micromolarity_minute;
  kf_25 = 300 MWDERIVEDUNIT_1__micromolarity_minute;
  kf_26 = 300 MWDERIVEDUNIT_1__micromolarity_minute;
  kf_27 = 300 MWDERIVEDUNIT_1__micromolarity_minute;
  kf_28 = 6 MWDERIVEDUNIT_1__minute;
  kf_29 = 6 MWDERIVEDUNIT_1__minute;
  kf_3 = 60 MWDERIVEDUNIT_1__minute;
  kf_30 = 120 MWDERIVEDUNIT_1__minute;
  kf_31 = 120 MWDERIVEDUNIT_1__minute;
  kf_32 = 0.132 MWDERIVEDUNIT_1__minute;
  kf_33 = 0.132 MWDERIVEDUNIT_1__minute;
  kf_34 = 0.132 MWDERIVEDUNIT_1__minute;
  kf_35 = 0.132 MWDERIVEDUNIT_1__minute;
  kf_36 = 0.132 MWDERIVEDUNIT_1__minute;
  kf_37 = 0.132 MWDERIVEDUNIT_1__minute;
  kf_38 = 0.132 MWDERIVEDUNIT_1__minute;
  kf_4 = 0.0378 MWDERIVEDUNIT_1__minute;
  kf_46 = 1.8 MWDERIVEDUNIT_1__micromolarity_minute;
  kf_47 = 1.8 MWDERIVEDUNIT_1__micromolarity_minute;
  kf_48 = 600 MWDERIVEDUNIT_1__micromolarity_minute;
  kf_49 = 600 MWDERIVEDUNIT_1__micromolarity_minute;
  kf_5 = 0.0378 MWDERIVEDUNIT_1__minute;
  kf_50 = 600 MWDERIVEDUNIT_1__micromolarity_minute;
  kf_51 = 0.3 MWDERIVEDUNIT_1__minute;
  kf_52 = 0.3 MWDERIVEDUNIT_1__minute;
  kf_53 = 0.12 MWDERIVEDUNIT_1__minute;
  kf_54 = 0.12 MWDERIVEDUNIT_1__minute;
  kf_55 = 3 MWDERIVEDUNIT_1__micromolarity_minute;
  kf_56 = 0.12 MWDERIVEDUNIT_1__minute;
  kf_57 = 0.0070002 MWDERIVEDUNIT_1__minute;
  kf_6 = 0.0378 MWDERIVEDUNIT_1__minute;
  kf_65 = 60 MWDERIVEDUNIT_1__micromolarity_minute;
  kf_66 = 60 MWDERIVEDUNIT_1__micromolarity_minute;
  kf_67 = 60 MWDERIVEDUNIT_1__micromolarity_minute;
  kf_68 = 0.3 MWDERIVEDUNIT_1__minute;
  kf_69 = 0.006996 MWDERIVEDUNIT_1__minute;
  kf_7 = 0.0378 MWDERIVEDUNIT_1__minute;
  kf_73 = 3600 MWDERIVEDUNIT_1__micromolarity_minute;
  kf_74 = 3600 MWDERIVEDUNIT_1__micromolarity_minute;
  kf_75 = 3600 MWDERIVEDUNIT_1__micromolarity_minute;
  kf_76 = 9 MWDERIVEDUNIT_1__minute;
  kf_77 = 600 MWDERIVEDUNIT_1__micromolarity_minute;
  kf_78 = 978.24 MWDERIVEDUNIT_1__micromolarity_minute;
  kf_79 = 978.24 MWDERIVEDUNIT_1__micromolarity_minute;
  kf_8 = 0.0378 MWDERIVEDUNIT_1__minute;
  kf_80 = 978.24 MWDERIVEDUNIT_1__micromolarity_minute;
  kf_9 = 0.0378 MWDERIVEDUNIT_1__minute;
  kf_99 = 9 MWDERIVEDUNIT_1__minute;
  kf_18 = 600 MWDERIVEDUNIT_1__micromolarity_minute;

  // Reactions:
  R1: $pro_TrkA -> NGFR + $pro_TrkA; kf_1*pro_TrkA - kb_1*NGFR;  // fast
  R3: L_NGFR => pTrkA; kf_3*L_NGFR;  // fast
  R4: pTrkA => pTrkA_endo; kf_4*pTrkA;  // fast
  R5: Shc_pTrkA => Shc_pTrkA_endo; kf_5*Shc_pTrkA;  // fast
  R6: pShc_pTrkA => pShc_pTrkA_endo; kf_6*pShc_pTrkA;  // fast
  R7: Grb2_SOS_pShc_pTrkA => Grb2_SOS_pShc_pTrkA_endo; kf_7*Grb2_SOS_pShc_pTrkA;  // fast
  R8: FRS2_pTrkA => FRS2_pTrkA_endo; kf_8*FRS2_pTrkA;  // fast
  R9: pFRS2_pTrkA => pFRS2_pTrkA_endo; kf_9*pFRS2_pTrkA;  // fast
  R10: Crk_C3G_pFRS2_pTrkA => Crk_C3G_pFRS2_pTrkA_endo; kf_10*Crk_C3G_pFRS2_pTrkA;  // fast
  R11: pTrkA_endo => ; kf_11*pTrkA_endo;  // fast
  R12: Shc_pTrkA_endo => Shc; kf_12*Shc_pTrkA_endo;  // fast
  R13: pShc_pTrkA_endo => pShc; kf_13*pShc_pTrkA_endo;  // fast
  R14: Grb2_SOS_pShc_pTrkA_endo => Grb2_SOS_pShc; kf_14*Grb2_SOS_pShc_pTrkA_endo;  // fast
  R15: FRS2_pTrkA_endo => FRS2; kf_15*FRS2_pTrkA_endo;  // fast
  R16: pFRS2_pTrkA_endo => pFRS2; kf_16*pFRS2_pTrkA_endo;  // fast
  R17: Crk_C3G_pFRS2_pTrkA_endo => Crk_C3G + pFRS2; kf_17*Crk_C3G_pFRS2_pTrkA_endo;  // fast
  R18: pTrkA + Shc => Shc_pTrkA; kf_18*Shc*pTrkA - kb_18*Shc_pTrkA;  // fast
  R19: pTrkA + pShc => pShc_pTrkA; kf_19*pShc*pTrkA - kb_19*pShc_pTrkA;  // fast
  R20: pTrkA + Grb2_SOS_pShc => Grb2_SOS_pShc_pTrkA; kf_20*Grb2_SOS_pShc*pTrkA - kb_20*Grb2_SOS_pShc_pTrkA;  // fast
  R21: pTrkA_endo + Shc => Shc_pTrkA_endo; kf_21*Shc*pTrkA_endo - kb_21*Shc_pTrkA_endo;  // fast
  R22: pTrkA_endo + pShc => pShc_pTrkA_endo; kf_22*pShc*pTrkA_endo - kb_22*pShc_pTrkA_endo;  // fast
  R23: pTrkA_endo + Grb2_SOS_pShc => Grb2_SOS_pShc_pTrkA_endo; kf_23*Grb2_SOS_pShc*pTrkA_endo - kb_23*Grb2_SOS_pShc_pTrkA_endo;  // fast
  R24: pTrkA + FRS2 => FRS2_pTrkA; kf_24*FRS2*pTrkA - kb_24*FRS2_pTrkA;  // fast
  R25: pTrkA + pFRS2 => pFRS2_pTrkA; kf_25*pFRS2*pTrkA - kb_25*pFRS2_pTrkA;  // fast
  R26: pTrkA_endo + FRS2 => FRS2_pTrkA_endo; kf_26*FRS2*pTrkA_endo - kb_26*FRS2_pTrkA_endo;  // fast
  R27: pTrkA_endo + pFRS2 => pFRS2_pTrkA_endo; kf_27*pFRS2*pTrkA_endo - kb_27*pFRS2_pTrkA_endo;  // fast
  R28: Shc_pTrkA => pShc_pTrkA; kf_28*Shc_pTrkA;  // fast
  R29: Shc_pTrkA_endo => pShc_pTrkA_endo; kf_29*Shc_pTrkA_endo;  // fast
  R30: FRS2_pTrkA => pFRS2_pTrkA; kf_30*FRS2_pTrkA;  // fast
  R31: FRS2_pTrkA_endo => pFRS2_pTrkA_endo; kf_31*FRS2_pTrkA_endo;  // fast
  R32: pTrkA => ; kf_32*pTrkA;  // fast
  R33: Shc_pTrkA => Shc; kf_33*Shc_pTrkA;  // fast
  R34: pShc_pTrkA => pShc; kf_34*pShc_pTrkA;  // fast
  R35: Grb2_SOS_pShc_pTrkA => Grb2_SOS_pShc; kf_35*Grb2_SOS_pShc_pTrkA;  // fast
  R36: FRS2_pTrkA => FRS2; kf_36*FRS2_pTrkA;  // fast
  R37: pFRS2_pTrkA => pFRS2; kf_37*pFRS2_pTrkA;  // fast
  R38: Crk_C3G_pFRS2_pTrkA => Crk_C3G + pFRS2; kf_38*Crk_C3G_pFRS2_pTrkA;  // fast
  R39: Dok + pTrkA => pDok + pTrkA; Vmax_39*pTrkA*Dok/(Km_39 + Dok);  // fast
  R40: Dok + Shc_pTrkA => pDok + Shc_pTrkA; Vmax_40*Shc_pTrkA*Dok/(Km_40 + Dok);  // fast
  R41: Dok + pShc_pTrkA => pDok + pShc_pTrkA; Vmax_41*pShc_pTrkA*Dok/(Km_41 + Dok);  // fast
  R42: Dok + Grb2_SOS_pShc_pTrkA => pDok + Grb2_SOS_pShc_pTrkA; Vmax_42*Grb2_SOS_pShc_pTrkA*Dok/(Km_42 + Dok);  // fast
  R43: Dok + FRS2_pTrkA => pDok + FRS2_pTrkA; Vmax_43*FRS2_pTrkA*Dok/(Km_43 + Dok);  // fast
  R44: Dok + pFRS2_pTrkA => pDok + pFRS2_pTrkA; Vmax_44*pFRS2_pTrkA*Dok/(Km_44 + Dok);  // fast
  R45: Dok + Crk_C3G_pFRS2_pTrkA => pDok + Crk_C3G_pFRS2_pTrkA; Vmax_45*Crk_C3G_pFRS2_pTrkA*Dok/(Km_45 + Dok);  // fast
  R46: Grb2 + SOS => Grb2_SOS; kf_46*Grb2*SOS - kb_46*Grb2_SOS;  // fast
  R47: Grb2 + pSOS => Grb2_pSOS; kf_47*Grb2*pSOS - kb_47*Grb2_pSOS;  // fast
  R48: Grb2_SOS + pShc => Grb2_SOS_pShc; kf_48*Grb2_SOS*pShc - kb_48*Grb2_SOS_pShc;  // fast
  R49: pShc_pTrkA + Grb2_SOS => Grb2_SOS_pShc_pTrkA; kf_49*Grb2_SOS*pShc_pTrkA - kb_49*Grb2_SOS_pShc_pTrkA;  // fast
  R50: pShc_pTrkA_endo + Grb2_SOS => Grb2_SOS_pShc_pTrkA_endo; kf_50*Grb2_SOS*pShc_pTrkA_endo - kb_50*Grb2_SOS_pShc_pTrkA_endo;  // fast
  R51: pShc => Shc; kf_51*pShc;  // fast
  R52: Grb2_SOS_pShc => Shc + Grb2_SOS; kf_52*Grb2_SOS_pShc;  // fast
  R53: pSOS => SOS; kf_53*pSOS;  // fast
  R54: Grb2_pSOS => Grb2_SOS; kf_54*Grb2_pSOS;  // fast
  R55: pDok + RasGAP => pDok_RasGAP; kf_55*pDok*RasGAP - kb_55*pDok_RasGAP;  // fast
  R56: pDok => Dok; kf_56*pDok - kb_56*Dok;  // fast
  R57: Ras_GTP => Ras_GDP; kf_57*Ras_GTP;  // fast
  R58: Ras_GDP + Grb2_SOS_pShc_pTrkA => Ras_GTP + Grb2_SOS_pShc_pTrkA; Vmax_58*Grb2_SOS_pShc_pTrkA*Ras_GDP/(Km_58 + Ras_GDP);  // fast
  R59: SOS + dppERKcyt => pSOS + dppERKcyt; Vmax_59*dppERKcyt*SOS/(Km_59 + SOS);  // fast
  R60: Grb2_SOS_pShc + dppERKcyt => Grb2_pSOS + pShc + dppERKcyt; Vmax_60*dppERKcyt*Grb2_SOS_pShc/(Km_60 + Grb2_SOS_pShc);  // fast
  R61: Grb2_SOS + dppERKcyt => Grb2_pSOS + dppERKcyt; Vmax_61*dppERKcyt*Grb2_SOS/(Km_61 + Grb2_SOS);  // fast
  R62: Ras_GTP + pDok_RasGAP => Ras_GDP + pDok_RasGAP; Vmax_62*pDok_RasGAP*Ras_GTP/(Km_62 + Ras_GTP);  // fast
  R63: B_Raf_Ras_GTP + pDok_RasGAP => Ras_GDP + B_Raf + pDok_RasGAP; Vmax_63*pDok_RasGAP*B_Raf_Ras_GTP/(Km_63 + B_Raf_Ras_GTP);  // fast
  R64: c_Raf_Ras_GTP + pDok_RasGAP => Ras_GDP + c_Raf + pDok_RasGAP; Vmax_64*pDok_RasGAP*c_Raf_Ras_GTP/(Km_64 + c_Raf_Ras_GTP);  // fast
  R65: Crk + C3G => Crk_C3G; kf_65*C3G*Crk - kb_65*Crk_C3G;  // fast
  R66: pFRS2_pTrkA + Crk_C3G => Crk_C3G_pFRS2_pTrkA; kf_66*Crk_C3G*pFRS2_pTrkA - kb_66*Crk_C3G_pFRS2_pTrkA;  // fast
  R67: pFRS2_pTrkA_endo + Crk_C3G => Crk_C3G_pFRS2_pTrkA_endo; kf_67*Crk_C3G*pFRS2_pTrkA_endo - kb_67*Crk_C3G_pFRS2_pTrkA_endo;  // fast
  R68: pFRS2 => FRS2; kf_68*pFRS2;  // fast
  R69: Rap1_GTP => Rap1_GDP; kf_69*Rap1_GTP;  // fast
  R70: Rap1_GDP + Crk_C3G_pFRS2_pTrkA_endo => Rap1_GTP + Crk_C3G_pFRS2_pTrkA_endo; Vmax_70*Crk_C3G_pFRS2_pTrkA_endo*Rap1_GDP/(Km_70 + Rap1_GDP);  // fast
  R71: Rap1_GTP => Rap1_GDP; Vmax_71*Rap1GAP*Rap1_GTP/(Km_71 + Rap1_GTP);  // fast
  R72: B_Raf_Rap1_GTP => B_Raf + Rap1_GDP; Vmax_72*Rap1GAP*B_Raf_Rap1_GTP/(Km_72 + B_Raf_Rap1_GTP);  // fast
  R73: Ras_GTP + c_Raf => c_Raf_Ras_GTP; kf_73*c_Raf*Ras_GTP - kb_73*c_Raf_Ras_GTP;  // fast
  R74: Ras_GTP + B_Raf => B_Raf_Ras_GTP; kf_74*B_Raf*Ras_GTP - kb_74*B_Raf_Ras_GTP;  // fast
  R75: B_Raf + Rap1_GTP => B_Raf_Rap1_GTP; kf_75*B_Raf*Rap1_GTP - kb_75*B_Raf_Rap1_GTP;  // fast
  R76: ppMEKcyt_ERKcyt => ppMEKcyt + ppERKcyt; kf_76*ppMEKcyt_ERKcyt;  // fast
  R77: 2 ppERKcyt => dppERKcyt; kf_77*ppERKcyt*ppERKcyt - kb_77*dppERKcyt;  // fast
  R78: MEKcyt + ERKcyt => MEKcyt_ERKcyt; kf_78*MEKcyt*ERKcyt - kb_78*MEKcyt_ERKcyt;  // fast
  R79: ERKcyt + pMEKcyt => pMEKcyt_ERKcyt; kf_79*pMEKcyt*ERKcyt - kb_79*pMEKcyt_ERKcyt;  // fast
  R80: ppMEKcyt + ERKcyt => ppMEKcyt_ERKcyt; kf_80*ppMEKcyt*ERKcyt - kb_80*ppMEKcyt_ERKcyt;  // fast
  R81: MEKcyt + c_Raf_Ras_GTP => pMEKcyt + c_Raf_Ras_GTP; Vmax_81*c_Raf_Ras_GTP*MEKcyt/(Km_81 + MEKcyt);  // fast
  R82: pMEKcyt + c_Raf_Ras_GTP => ppMEKcyt + c_Raf_Ras_GTP; Vmax_82*c_Raf_Ras_GTP*pMEKcyt/(Km_82 + pMEKcyt);  // fast
  R83: MEKcyt_ERKcyt + c_Raf_Ras_GTP => pMEKcyt_ERKcyt + c_Raf_Ras_GTP; Vmax_83*c_Raf_Ras_GTP*MEKcyt_ERKcyt/(Km_83 + MEKcyt_ERKcyt);  // fast
  R84: pMEKcyt_ERKcyt + c_Raf_Ras_GTP => ppMEKcyt_ERKcyt + c_Raf_Ras_GTP; Vmax_84*c_Raf_Ras_GTP*pMEKcyt_ERKcyt/(Km_84 + pMEKcyt_ERKcyt);  // fast
  R85: MEKcyt + B_Raf_Ras_GTP => pMEKcyt + B_Raf_Ras_GTP; Vmax_85*B_Raf_Ras_GTP*MEKcyt/(Km_85 + MEKcyt);  // fast
  R86: pMEKcyt + B_Raf_Ras_GTP => ppMEKcyt + B_Raf_Ras_GTP; Vmax_86*B_Raf_Ras_GTP*pMEKcyt/(Km_86 + pMEKcyt);  // fast
  R87: MEKcyt_ERKcyt + B_Raf_Ras_GTP => pMEKcyt_ERKcyt + B_Raf_Ras_GTP; Vmax_87*B_Raf_Ras_GTP*MEKcyt_ERKcyt/(Km_87 + MEKcyt_ERKcyt);  // fast
  R88: pMEKcyt_ERKcyt + B_Raf_Ras_GTP => ppMEKcyt_ERKcyt + B_Raf_Ras_GTP; Vmax_88*B_Raf_Ras_GTP*pMEKcyt_ERKcyt/(Km_88 + pMEKcyt_ERKcyt);  // fast
  R89: MEKcyt + B_Raf_Rap1_GTP => pMEKcyt + B_Raf_Rap1_GTP; Vmax_89*B_Raf_Rap1_GTP*MEKcyt/(Km_89 + MEKcyt);  // fast
  R90: pMEKcyt + B_Raf_Rap1_GTP => ppMEKcyt + B_Raf_Rap1_GTP; Vmax_90*B_Raf_Rap1_GTP*pMEKcyt/(Km_90 + pMEKcyt);  // fast
  R91: MEKcyt_ERKcyt + B_Raf_Rap1_GTP => pMEKcyt_ERKcyt + B_Raf_Rap1_GTP; Vmax_91*B_Raf_Rap1_GTP*MEKcyt_ERKcyt/(Km_91 + MEKcyt_ERKcyt);  // fast
  R92: pMEKcyt_ERKcyt + B_Raf_Rap1_GTP => ppMEKcyt_ERKcyt + B_Raf_Rap1_GTP; Vmax_92*B_Raf_Rap1_GTP*pMEKcyt_ERKcyt/(Km_92 + pMEKcyt_ERKcyt);  // fast
  R93: pMEKcyt => MEKcyt; Vmax_93*PP2Acyt*pMEKcyt/(Km_93 + pMEKcyt);  // fast
  R94: ppMEKcyt => pMEKcyt; Vmax_94*PP2Acyt*ppMEKcyt/(Km_94 + ppMEKcyt);  // fast
  R95: pMEKcyt_ERKcyt => MEKcyt_ERKcyt; Vmax_95*PP2Acyt*pMEKcyt_ERKcyt/(Km_95 + pMEKcyt_ERKcyt);  // fast
  R96: ppMEKcyt_ERKcyt => pMEKcyt_ERKcyt; Vmax_96*PP2Acyt*ppMEKcyt_ERKcyt/(Km_96 + ppMEKcyt_ERKcyt);  // fast
  R97: ppERKcyt => ERKcyt; Vmax_97*MKP3cyt*ppERKcyt/(Km_97 + ppERKcyt);  // fast
  R98: dppERKcyt => ppERKcyt + ERKcyt; Vmax_98*MKP3cyt*dppERKcyt/(Km_98 + dppERKcyt);  // fast
  R99: ppMEKnuc_ERKnuc => ppMEKnuc + ppERKnuc; kf_99*ppMEKnuc_ERKnuc;  // fast
  R100: 2 ppERKnuc => dppERKnuc; kf_100*ppERKnuc*ppERKnuc - kb_100*dppERKnuc;  // fast
  R101: MEKnuc + ERKnuc => MEKnuc_ERKnuc; kf_101*MEKnuc*ERKnuc - kb_101*MEKnuc_ERKnuc;  // fast
  R102: ERKnuc + pMEKnuc => pMEKnuc_ERKnuc; kf_102*pMEKnuc*ERKnuc - kb_102*pMEKnuc_ERKnuc;  // fast
  R103: ppMEKnuc + ERKnuc => ppMEKnuc_ERKnuc; kf_103*ppMEKnuc*ERKnuc - kb_103*ppMEKnuc_ERKnuc;  // fast
  R104: pMEKnuc => MEKnuc; Vmax_104*PP2Anuc*pMEKnuc/(Km_104 + pMEKnuc);  // fast
  R105: ppMEKnuc => pMEKnuc; Vmax_105*PP2Anuc*ppMEKnuc/(Km_105 + ppMEKnuc);  // fast
  R106: pMEKnuc_ERKnuc => MEKnuc_ERKnuc; Vmax_106*PP2Anuc*pMEKnuc_ERKnuc/(Km_106 + pMEKnuc_ERKnuc);  // fast
  R107: ppMEKnuc_ERKnuc => pMEKnuc_ERKnuc; Vmax_107*PP2Anuc*ppMEKnuc_ERKnuc/(Km_107 + ppMEKnuc_ERKnuc);  // fast
  R108: ppERKnuc => ERKnuc; Vmax_108*MKP3nuc*ppERKnuc/(Km_108 + ppERKnuc);  // fast
  R109: dppERKnuc => ppERKnuc + ERKnuc; Vmax_109*MKP3nuc*dppERKnuc/(Km_109 + dppERKnuc);  // fast
  R110: pMEKcyt => ; kf_110*pMEKcyt;  // fast
  R111: pMEKcyt => pMEKnuc + pMEKcyt; kf_111*pMEKcyt;  // fast
  R112: pMEKnuc => pMEKcyt + pMEKnuc; kf_112*pMEKnuc;  // fast
  R113: pMEKnuc => ; kf_113*pMEKnuc;  // fast
  R114: MEKcyt_ERKcyt => ; kf_114*MEKcyt_ERKcyt;  // fast
  R115: MEKcyt_ERKcyt => MEKnuc_ERKnuc + MEKcyt_ERKcyt; kf_115*MEKcyt_ERKcyt;  // fast
  R116: MEKnuc_ERKnuc => MEKcyt_ERKcyt + MEKnuc_ERKnuc; kf_116*MEKnuc_ERKnuc;  // fast
  R117: MEKnuc_ERKnuc => ; kf_117*MEKnuc_ERKnuc;  // fast
  R118: ERKcyt => ; kf_118*ERKcyt;  // fast
  R119: ERKcyt => ERKnuc + ERKcyt; kf_119*ERKcyt;  // fast
  R120: ERKnuc => ERKcyt + ERKnuc; kf_120*ERKnuc;  // fast
  R121: ERKnuc => ; kf_121*ERKnuc;  // fast
  R122: MEKcyt => ; kf_122*MEKcyt;  // fast
  R123: MEKcyt => MEKnuc + MEKcyt; kf_123*MEKcyt;  // fast
  R124: MEKnuc => MEKcyt + MEKnuc; kf_124*MEKnuc;  // fast
  R125: MEKnuc => ; kf_125*MEKnuc;  // fast
  R126: ppERKcyt => ; kf_126*ppERKcyt;  // fast
  R127: ppERKcyt => ppERKnuc + ppERKcyt; kf_127*ppERKcyt;  // fast
  R128: ppERKnuc => ppERKcyt + ppERKnuc; kf_128*ppERKnuc;  // fast
  R129: ppERKnuc => ; kf_129*ppERKnuc;  // fast
  R130: ppMEKcyt => ; kf_130*ppMEKcyt;  // fast
  R131: ppMEKcyt => ppMEKnuc + ppMEKcyt; kf_131*ppMEKcyt;  // fast
  R132: ppMEKnuc => ppMEKcyt + ppMEKnuc; kf_132*ppMEKnuc;  // fast
  R133: ppMEKnuc => ; kf_133*ppMEKnuc;  // fast
  R134: ppMEKcyt_ERKcyt => ; kf_134*ppMEKcyt_ERKcyt;  // fast
  R135: ppMEKcyt_ERKcyt => ppMEKnuc_ERKnuc + ppMEKcyt_ERKcyt; kf_135*ppMEKcyt_ERKcyt;  // fast
  R136: ppMEKnuc_ERKnuc => ppMEKcyt_ERKcyt + ppMEKnuc_ERKnuc; kf_136*ppMEKnuc_ERKnuc;  // fast
  R137: ppMEKnuc_ERKnuc => ; kf_137*ppMEKnuc_ERKnuc;  // fast
  R138: dppERKcyt => ; kf_138*dppERKcyt;  // fast
  R139: dppERKcyt => dppERKnuc + dppERKcyt; kf_139*dppERKcyt;  // fast
  R140: dppERKnuc => dppERKcyt + dppERKnuc; kf_140*dppERKnuc;  // fast
  R141: dppERKnuc => ; kf_141*dppERKnuc;  // fast
  R142: pMEKcyt_ERKcyt => ; kf_142*pMEKcyt_ERKcyt;  // fast
  R143: pMEKcyt_ERKcyt => pMEKnuc_ERKnuc + pMEKcyt_ERKcyt; kf_143*pMEKcyt_ERKcyt;  // fast
  R144: pMEKnuc_ERKnuc => pMEKcyt_ERKcyt + pMEKnuc_ERKnuc; kf_144*pMEKnuc_ERKnuc;  // fast
  R145: pMEKnuc_ERKnuc => ; kf_145*pMEKnuc_ERKnuc;  // fast
  reaction_1: $source => NGF; ksynthngf*source;
    ksynthngf = 3.849e-8 MWDERIVEDUNIT_1__minute;
  reaction_2: NGF => NGFdeg; kdegnfg*NGF;
    kdegnfg = 0.001283 MWDERIVEDUNIT_1__minute;
  reaction_3: NGFR_interstitial_fluid + NGF -> NGFR_L_interstitial_fluid; konngf*NGFR_interstitial_fluid*NGF - koffngf*NGFR_L_interstitial_fluid;
    konngf = 372 MWDERIVEDUNIT_1__micromolarity_minute; koffngf = 0.00384 MWDERIVEDUNIT_1__minute;
  reaction_4: NGF + tanezumab -> NGF_tanezumab; kontz*NGF*tanezumab - kofftz*NGF_tanezumab;
    kontz = 16.2 MWDERIVEDUNIT_1__micromolarity_minute; kofftz = 0.00018 MWDERIVEDUNIT_1__minute;
  reaction_5: tanezumab => tz_deg; kdegtz*tanezumab;
    kdegtz = 2.3e-5 MWDERIVEDUNIT_1__minute;
  reaction_6: trkaI => trkaI_deg; kdegtrkaI*trkaI;
    kdegtrkaI = 0.001925 MWDERIVEDUNIT_1__minute;
  reaction_7: trkaI -> trkaI_int; ktrkaiin*trkaI*Interstitial_fluid - ktrkaiout*trkaI_int*Neuron;
    ktrkaiin = 83.33 MWDERIVEDUNIT_1__minute; ktrkaiout = 1000000 MWDERIVEDUNIT_1__minute;
  reaction_8: NGFR_L_interstitial_fluid -> L_NGFR; ktranstngfrlout*NGFR_L_interstitial_fluid*Interstitial_fluid - ktransngfrlin*L_NGFR*Neuron;
    ktranstngfrlout = 2000 MWDERIVEDUNIT_1__minute; ktransngfrlin = 2000 MWDERIVEDUNIT_1__minute;
  Intercomp_mass_transfer: NGFR -> NGFR_interstitial_fluid; ktransinneuron*NGFR*Neuron - ktransoutneuron*NGFR_interstitial_fluid*Interstitial_fluid;
    ktransinneuron = 2000 MWDERIVEDUNIT_1__minute; ktransoutneuron = 2000 MWDERIVEDUNIT_1__minute;
  reaction_9: L_NGFR + trkaI_int -> L_NGFR_I; reaction_9_kontrkaI*L_NGFR*trkaI_int - reaction_9_kofftrkaI*L_NGFR_I;
    reaction_9_kontrkaI = 10000000 MWDERIVEDUNIT_1__molarity_second; reaction_9_kofftrkaI = 0.001 MWDERIVEDUNIT_1__second;
  reaction_10: trkaI_int + NGFR -> NGFR_I; reaction_10_kontrkaI*trkaI_int*NGFR - reaction_10_kofftrkaI*NGFR_I;
    reaction_10_kontrkaI = 10000000 MWDERIVEDUNIT_1__molarity_second; reaction_10_kofftrkaI = 0.001 MWDERIVEDUNIT_1__second;
  reaction_14: NGFR_I => NGFR_I_deg; reaction_14_kdegEI*NGFR_I;
    reaction_14_kdegEI = 0.0167 MWDERIVEDUNIT_1__minute;
  reaction_15: L_NGFR_I => L_NGFR_I_deg; reaction_15_kdegEI*L_NGFR_I;
    reaction_15_kdegEI = 0.0167 MWDERIVEDUNIT_1__minute;

  // Unit definitions:
  unit MWBUILTINUNIT_liter = metre^3 * 1e-3 dimensionless;
  unit MWBUILTINPREFIX_micro_MWBUILTINUNIT_mole = 1e-6 mole; MWBUILTINPREFIX_micro_MWBUILTINUNIT_mole is "micromole";
  unit MWBUILTINPREFIX_micro_MWBUILTINUNIT_molarity = mole * 1e-3 dimensionless / metre^3; MWBUILTINPREFIX_micro_MWBUILTINUNIT_molarity is "micromolarity";
  unit MWDERIVEDUNIT_1__minute = 0.01666667 dimensionless / second; MWDERIVEDUNIT_1__minute is "1/minute";
  unit MWDERIVEDUNIT_1__micromolarity_minute = metre^3 * 16.66667 dimensionless / (mole * second); MWDERIVEDUNIT_1__micromolarity_minute is "1/(micromolarity*minute)";
  unit MWDERIVEDUNIT_1__molarity_second = metre^3 * 1e-3 dimensionless / (mole * second); MWDERIVEDUNIT_1__molarity_second is "1/(molarity*second)";
  unit MWDERIVEDUNIT_1__second = dimensionless / second; MWDERIVEDUNIT_1__second is "1/second";
end
