// SBML level 2 version 4
// This model was downloaded from BioModels Database
// http://www.ebi.ac.uk/biomodels-static/
// dcterms:bibliographicCitation: http://identifiers.org/doi/doi:10.1186/s12862-015-0515-x

function Function_for_r2(K_asp, K_m2, K_utp, asp, compartment, cp, utp, vmax2)
  vmax2*cp*asp/((1 + utp/K_utp)*(K_m2 + cp)*(K_asp + asp))/compartment;
end

function Function_for_r1(K_atp, K_bc, K_q, K_utp, atp, bc, compartment, glu, utp, vmax1)
  vmax1*bc*glu*atp/((1 + utp/K_utp)*(K_atp + atp)*(K_bc + bc)*(K_q + glu))/compartment;
end

function Function_for_r3(K_m3, ca, compartment, vmax3)
  vmax3*ca/(K_m3 + ca)/compartment;
end

function Function_for_r4(K_m4, compartment, dho, vmax4)
  vmax4*dho/(K_m4 + dho)/compartment;
end

function Function_for_r5(K_m5, compartment, oro, prpp, vmax5)
  vmax5*oro*prpp/(K_m5 + oro*prpp)/compartment;
end

function Function_for_r6(K_m6, compartment, omp, vmax6)
  vmax6*omp/(K_m6 + omp)/compartment;
end

function Function_for_r10(K_m10, compartment, ump, vmax10)
  vmax10*ump/(K_m10 + ump)/compartment;
end

function Function_for_r7(K_m7, compartment, udp, vmax7)
  vmax7*udp/(K_m7 + udp)/compartment;
end

function Function_for_utp_degradation(K_Mp, compartment, g_pyr, utp)
  g_pyr*utp/(K_Mp + utp)/compartment;
end

function Function_for_r8(K_m8, compartment, utp, vmax8)
  vmax8*utp/(K_m8 + utp)/compartment;
end

function Function_for_ctp_degradation(K_Mp, compartment, ctp, g_pyr)
  g_pyr*ctp/(K_Mp + ctp)/compartment;
end

function Function_for_cp_dilution(compartment, cp, d)
  d*cp/compartment;
end

function Function_for_ca_dilution(ca, compartment, d)
  d*ca/compartment;
end

function Function_for_dho_dilution(compartment, d, dho)
  d*dho/compartment;
end

function Function_for_oro_dilution(compartment, d, oro)
  d*oro/compartment;
end

function Function_for_omp_dilution(compartment, d, omp)
  d*omp/compartment;
end

function Function_for_ump_dilution(compartment, d, ump)
  d*ump/compartment;
end

function Function_for_udp_dilution(compartment, d, udp)
  d*udp/compartment;
end

function Function_for_utp_dilution(compartment, d, utp)
  d*utp/compartment;
end

function Function_for_ctp_dilution(compartment, ctp, d)
  d*ctp/compartment;
end

model MODEL1512160000()
  // Hermansen2015 - denovo biosynthesis of pyrimidines in yeast
  // This model is described in the article:
  // Characterizing selective pressures on the pathway for de novo biosynthesis of pyrimidines in yeast.
  // Hermansen RA , Mannakee BK , Knecht W , Liberles DA , Gutenkunst RN
  // BMC Evolutionary Biology. 2015, 15:232
  // Abstract:
  // Selection on proteins is typically measured with the assumption that each protein acts independently. However, selection more likely acts at higher levels of biological organization, requiring an integrative view of protein function. Here, we built a kinetic model for de novo pyrimidine biosynthesis in the yeast Saccharomyces cerevisiae to relate pathway function to selective pressures on individual protein-encoding genes.Gene families across yeast were constructed for each member of the pathway and the ratio of nonsynonymous to synonymous nucleotide substitution rates (dN/dS) was estimated for each enzyme from S. cerevisiae and closely related species. We found a positive relationship between the influence that each enzyme has on pathway function and its selective constraint.We expect this trend to be locally present for enzymes that have pathway control, but over longer evolutionary timescales we expect that mutation-selection balance may change the enzymes that have pathway control.
  // This model is hosted on BioModels Database and identified by: MODEL1512160000.
  // To cite BioModels Database, please use: BioModels Database: An enhanced, curated and annotated resource for published quantitative kinetic models.
  // To the extent possible under law, all copyright and related or neighbouring rights to this encoded model have been dedicated to the public domain worldwide. Please refer to CC0 Public Domain Dedication for more information.
  // biomodels.db:MODEL1512160000
  // isDescribedBy pubmed:26511837
  // biomodels.db:BIOMD0000000590
  // encodes kegg.pathway:rn00240
  // isDescribedBy doi:10.1186/s12862-015-0515-x

  // Compartments:
  compartment compartment = 1;

  // Species:
  species cp in compartment = 0.00037;  // kegg.compound:C00169 CHEBI:17672
  species ca in compartment = 0.00037;  // kegg.compound:C00438 CHEBI:15859
  species dho in compartment = 0.00037;  // kegg.compound:C00337 CHEBI:17025
  species oro in compartment = 0.00037;  // kegg.compound:C00295 CHEBI:16742
  species omp in compartment = 0.00037;  // kegg.compound:C01103 CHEBI:15842
  species ump in compartment = 0.00037;  // kegg.compound:C00105 CHEBI:16695
  species udp in compartment = 0.002886;  // kegg.compound:C00015 CHEBI:17659
  species utp in compartment = 0.00666;  // kegg.compound:C00075 CHEBI:15713
  species ctp in compartment = 0.00037;  // kegg.compound:C00063 CHEBI:17677

  // Parameters:
  vmax1 = 3.616026;
  bc = 1.522643; bc is "[bc]";
  glu = 0.5462079; glu is "[glu]";
  K_utp = 1.413855;
  K_q = 0.05784982;
  K_bc = 2.371666;
  vmax2 = 2.445907;
  asp = 0.09725447; asp is "[asp]";
  atp = 0.1506502; atp is "[atp]";
  K_atp = 1.289406;
  K_m2 = 2.004894;
  vmax3 = 28.66131;
  K_m3 = 1.271792;
  vmax4 = 91.78029;
  K_m4 = 0.01600331;
  vmax5 = 5227.497;
  K_m5 = 0.01952162;
  prpp = 0.1816449; prpp is "[prpp]";
  vmax6 = 34.97208;
  K_m6 = 20.34064;
  vmax10 = 6.555435;
  K_m10 = 0.02678413;
  vmax7 = 5.831041;
  K_m7 = 0.1663827;
  g_pyr = 0.1983065;
  K_Mp = 5.487144;
  vmax8 = 0.1629436;
  K_m8 = 0.004356211;
  K_asp = 0.1683089;
  d = 0.1;

  // Reactions:
  r1: -> cp; compartment*Function_for_r1(K_atp, K_bc, K_q, K_utp, atp, bc, compartment, glu, utp, vmax1);  // modifiers: utp; uniprot:P07259; kegg.reaction:R00575
  r2: cp -> ca; compartment*Function_for_r2(K_asp, K_m2, K_utp, asp, compartment, cp, utp, vmax2);  // modifiers: utp; kegg.reaction:R01397; uniprot:P07259
  r3: ca -> dho; compartment*Function_for_r3(K_m3, ca, compartment, vmax3);  // kegg.reaction:R01993; uniprot:P20051
  r4: dho -> oro; compartment*Function_for_r4(K_m4, compartment, dho, vmax4);  // kegg.reaction:R01866; uniprot:P28272
  r5: oro -> omp; compartment*Function_for_r5(K_m5, compartment, oro, prpp, vmax5);  // uniprot:P13298; kegg.reaction:R01870; isHomologTo uniprot:P30402
  r6: omp -> ump; compartment*Function_for_r6(K_m6, compartment, omp, vmax6);  // uniprot:P03962; kegg.reaction:R00965
  r10: ump -> udp; compartment*Function_for_r10(K_m10, compartment, ump, vmax10);  // hasVersion kegg.reaction:R00158; uniprot:P15700
  r7: udp -> utp; compartment*Function_for_r7(K_m7, compartment, udp, vmax7);  // uniprot:P36010; kegg.reaction:R00156
  utp_degradation: utp -> ; compartment*Function_for_utp_degradation(K_Mp, compartment, g_pyr, utp);
  r8: utp -> ctp; compartment*Function_for_r8(K_m8, compartment, utp, vmax8);  // kegg.reaction:R00573; uniprot:P28274
  ctp_degradation: ctp -> ; compartment*Function_for_ctp_degradation(K_Mp, compartment, ctp, g_pyr);
  cp_dilution: cp -> ; compartment*Function_for_cp_dilution(compartment, cp, d);
  ca_dilution: ca -> ; compartment*Function_for_ca_dilution(ca, compartment, d);
  dho_dilution: dho -> ; compartment*Function_for_dho_dilution(compartment, d, dho);
  oro_dilution: oro -> ; compartment*Function_for_oro_dilution(compartment, d, oro);
  omp_dilution: omp -> ; compartment*Function_for_omp_dilution(compartment, d, omp);
  ump_dilution: ump -> ; compartment*Function_for_ump_dilution(compartment, d, ump);
  udp_dilution: udp -> ; compartment*Function_for_udp_dilution(compartment, d, udp);
  utp_dilution: utp -> ; compartment*Function_for_utp_dilution(compartment, d, utp);
  ctp_dilution: ctp -> ; compartment*Function_for_ctp_dilution(compartment, ctp, d);

  // Unit definitions:
  unit time = 3600 second;
  unit substance = 1e-3 mole;
end
