// SBML level 2 version 4
// This model was downloaded from BioModels Database
// http://www.ebi.ac.uk/biomodels-static/

model MODEL1501220000()
  // Boehm2014 - isoform-specific dimerization of pSTAT5A and pSTAT5B
  // To study STAT5 activation, the authors build a dynamic model of pSTAT5 isoform dimerization. Combinatorial binding of pSTAT5A and pSTAT5B is analysed using model hypotheses and concurrent experiments. Model parameters are derived from the experiments on Ba/F3 cells. Results show that pSTAT5 heterodimerization hypothesis for STAT5 activation favours experimental results.
  // This model is described in the article:
  // Identification of isoform-specific dynamics in phosphorylation-dependent STAT5 dimerization by quantitative mass spectrometry and mathematical modeling
  // Boehm ME, Adlung L, Schilling M, Roth S, Klingmüller U, Lehmann WD
  // J Proteome Res. 2014 Dec 5;13(12):5685-94
  // Abstract:
  // STAT5A and STAT5B are important transcription factors that dimerize and transduce activation signals of cytokine receptors directly to the nucleus. A typical cytokine that mediates STAT5 activation is erythropoietin (Epo). Differential functions of STAT5A and STAT5B have been reported. However, the extent to which phosphorylated STAT5A and STAT5B (pSTAT5A, pSTAT5B) form homo- or heterodimers is not understood, nor is how this might influence the signal transmission to the nucleus. To study this, we designed a concept to investigate the isoform-specific dimerization behavior of pSTAT5A and pSTAT5B that comprises isoform-specific immunoprecipitation (IP), measurement of the degree of phosphorylation, and isoform ratio determination between STAT5A and STAT5B. For the main analytical method, we employed quantitative label-free and -based mass spectrometry. For the cellular model system, we used Epo receptor (EpoR)-expressing BaF3 cells (BaF3-EpoR) stimulated with Epo. Three hypotheses of dimer formation between pSTAT5A and pSTAT5B were used to explain the analytical results by a static mathematical model: formation of (i) homodimers only, (ii) heterodimers only, and (iii) random formation of homo- and heterodimers. The best agreement between experimental data and model simulations was found for the last case. Dynamics of cytoplasmic STAT5 dimerization could be explained by distinct nuclear import rates and individual nuclear retention for homo- and heterodimers of phosphorylated STAT5.
  // This model is hosted on BioModels Database and identified by: BIOMD0000000591.
  // To cite BioModels Database, please use: BioModels: Content, Features, Functionality, and Use..
  // To the extent possible under law, all copyright and related or neighbouring rights to this encoded model have been dedicated to the public domain worldwide. Please refer to CC0 Public Domain Dedication for more information.
  // biomodels.db:MODEL1501220000
  // biomodels.db:BIOMD0000000591
  // isDescribedBy pubmed:25333863
  // occursIn BTO:0001516
  // hasTaxon taxonomy:10090
  // isVersionOf GO:0038162 GO:0042522

  // Compartments:
  compartment cyt = 1.4;  // GO:0005737
  compartment nuc = 0.45;  // GO:0005634

  // Species:
  species STAT5A in cyt = 207.6*ratio;  // isVersionOf uniprot:P42230
  species STAT5B in cyt = 207.6 - 207.6*ratio;  // isVersionOf uniprot:P42232
  species pApB in cyt = 0;  // hasPart uniprot:P42232 uniprot:P42230
  species pApA in cyt = 0;  // hasPart uniprot:P42230
  species pBpB in cyt = 0;  // hasPart uniprot:P42232
  species nucpApA in nuc = 0;  // hasPart uniprot:P42230
  species nucpApB in nuc = 0;  // hasPart uniprot:P42230 uniprot:P42232
  species nucpBpB in nuc = 0;  // hasPart uniprot:P42232

  // Parameters:
  Epo_degradation_BaF3 = 0.02697654;
  k_exp_hetero = 1.000971e-5;
  k_exp_homo = 0.00617238;
  k_imp_hetero = 0.01637016;
  k_imp_homo = 96807.68;
  k_phos = 15767.65;
  ratio = 0.693;

  // Reactions:
  reaction1: 2 STAT5A => pApA; 1.25e-7*STAT5A^2*k_phos*exp(-Epo_degradation_BaF3*time);
  reaction2: STAT5A + STAT5B => pApB; 1.25e-7*STAT5A*STAT5B*k_phos*exp(-Epo_degradation_BaF3*time);
  reaction3: 2 STAT5B => pBpB; 1.25e-7*STAT5B^2*k_phos*exp(-Epo_degradation_BaF3*time);
  reaction4: pApA => nucpApA; k_imp_homo*pApA;
  reaction5: pApB => nucpApB; k_imp_hetero*pApB;
  reaction6: pBpB => nucpBpB; k_imp_homo*pBpB;
  reaction7: nucpApA => 2 STAT5A; k_exp_homo*nucpApA;
  reaction8: nucpApB => STAT5A + STAT5B; k_exp_hetero*nucpApB;
  reaction9: nucpBpB => 2 STAT5B; k_exp_homo*nucpBpB;
end
