// SBML level 2 version 4
// This model was downloaded from BioModels Database
// http://www.ebi.ac.uk/biomodels-static/

function Constant_flux__irreversible(v)
  v;
end
Constant_flux__irreversible is "Constant flux (irreversible)";

model Reddyhoff2015()
  // Reddyhoff2015 - Acetaminophen metabolism and toxicity
  // This model examines acetaminophen metabolism and related hepatotoxicity. Multiple pathways associated with APAP metabolism has been included in the model. Using numerical, sensitivity and timescale analysis, key parameters involved in the toxicity has been identified. The model analysis highlights a critical acetaminophen dose in terms of the model parameters.
  // This model is described in the article:
  // Timescale analysis of a mathematical model of acetaminophen metabolism and toxicity.
  // Reddyhoff D, Ward J, Williams D, Regan S, Webb S
  // J Theor Biol. 2015 Dec 7;386:132-46.
  // Abstract:
  // Acetaminophen is a widespread and commonly used painkiller all over the world. However, it can cause liver damage when taken in large doses or at repeated chronic doses. Current models of acetaminophen metabolism are complex, and limited to numerical investigation though provide results that represent clinical investigation well. We derive a mathematical model based on mass action laws aimed at capturing the main dynamics of acetaminophen metabolism, in particular the contrast between normal and overdose cases, whilst remaining simple enough for detailed mathematical analysis that can identify key parameters and quantify their role in liver toxicity. We use singular perturbation analysis to separate the different timescales describing the sequence of events in acetaminophen metabolism, systematically identifying which parameters dominate during each of the successive stages. Using this approach we determined, in terms of the model parameters, the critical dose between safe and overdose cases, timescales for exhaustion and regeneration of important cofactors for acetaminophen metabolism and total toxin accumulation as a fraction of initial dose.
  // This model is hosted on BioModels Database and identified by: MODEL1603080000.
  // To cite BioModels Database, please use: BioModels: Content, Features, Functionality and Use.
  // To the extent possible under law, all copyright and related or neighbouring rights to this encoded model have been dedicated to the public domain worldwide. Please refer to CC0 Public Domain Dedication for more information.
  // biomodels.db:MODEL1603080000
  // biomodels.db:BIOMD0000000609
  // isDescribedBy pubmed:26348886
  // isDerivedFrom pubmed:26966512
  // occursIn BTO:0000759
  // hasTaxon taxonomy:9606

  // Compartments:
  compartment compartment = 1;  // BTO:0000759

  // Species:
  species Sulphate__PAPS in compartment = bS/dS; Sulphate__PAPS is "Sulphate_PAPS";  // CHEBI:17980
  species GSH in compartment = bG/dG;  // CHEBI:16856
  species NAPQI in compartment = 0;  // isVersionOf uniprot:P15559
  species Paracetamol_APAP in compartment = P0;  // chembl.compound:+CHEMBL112
  species Protein_adducts in compartment = 0;  // hasPart CHEBI:36080 chembl.compound:CHEMBL112

  // Parameters:
  P0 = 1.32e-13;
  dG = 2;
  bG = 1.374e-14;
  kGSH = 1.6e18;
  kG = 2.99;
  kS = 2.26e14;
  bS = 2.65e-14;
  dS = 2;
  k450 = 0.315;
  kN = 0.0315;
  kPSH = 110;

  // Reactions:
  R1: Paracetamol_APAP => NAPQI; compartment*k450*Paracetamol_APAP;
  R2: NAPQI => Paracetamol_APAP; compartment*kN*NAPQI;
  R3: Paracetamol_APAP => ; compartment*kG*Paracetamol_APAP;
  R4: NAPQI => Protein_adducts; compartment*kPSH*NAPQI;
  R5: NAPQI + GSH => ; compartment*kGSH*NAPQI*GSH;
  R6: GSH => ; compartment*dG*GSH;
  R7: => GSH; compartment*Constant_flux__irreversible(bG);
  R8: Paracetamol_APAP + Sulphate__PAPS => ; compartment*kS*Paracetamol_APAP*Sulphate__PAPS;
  R9: Sulphate__PAPS => ; compartment*dS*Sulphate__PAPS;
  R10: => Sulphate__PAPS; compartment*Constant_flux__irreversible(bS);

  // Unit definitions:
  unit volume = 1e-3 litre;
  unit substance = 1e-3 mole;
end
