// SBML level 3 version 1
// This model was downloaded from BioModels Database
// http://www.ebi.ac.uk/biomodels-static/

function Function_for_R8(As, Bs, ModelValue_2, default_compartment)
  ModelValue_2*As*Bs/default_compartment;
end

function Function_for_R17(Bsyn, ModelValue_7, default_compartment)
  Bsyn*ln(2)/ModelValue_7/default_compartment;
end

function Function_for_R1(ModelValue_3, default_compartment)
  ModelValue_3/default_compartment;
end

function Function_for_R5(As, ModelValue_0, ModelValue_8, default_compartment)
  ModelValue_0*As/ModelValue_8/default_compartment;
end

function Function_for_R9(Bs, ModelValue_7, default_compartment)
  Bs*ln(2)/ModelValue_7/default_compartment;
end

function Function_for_R2(As, ModelValue_1, default_compartment)
  ModelValue_1*As/default_compartment;
end

function Function_for_R16(Asyn, Bsyn, ModelValue_2, default_compartment)
  ModelValue_2*Asyn*Bsyn/default_compartment;
end

function Function_for_R15(Asyn, ModelValue_1, default_compartment)
  ModelValue_1*Asyn/default_compartment;
end

function Function_for_R4(As, ModelValue_6, default_compartment)
  As*ln(2)/ModelValue_6/default_compartment;
end

function Function_for_R11(Asyn, ModelValue_1, default_compartment)
  ModelValue_1*Asyn/default_compartment;
end

function Function_for_R6(ModelValue_4, default_compartment)
  ModelValue_4/default_compartment;
end

function Function_for_R12(Asyn, Bsyn, ModelValue_2, default_compartment)
  ModelValue_2*Asyn*Bsyn/default_compartment;
end

function Function_for_R7(As, ModelValue_1, default_compartment)
  ModelValue_1*As/default_compartment;
end

function Function_for_R13(Asyn, ModelValue_6, default_compartment)
  Asyn*ln(2)/ModelValue_6/default_compartment;
end

function Function_for_R14(ModelValue_5, default_compartment)
  ModelValue_5/default_compartment;
end

function Function_for_R3(As, Bs, ModelValue_2, default_compartment)
  ModelValue_2*As*Bs/default_compartment;
end

function Function_for_R10(As, ModelValue_0, ModelValue_9, default_compartment)
  ModelValue_0*As/ModelValue_9/default_compartment;
end

model MODEL1608150000()
  // Kuznetsov2016(II) - α-syn aggregation kinetics in Parkinson's Disease
  // Kuznetsov2016(II) - α-syn aggregation kinetics in Parkinson's
  // This theoretical model uses 2-step Finke-Watzky (FW) kinetics
  // todescribe the production, misfolding, aggregation, transport and
  // degradation of α-syn that may lead to Parkinson's Disease
  // (PD). Deregulated α-syn degradation is predicted to be
  // crucialfor PD pathogenesis.
  // This model is described in the article:
  // What can trigger the onset of Parkinson's disease - A modeling study based on a compartmental model of α-synuclein transport and aggregation in neurons.
  // Kuznetsov IA, Kuznetsov AV.
  // Math Biosci 2016 Aug; 278: 22-29
  // Abstract:
  // The aim of this paper is to develop a minimal model describing events leading to the onset of Parkinson's disease (PD). The model accounts for α-synuclein (α-syn) production in the soma, transport toward the synapse, misfolding, and aggregation. The production and aggregation of polymeric α-syn is simulated using a minimalistic 2-step Finke-Watzky model. We utilized the developed model to analyze what changes in a healthy neuron are likely to lead to the onset of α-syn aggregation. We checked the effects of interruption of α-syn transport toward the synapse, entry of misfolded (infectious) α-syn into the somatic and synaptic compartments, increasing the rate of α-syn synthesis in the soma, and failure of α-syn degradation machinery. Our model suggests that failure of α-syn degradation machinery is probably the most likely cause for the onset of α-syn aggregation leading to PD.
  // This model is hosted on BioModels Database and identified by: BIOMD0000000615.
  // To cite BioModels Database, please use: BioModels Database: An enhanced, curated and annotated resource for published quantitative kinetic models.
  // To the extent possible under law, all copyright and related or neighbouring rights to this encoded model have been dedicated to the public domain worldwide. Please refer to CC0 Public Domain Dedication for more information.
  // biomodels.db:MODEL1608150000
  // biomodels.db:BIOMD0000000615
  // isDescribedBy pubmed:27211070
  // isVersionOf GO:0070841
  // hasTaxon taxonomy:9606
  // hasProperty DOID:14330
  // model units - substance: substance, time: time, volume: volume, area: area, length: length, extent: substance

  // Compartments:
  compartment default_compartment = 1 litre; default_compartment is "Neuron";  // BTO:0000938

  // Species:
  // α-syn monomer concentration in the soma
  species As in default_compartment = 0.006;  // substance in mole; isVersionOf uniprot:P37840
  // α-syn concentration in the misfolded state in the soma
  species Bs in default_compartment = 0;  // substance in mole; isVersionOf uniprot:P37840
  // α-syn monomer concentration in the synapse
  species Asyn in default_compartment = 0;  // substance in mole; isVersionOf uniprot:P37840
  // α-syn concentration in the misfolded state in the synapse
  species Bsyn in default_compartment = 0;  // substance in mole; isVersionOf uniprot:P37840

  // Parameters:
  // Mass transfer coeﬃcient characterizing transport of α -syn (in the [A] form) from the soma to the synapse
  nA = 2.91e-20;
  // Rate constant for the ﬁrst step of F–W model
  k1 = 3e-7;
  // Rate constant for the second step of F–W model
  k2 = 2e-9;
  // Rate of synthesis of α -syn (in the [A] form) in the soma
  qA = 4.17e-8;
  // Flux of misfolded α -syn (in the [B] form) from the outside of the neuron into the soma
  QBs = 0;
  // Flux of misfolded α -syn (in the [B] form) from the outside of the neuron into the synapse
  QBsyn = 0;
  // Half-life of α -syn in the monomeric form
  TAh1 = 72000;
  // Half-life of α -syn in the misfolded (aggregated) form
  TBh1 = 720000;
  // Volume of the neuron soma
  Vs = 4.19e-15;
  // Volume of the neuron’s synaptic compartment
  Vsyn = 4.19e-15;
  // Describes a pulse simulating the entry of infectious α -syn
  t1 = 0;
  // Describes a pulse simulating the entry of infectious α -syn
  t2 = 0;

  // Reactions:
  R1: -> As; default_compartment*Function_for_R1(qA, default_compartment);
  R2: As -> ; default_compartment*Function_for_R2(As, k1, default_compartment);
  R3: As -> ; default_compartment*Function_for_R3(As, Bs, k2, default_compartment);  // modifiers: Bs
  R4: As -> ; default_compartment*Function_for_R4(As, TAh1, default_compartment);
  R5: As -> ; default_compartment*Function_for_R5(As, nA, Vs, default_compartment);
  R6: -> Bs; default_compartment*Function_for_R6(QBs, default_compartment);
  R7: -> Bs; default_compartment*Function_for_R7(As, k1, default_compartment);  // modifiers: As
  R8: -> Bs; default_compartment*Function_for_R8(As, Bs, k2, default_compartment);  // modifiers: As
  R9: Bs -> ; default_compartment*Function_for_R9(Bs, TBh1, default_compartment);
  R10: -> Asyn; default_compartment*Function_for_R10(As, nA, Vsyn, default_compartment);  // modifiers: As
  R11: Asyn -> ; default_compartment*Function_for_R11(Asyn, k1, default_compartment);
  R12: Asyn -> ; default_compartment*Function_for_R12(Asyn, Bsyn, k2, default_compartment);  // modifiers: Bsyn
  R13: Asyn -> ; default_compartment*Function_for_R13(Asyn, TAh1, default_compartment);
  R14: -> Bsyn; default_compartment*Function_for_R14(QBsyn, default_compartment);
  R15: -> Bsyn; default_compartment*Function_for_R15(Asyn, k1, default_compartment);  // modifiers: Asyn
  R16: -> Bsyn; default_compartment*Function_for_R16(Asyn, Bsyn, k2, default_compartment);  // modifiers: Asyn
  R17: Bsyn -> ; default_compartment*Function_for_R17(Bsyn, TBh1, default_compartment);

  // Unit definitions:
  unit length = metre;
  unit area = metre^2;
  unit volume = litre;
  unit time = second;
  unit substance = mole;
end
