// SBML level 3 version 1
// This model was downloaded from BioModels Database
// http://www.ebi.ac.uk/biomodels-static/

function Function_for_R2(ModelValue_4, default_compartment, n)
  ModelValue_4*n/default_compartment;
end

function Function_for_R1(c, default_compartment)
  c/default_compartment;
end

function Function_for_R6(c, default_compartment)
  c/default_compartment;
end

function Function_for_R8(Dunster2014_Model1_WBC_Interactions, ModelValue_10, ModelValue_11, ModelValue_8, default_compartment)
  ModelValue_8*piecewise(sin(Dunster2014_Model1_WBC_Interactions)^2, Dunster2014_Model1_WBC_Interactions < ModelValue_10*pi, 0)*piecewise(1, Dunster2014_Model1_WBC_Interactions < ModelValue_11, 0)/default_compartment;
end

function Function_for_R5(ModelValue_6, a, default_compartment, m)
  ModelValue_6*m*a/default_compartment;
end

function Function_for_R10(c, default_compartment)
  c/default_compartment;
end

function Function_for_R3(ModelValue_4, default_compartment, n)
  ModelValue_4*n/default_compartment;
end

function Function_for_R4(ModelValue_5, a, default_compartment)
  ModelValue_5*a/default_compartment;
end

function Function_for_R9(ModelValue_5, ModelValue_9, a, default_compartment)
  ModelValue_5*(a^2/(ModelValue_9^2 + a^2))/default_compartment;
end

function Function_for_R7(ModelValue_7, default_compartment, m)
  ModelValue_7*m/default_compartment;
end

model MODEL1608160000()
  // Dunster2014 - WBC Interactions (Model1)
  // This is a sub-model of a three-step inflammatory response modelling study. The model includes distinct populations of white blood cells namely, macrophages and active and apoptotic neutrophil populations. Neutrophil apoptosis rate is predicted to be crucial for the qualitative nature of the system.
  // This model is described in the article:
  // The resolution of inflammation: a mathematical model of neutrophil and macrophage interactions.
  // Dunster JL, Byrne HM, King JR.
  // Bull. Math. Biol. 2014 Aug; 76(8): 1953-1980
  // Abstract:
  // There is growing interest in inflammation due to its involvement in many diverse medical conditions, including Alzheimer's disease, cancer, arthritis and asthma. The traditional view that resolution of inflammation is a passive process is now being superceded by an alternative hypothesis whereby its resolution is an active, anti-inflammatory process that can be manipulated therapeutically. This shift in mindset has stimulated a resurgence of interest in the biological mechanisms by which inflammation resolves. The anti-inflammatory processes central to the resolution of inflammation revolve around macrophages and are closely related to pro-inflammatory processes mediated by neutrophils and their ability to damage healthy tissue. We develop a spatially averaged model of inflammation centring on its resolution, accounting for populations of neutrophils and macrophages and incorporating both pro- and anti-inflammatory processes. Our ordinary differential equation model exhibits two outcomes that we relate to healthy and unhealthy states. We use bifurcation analysis to investigate how variation in the system parameters affects its outcome. We find that therapeutic manipulation of the rate of macrophage phagocytosis can aid in resolving inflammation but success is critically dependent on the rate of neutrophil apoptosis. Indeed our model predicts that an effective treatment protocol would take a dual approach, targeting macrophage phagocytosis alongside neutrophil apoptosis.
  // This model is hosted on BioModels Database and identified by: BIOMD0000000616.
  // To cite BioModels Database, please use: BioModels Database: An enhanced, curated and annotated resource for published quantitative kinetic models.
  // To the extent possible under law, all copyright and related or neighbouring rights to this encoded model have been dedicated to the public domain worldwide. Please refer to CC0 Public Domain Dedication for more information.
  // biomodels.db:MODEL1608160000
  // biomodels.db:BIOMD0000000616
  // isDescribedBy pubmed:25053556
  // isVersionOf GO:0006954
  // hasTaxon taxonomy:9606
  // hasProperty DOID:+2914
  // model units - substance: substance, time: time, volume: volume, area: area, length: length, extent: substance

  // Compartments:
  compartment default_compartment = 1 litre; default_compartment is "Soft_Tissue";

  // Species:
  // Active neutrophils
  species n in default_compartment = 0;  // substance in mole; isVersionOf BTO:0000130
  // Pro-inﬂammatory mediators
  species c in default_compartment = 0;  // substance in mole; isVersionOf uniprot:P10145
  // Apoptotic neutrophils
  species a in default_compartment = 0;  // substance in mole; isVersionOf BTO:0000130
  // Macrophages
  species m in default_compartment = 0;  // substance in mole; isVersionOf BTO:0000801

  // Parameters:
  // Dimensionless constant nu.tilde (ν˜) relate to rate of neutrophil apoptosis
  vt = 0.1;
  // Dimensionless constant gamma.a.tilde (γa˜) related to rate of secondary necrosis
  Gat = 1;
  // Dimensionless constant theta.tilde (φ˜) related to rate at which macrophages engulf neutrophils
  Tt = 0.001;
  // Dimensionless constant gamma.m.tilde (γm˜) related to rate that macrophages leave the tissue
  Gmt = 0.01;
  // Dimensionless constant alpha tilde(α˜) related to rate of production of mediator (c) from initial damage
  alt = 0.05;
  // Dimensionless constant beta.a.tilde (βa˜) related to saturation constant
  Bat = 0.1;
  // Cycles of tissue damage
  A = 1;
  // Time of inducing tissue damage
  t1 = 10;

  // Reactions:
  R1: -> n; default_compartment*Function_for_R1(c, default_compartment);  // modifiers: c
  R2: n -> ; default_compartment*Function_for_R2(vt, default_compartment, n);
  R3: -> a; default_compartment*Function_for_R3(vt, default_compartment, n);  // modifiers: n
  R4: a -> ; default_compartment*Function_for_R4(Gat, a, default_compartment);
  R5: a -> ; default_compartment*Function_for_R5(Tt, a, default_compartment, m);  // modifiers: m
  R6: -> m; default_compartment*Function_for_R6(c, default_compartment);  // modifiers: c
  R7: m -> ; default_compartment*Function_for_R7(Gmt, default_compartment, m);
  R8: -> c; default_compartment*Function_for_R8(time, A, t1, alt, default_compartment);
  R9: -> c; default_compartment*Function_for_R9(Gat, Bat, a, default_compartment);  // modifiers: a
  R10: c -> ; default_compartment*Function_for_R10(c, default_compartment);

  // Unit definitions:
  unit length = metre;
  unit area = metre^2;
  unit volume = litre;
  unit time = second;
  unit substance = mole;
end
