// SBML level 2 version 4
// This model was downloaded from BioModels Database
// http://www.ebi.ac.uk/biomodels-static/
// dcterms:bibliographicCitation: This study describes the diverse kinetics arising from intricate mechanisms of ubiquitination and degradation in Ring1B ligase. urn:miriam:pubmed:22194680

function Constant_flux__irreversible(v)
  v;
end
Constant_flux__irreversible is "Constant flux (irreversible)";

function R6_Rate(subs, k1, k2, prod)
  subs*(k1*subs + k2*prod);
end

function R12_Rate(subs, k1, mod1, k2, mod2, k3, mod3)
  subs*(k1*mod1 + k2*mod2 + k3*mod3);
end

function MM_mod(kc, mod, subs, Km)
  kc*mod*subs/(Km + subs);
end

function Mod_MA1(k, mod, subs)
  k*mod*subs;
end

model MODEL1611160000()
  // NguyenLK2011 - Ubiquitination dynamics in Ring1B/Bmi1 system
  // NguyenLK2011 - Ubiquitination dynamics in Ring1B-Bmi1 system
  // This theoretical model investigates the dynamics of Ring1B/Bmi1 ubiquitination to identify bistable switch-like and oscillatory behaviour in the system. Michaelis-Menten (MM) equations are used to formulate the model. However, the authors show that the dynamics persist even for Mass-Action kinetics. This SBML file is the MM version of the model.
  // This model is described in the article:
  // Switches, excitable responses and oscillations in the Ring1B/Bmi1 ubiquitination system.
  // Nguyen LK, Muñoz-García J, Maccario H, Ciechanover A, Kolch W, Kholodenko BN.
  // PLoS Comput. Biol. 2011 Dec; 7(12): e1002317
  // Abstract:
  // In an active, self-ubiquitinated state, the Ring1B ligase monoubiquitinates histone H2A playing a critical role in Polycomb-mediated gene silencing. Following ubiquitination by external ligases, Ring1B is targeted for proteosomal degradation. Using biochemical data and computational modeling, we show that the Ring1B ligase can exhibit abrupt switches, overshoot transitions and self-perpetuating oscillations between its distinct ubiquitination and activity states. These different Ring1B states display canonical or multiply branched, atypical polyubiquitin chains and involve association with the Polycomb-group protein Bmi1. Bistable switches and oscillations may lead to all-or-none histone H2A monoubiquitination rates and result in discrete periods of gene (in)activity. Switches, overshoots and oscillations in Ring1B catalytic activity and proteosomal degradation are controlled by the abundances of Bmi1 and Ring1B, and the activities and abundances of external ligases and deubiquitinases, such as E6-AP and USP7.
  // This model is hosted on BioModels Database and identified by: BIOMD0000000622.
  // To cite BioModels Database, please use: BioModels Database: An enhanced, curated and annotated resource for published quantitative kinetic models.
  // To the extent possible under law, all copyright and related or neighbouring rights to this encoded model have been dedicated to the public domain worldwide. Please refer to CC0 Public Domain Dedication for more information.
  // biomodels.db:MODEL1611160000
  // biomodels.db:BIOMD0000000622
  // isDescribedBy pubmed:22194680
  // isVersionOf GO:0030163 GO:0016567
  // hasTaxon taxonomy:131567

  // Compartments:
  compartment compartment = 1;  // GO:0005623

  // Species:
  // RING finger protein
  species Bmi1 in compartment = 1.1;  // isVersionOf uniprot:P35226
  // Ubiquitinated Bmi1 targeted to degradation
  species Bmi1ubd in compartment = 1.08;  // isVersionOf uniprot:P35226
  // Ring1B ligase
  species R1B in compartment = 0.1;  // isVersionOf uniprot:Q06587
  // Ubiquitinated Ring1B by external ligases targeted to degradation
  species R1Bubd in compartment = 0.12;  // isVersionOf uniprot:Q06587
  // Total ubiquitin-proteasome system 7
  species $USP7tot in compartment = 1;  // isVersionOf uniprot:Q93009
  // Heterodimeric complex of Ring1B and Bmi1
  species Z in compartment = 0.2;  // hasPart uniprot:P35226; hasPart uniprot:Q06587
  // Ubiquitinated for of Ring1B-Bmi1 complex
  species Zub in compartment = 0.12;  // hasPart uniprot:Q06587; hasPart uniprot:P35226
  // Alternative ubiquitinated form of Ring1B
  species R1Buba in compartment = 0.44;  // isVersionOf uniprot:Q06587
  // Auto-ubiquitination of Ring1B
  species R1Bub in compartment = 0.02;  // isVersionOf uniprot:Q06587
  // histone H2A
  species H2A in compartment = 0.1;  // isVersionOf uniprot:P16104
  // Ubiquitinated H2A
  species H2Auba in compartment = 0;  // isVersionOf uniprot:P16104

  // Reactions:
  R1: Bmi1 => Bmi1ubd; compartment*R1_k1*Bmi1;
    R1_k1 = 0.002;
  R2: Bmi1ubd => Bmi1; compartment*R2_k1*Bmi1ubd;
    R2_k1 = 0.002;
  R3: R1B => R1Bubd; compartment*R3_k1*R1B;
    R3_k1 = 0.01;
  R4: R1Bubd => R1B; compartment*Mod_MA1(R4_k, USP7tot, R1Bubd);  // modifiers: USP7tot
    R4_k = 0.001;
  R5: Bmi1 + R1B -> Z; compartment*(R5_k1*Bmi1*R1B - R5_k2*Z);
    R5_k1 = 2; R5_k2 = 0.2;
  R6: Z => Zub; compartment*R6_Rate(Z, R6_k1, R6_k2, Zub);
    R6_k1 = 0.02; R6_k2 = 0.2;
  R7: Zub => Z; compartment*MM_mod(kc, USP7tot, Zub, Km);  // modifiers: USP7tot
    kc = 0.005; Km = 0.0025;
  R8: Zub -> R1Buba + Bmi1; compartment*(R8_k1*Zub - R8_k2*R1Buba*Bmi1);
    R8_k1 = 0.012; R8_k2 = 2e-5;
  R9: R1B => R1Bub; compartment*R6_Rate(R1B, R9_k1, R9_k2, R1Bub);
    R9_k1 = 0.2; R9_k2 = 0.2;
  R10: R1Bub => R1B; compartment*Mod_MA1(R10_k, USP7tot, R1Bub);  // modifiers: USP7tot
    R10_k = 0.0075;
  R11: R1Buba => R1B; compartment*Mod_MA1(R11_k, USP7tot, R1Buba);  // modifiers: USP7tot
    R11_k = 0.005;
  R12: H2A => H2Auba; compartment*R12_Rate(H2A, R12_k1, R1Bub, R12_k2, Zub, k3, R1Buba);  // modifiers: R1Bub, Zub, R1Buba
    R12_k1 = 0.002; R12_k2 = 2; k3 = 0.2;
  R13: H2Auba => H2A; compartment*R13_k1*H2Auba;
    R13_k1 = 0.01;
  R1Bprod: => R1B; compartment*Constant_flux__irreversible(R1Bprod_v);
    R1Bprod_v = 7.5e-6;
  R1Bdeg: R1Bubd => ; compartment*R1Bdeg_k1*R1Bubd;
    R1Bdeg_k1 = 3e-5;
  Bmi1prod: => Bmi1; compartment*Constant_flux__irreversible(Bmi1prod_v);
    Bmi1prod_v = 7.5e-6;
  Bmi1deg: Bmi1ubd => ; compartment*Bmi1deg_k1*Bmi1ubd;
    Bmi1deg_k1 = 3e-5;

  // Unit definitions:
  unit volume = 1e-3 litre;
  unit substance = 1e-3 mole;
end
