// SBML level 2 version 4
// This model was downloaded from BioModels Database
// http://www.ebi.ac.uk/biomodels-static/
// dcterms:bibliographicCitation: http://identifiers.org/mamo/MAMO_0000046
// dcterms:bibliographicCitation: http://identifiers.org/pubmed/26947272
// dcterms:bibliographicCitation: T follicular regulatory cells urn:miriam:pubmed:27088919

function Molecule_Production__1A_0I__2(IL2, sigma)
  sigma*IL2;
end
Molecule_Production__1A_0I__2 is "Molecule Production (1A/0I)_2";

function Constant_flux__irreversible(v)
  v;
end
Constant_flux__irreversible is "Constant flux (irreversible)";

function Molecule_Production__1A_0I__1(nTreg, sigma)
  sigma*nTreg;
end
Molecule_Production__1A_0I__1 is "Molecule Production (1A/0I)_1";

function Molecule_Production__2A_3I__v2_1(Blimp1, ICOS, RXR, STAT3, STAT5, alpha1, alpha2, alpha3, sigma1, sigma2)
  (sigma1*ICOS + sigma2*STAT3)/((alpha1 + Blimp1)*(alpha2 + STAT5)*(alpha3 + RXR));
end
Molecule_Production__2A_3I__v2_1 is "Molecule Production (2A/3I) v2_1";

function Molecule_Production__0A_1I__1(IL4, alpha1, sigma1)
  sigma1/(alpha1 + IL4);
end
Molecule_Production__0A_1I__1 is "Molecule Production (0A/1I)_1";

function Molecule_Production__1A_0I__5(IL10, sigma)
  sigma*IL10;
end
Molecule_Production__1A_0I__5 is "Molecule Production (1A/0I)_5";

function Cell_Differentiation__2A__1(Bcl6, CXCR5, gamma1, gamma2, nTreg)
  gamma1*nTreg*Bcl6 + gamma2*nTreg*CXCR5;
end
Cell_Differentiation__2A__1 is "Cell Differentiation (2A)_1";

function Molecule_Production__2A_0I__1(IL21, IL6, sigma1, sigma2)
  sigma1*IL6 + sigma2*IL21;
end
Molecule_Production__2A_0I__1 is "Molecule Production (2A/0I)_1";

function Molecule_Production__2A_1I__1(Blimp1, Tfh, Tfr, alpha, sigma1, sigma2)
  (sigma1*Tfh + sigma2*Tfr)/(alpha + Blimp1);
end
Molecule_Production__2A_1I__1 is "Molecule Production (2A/1I)_1";

function Molecule_Production__1A_0I__4(Tfr, sigma)
  sigma*Tfr;
end
Molecule_Production__1A_0I__4 is "Molecule Production (1A/0I)_4";

function Molecule_Production__1A_1I__2(TGFb, Tgif1, alpha, sigma)
  sigma*TGFb/(alpha + Tgif1);
end
Molecule_Production__1A_1I__2 is "Molecule Production (1A/1I)_2";

function Molecule_Production__1A_1I__1(Bcl6, Tfr, alpha, sigma)
  sigma*Tfr/(alpha + Bcl6);
end
Molecule_Production__1A_1I__1 is "Molecule Production (1A/1I)_1";

function Molecule_Production__1A_0I__3(Tfh, sigma)
  sigma*Tfh;
end
Molecule_Production__1A_0I__3 is "Molecule Production (1A/0I)_3";

function Cell_Differentiation__1A_1I__1(Bcl6, IL10, NaiveCD4, alpha, gamma)
  gamma*NaiveCD4*Bcl6/(alpha + IL10);
end
Cell_Differentiation__1A_1I__1 is "Cell Differentiation (1A/1I)_1";

model Leber2016___Expanded_model_of_Tfh_Tfr_differentiation___Helicobacter_pylori_infection_1_1()
  // Leber2016 - Expanded model of Tfh-Tfr differentiation - Helicobacter pylori infection
  // The parameters used in the model were obtained from experiments conducted by the authors, previous publications [ 1, 2, 3] and parameter optimisation carried out in the paper using particle swarm and genetic algorithms.
  // This model is described in the article:
  // Bistability analyses of CD4+ T follicular helper and regulatory cells during Helicobacter pylori infection.
  // Leber A, Abedi V, Hontecillas R, Viladomiu M, Hoops S, Ciupe S, Caughman J, Andrew T, Bassaganya-Riera J.
  // J. Theor. Biol. 2016 Jun; 398: 74-84
  // Abstract:
  // T follicular helper (Tfh) cells are a highly plastic subset of CD4+ T cells specialized in providing B cell help and promoting inflammatory and effector responses during infectious and immune-mediate diseases. Helicobacter pylori is the dominant member of the gastric microbiota and exerts both beneficial and harmful effects on the host. Chronic inflammation in the context of H. pylori has been linked to an upregulation in T helper (Th)1 and Th17 CD4+ T cell phenotypes, controlled in part by the cytokine, interleukin-21. This study investigates the differentiation and regulation of Tfh cells, major producers of IL-21, in the immune response to H. pylori challenge. To better understand the conditions influencing the promotion and inhibition of a chronically elevated Tfh population, we used top-down and bottom-up approaches to develop computational models of Tfh and T follicular regulatory (Tfr) cell differentiation. Stability analysis was used to characterize the presence of two bi-stable steady states in the calibrated Tfh/Tfr models. Stochastic simulation was used to illustrate the ability of the parameter set to dictate two distinct behavioral patterns. Furthermore, sensitivity analysis helped identify the importance of various parameters on the establishment of Tfh and Tfr cell populations. The core network model was expanded into a more comprehensive and predictive model by including cytokine production and signaling pathways. From the expanded network, the interaction between TGFB-Induced Factor Homeobox 1 (Tgif1) and the retinoid X receptor (RXR) was displayed to exert control over the determination of the Tfh response. Model simulations predict that Tgif1 and RXR respectively induce and curtail Tfh responses. This computational hypothesis was validated experimentally by assaying Tgif1, RXR and Tfh in stomachs of mice infected with H. pylori.
  // The impulse of RXR as shown in the paper (figure 7C) can be implemented by creating an event in the curated SBML file.
  // This model is hosted on BioModels Database and identified by: BIOMD0000000625.
  // To cite BioModels Database, please use: BioModels Database: An enhanced, curated and annotated resource for published quantitative kinetic models.
  // To the extent possible under law, all copyright and related or neighbouring rights to this encoded model have been dedicated to the public domain worldwide. Please refer to CC0 Public Domain Dedication for more information.
  // biomodels.db:MODEL1603010000
  // biomodels.db:BIOMD0000000625
  // isDescribedBy pubmed:26947272
  // hasProperty mamo:MAMO_0000046
  // isVersionOf GO:0044419
  // occursIn BTO:0005568

  // Compartments:
  compartment compartment = 1;  // BTO:0005568

  // Species:
  species NaiveCD4 in compartment = 200;  // isVersionOf uniprot:P06332
  species nTreg in compartment = 100;  // isVersionOf CL:0002677
  species Tfh in compartment = 1;  // isVersionOf CL:0002038
  species Tfr in compartment = 1;  // isPartOf CL:0002677
  species Bcl6 in compartment = 1;  // isVersionOf uniprot:P41183
  species Blimp1 in compartment = 1;  // isVersionOf uniprot:Q60636
  species FoxP3 in compartment = 1;  // isVersionOf uniprot:Q99JB6
  species STAT3 in compartment = 1;  // isVersionOf uniprot:P42227
  species $STAT5 in compartment = 0;  // isVersionOf uniprot:P42232
  species $IL2 in compartment = 0.0001;  // isVersionOf uniprot:P04351
  species IL4 in compartment = 1;  // isVersionOf uniprot:P07750
  species IL6 in compartment = 1;  // isVersionOf uniprot:P08505
  species IL10 in compartment = 1;  // isVersionOf uniprot:P18893
  species IL21 in compartment = 1;  // isVersionOf uniprot:Q9ES17
  species CXCR5 in compartment = 1;  // isVersionOf uniprot:Q04683
  species ICOS in compartment = 1;  // isVersionOf uniprot:Q9WVS0
  species TGFb in compartment = 1;  // isVersionOf uniprot:Q64729
  species Tgif1 in compartment = 1;  // isVersionOf uniprot:P70284
  species RXR in compartment = 1;  // isVersionOf uniprot:P28700

  // Reactions:
  // This reaction represents constitutive naive CD4 cell production.
  NaiveCD4_Source: => NaiveCD4; compartment*Constant_flux__irreversible(NaiveCD4_Source_v);
    NaiveCD4_Source_v = 100;
  // This reaction represents the constitutive naiveCD4 cell death.
  NaiveCD4_Death: NaiveCD4 => ; compartment*NaiveCD4_Death_k1*NaiveCD4;
    NaiveCD4_Death_k1 = 0.035655;
  // This reaction represents constitutive nTreg cell production.
  nTreg_Source: => nTreg; compartment*Constant_flux__irreversible(nTreg_Source_v);
    nTreg_Source_v = 10;
  // This reaction represents the constitutive nTreg cell death.
  nTreg_Death: nTreg => ; compartment*nTreg_Death_k1*nTreg;
    nTreg_Death_k1 = 0.03;
  Tfh_Differentiation: NaiveCD4 => Tfh; compartment*Cell_Differentiation__1A_1I__1(Bcl6, IL10, NaiveCD4, Tfh_Differentiation_alpha, gamma);  // modifiers: Bcl6, IL10; isVersionOf GO:0061470
    Tfh_Differentiation_alpha = 0.1; gamma = 0.364318;
  // This reaction represents differentiation of Treg to Tfr by Bcl-6 and CXCR-5 .
  Tfr_Differentiation: nTreg => Tfr; compartment*Cell_Differentiation__2A__1(Bcl6, CXCR5, gamma1, gamma2, nTreg);  // modifiers: Bcl6, CXCR5; isVersionOf GO:0045066
    gamma1 = 0.0555708; gamma2 = 0.111444;
  Tfh_Death: Tfh => ; compartment*Tfh_Death_k1*Tfh;  // isVersionOf GO:0070231
    Tfh_Death_k1 = 0.03;
  Tfr_Death: Tfr => ; compartment*Tfr_Death_k1*Tfr;  // isVersionOf GO:0070238
    Tfr_Death_k1 = 0.03;
  // This reaction represents Bcl6 activation by STAT3 and ICOS, and inhibition of Bcl6 activation by STAT5, RXR and Blimp1.
  Bcl6_Activation: => Bcl6; compartment*Molecule_Production__2A_3I__v2_1(Blimp1, ICOS, RXR, STAT3, STAT5, Bcl6_Activation_alpha1, alpha2, alpha3, Bcl6_Activation_sigma1, Bcl6_Activation_sigma2);  // modifiers: ICOS, STAT3, Blimp1, STAT5, RXR
    Bcl6_Activation_alpha1 = 0.20001; alpha2 = 1.36752; alpha3 = 0.1253; Bcl6_Activation_sigma1 = 3.24417; Bcl6_Activation_sigma2 = 3.2195;
  // This reaction represents Blimp1 activation by Tfr, and inhibition of Blimp1 activation by Bcl-6
  Blimp1_Activation: => Blimp1; compartment*Molecule_Production__1A_1I__1(Bcl6, Tfr, Blimp1_Activation_alpha, Blimp1_Activation_sigma);  // modifiers: Tfr, Bcl6
    Blimp1_Activation_alpha = 2.386; Blimp1_Activation_sigma = 3.59995;
  // This reaction represents FoxP3 activation by nTreg
  FoxP3_Activation: => FoxP3; compartment*Molecule_Production__1A_0I__1(nTreg, FoxP3_Activation_sigma);  // modifiers: nTreg
    FoxP3_Activation_sigma = 0.1;
  // This reaction represents STAT3 activation by IL6 and IL21.
  STAT3_Activation: => STAT3; compartment*Molecule_Production__2A_0I__1(IL21, IL6, STAT3_Activation_sigma1, STAT3_Activation_sigma2);  // modifiers: IL6, IL21
    STAT3_Activation_sigma1 = 0.1253; STAT3_Activation_sigma2 = 0.1;
  // This reaction represents STAT5 activation by IL21.
  STAT5_Activation: => $STAT5; compartment*Molecule_Production__1A_0I__2(IL2, STAT5_Activation_sigma);  // modifiers: IL2
    STAT5_Activation_sigma = 10;
  // This reaction represents CXCR5 production by Tfh and Tfr, and the inhibition of CXCR5 activation by Blimp1.
  CXCR5_Production: => CXCR5; compartment*Molecule_Production__2A_1I__1(Blimp1, Tfh, Tfr, CXCR5_Production_alpha, CXCR5_Production_sigma1, CXCR5_Production_sigma2);  // modifiers: Tfh, Tfr, Blimp1
    CXCR5_Production_alpha = 0.0539319; CXCR5_Production_sigma1 = 3.0403; CXCR5_Production_sigma2 = 2.92243;
  // This reaction represents ICOS production by Tfh.
  ICOS_Production: => ICOS; compartment*Molecule_Production__1A_0I__3(Tfh, ICOS_Production_sigma);  // modifiers: Tfh
    ICOS_Production_sigma = 0.01787;
  IL2_Production: => $IL2; compartment*Constant_flux__irreversible(IL2_Production_v);
    IL2_Production_v = 0.1;
  // This reaction represents IL4 production, positively regulated by Tfh.
  IL4_Production: => IL4; compartment*Molecule_Production__1A_0I__3(Tfh, IL4_Production_sigma);  // modifiers: Tfh
    IL4_Production_sigma = 0.014555;
  // This reaction represents IL6 production inhibited by IL4.
  IL6_Production: => IL6; compartment*Molecule_Production__0A_1I__1(IL4, IL6_Production_alpha1, IL6_Production_sigma1);  // modifiers: IL4
    IL6_Production_alpha1 = 0.43475; IL6_Production_sigma1 = 0.9901;
  // This reaction represents IL10 production by Tfr
  IL10_Production: => IL10; compartment*Molecule_Production__1A_0I__4(Tfr, IL10_Production_sigma);  // modifiers: Tfr
    IL10_Production_sigma = 0.0677;
  Bcl6_Degradation: Bcl6 => ; compartment*Bcl6_Degradation_k1*Bcl6;  // GO:0030163
    Bcl6_Degradation_k1 = 0.16373;
  Blimp1_Degradation: Blimp1 => ; compartment*Blimp1_Degradation_k1*Blimp1;  // GO:0030163
    Blimp1_Degradation_k1 = 0.1106;
  FoxP3_Degradation: FoxP3 => ; compartment*FoxP3_Degradation_k1*FoxP3;  // GO:0030163
    FoxP3_Degradation_k1 = 0.1;
  STAT3_Degradation: STAT3 => ; compartment*STAT3_Degradation_k1*STAT3;  // GO:0030163
    STAT3_Degradation_k1 = 0.1;
  STAT5_Degradation: $STAT5 => ; compartment*STAT5_Degradation_k1*STAT5;  // GO:0030163
    STAT5_Degradation_k1 = 0.1;
  CXCR5_Degradation: CXCR5 => ; compartment*CXCR5_Degradation_k1*CXCR5;  // GO:0030163
    CXCR5_Degradation_k1 = 0.1;
  ICOS_Degradation: ICOS => ; compartment*ICOS_Degradation_k1*ICOS;  // GO:0030163
    ICOS_Degradation_k1 = 0.1;
  IL2_Degradation: $IL2 => ; compartment*IL2_Degradation_k1*IL2;  // GO:0030163
    IL2_Degradation_k1 = 0.1;
  IL4_Degradation: IL4 => ; compartment*IL4_Degradation_k1*IL4;  // GO:0030163
    IL4_Degradation_k1 = 0.1;
  IL6_Degradation: IL6 => ; compartment*IL6_Degradation_k1*IL6;  // GO:0030163
    IL6_Degradation_k1 = 0.69675;
  IL10_Degradation: IL10 => ; compartment*IL10_Degradation_k1*IL10;  // GO:0030163
    IL10_Degradation_k1 = 0.1;
  IL21_Degradation: IL21 => ; compartment*IL21_Degradation_k1*IL21;  // GO:0030163
    IL21_Degradation_k1 = 0.1;
  // This reaction represents IL21 production, positively regulated by Tfh.
  IL21_Production: => IL21; compartment*Molecule_Production__1A_0I__3(Tfh, IL21_Production_sigma);  // modifiers: Tfh; isVersionOf GO:0072619
    IL21_Production_sigma = 0.06005;
  // This reaction represents TGFb activation by IL10.
  TGFb_Production: => TGFb; compartment*Molecule_Production__1A_0I__5(IL10, TGFb_Production_sigma);  // modifiers: IL10
    TGFb_Production_sigma = 0.1;
  TGFb_Degradation: TGFb => ; compartment*TGFb_Degradation_k1*TGFb;  // GO:0030163
    TGFb_Degradation_k1 = 0.1;
  RXR_Activation: => RXR; compartment*Molecule_Production__1A_1I__2(TGFb, Tgif1, RXR_Activation_alpha, RXR_Activation_sigma);  // modifiers: TGFb, Tgif1
    RXR_Activation_alpha = 3.04985; RXR_Activation_sigma = 0.05;
  // This reaction represents Tgif1 activation positively regulated by Tfh.
  Tgif1_Production: => Tgif1; compartment*Molecule_Production__1A_0I__3(Tfh, Tgif1_Production_sigma);  // modifiers: Tfh
    Tgif1_Production_sigma = 0.1;
  RXR_Degradation: RXR => ; compartment*RXR_Degradation_k1*RXR;  // GO:0030163
    RXR_Degradation_k1 = 0.08465;
  Tgif1_Degradation: Tgif1 => ; compartment*Tgif1_Degradation_k1*Tgif1;  // GO:0030163
    Tgif1_Degradation_k1 = 0.1;

  // Unit definitions:
  unit volume = 1e-3 litre;
  unit time = 86400 second;
  unit substance = item;
end
