// SBML level 2 version 3
// This model was downloaded from BioModels Database
// http://www.ebi.ac.uk/biomodels-static/

model MODEL1601130000()
  // DeCaluwe2016 - Circadian Clock
  // DeCaluwé2016 - Circadian Clock
  // This model is described in the article:
  // A Compact Model for the Complex Plant Circadian Clock.
  // De Caluwé J, Xiao Q, Hermans C, Verbruggen N, Leloup JC, Gonze D.
  // Front Plant Sci 2016; 7: 74
  // Abstract:
  // The circadian clock is an endogenous timekeeper that allows organisms to anticipate and adapt to the daily variations of their environment. The plant clock is an intricate network of interlocked feedback loops, in which transcription factors regulate each other to generate oscillations with expression peaks at specific times of the day. Over the last decade, mathematical modeling approaches have been used to understand the inner workings of the clock in the model plant Arabidopsis thaliana. Those efforts have produced a number of models of ever increasing complexity. Here, we present an alternative model that combines a low number of equations and parameters, similar to the very earliest models, with the complex network structure found in more recent ones. This simple model describes the temporal evolution of the abundance of eight clock gene mRNA/protein and captures key features of the clock on a qualitative level, namely the entrained and free-running behaviors of the wild type clock, as well as the defects found in knockout mutants (such as altered free-running periods, lack of entrainment, or changes in the expression of other clock genes). Additionally, our model produces complex responses to various light cues, such as extreme photoperiods and non-24 h environmental cycles, and can describe the control of hypocotyl growth by the clock. Our model constitutes a useful tool to probe dynamical properties of the core clock as well as clock-dependent processes.
  // This model is hosted on BioModels Database and identified by: BIOMD0000000631.
  // To cite BioModels Database, please use: BioModels Database: An enhanced, curated and annotated resource for published quantitative kinetic models.
  // To the extent possible under law, all copyright and related or neighbouring rights to this encoded model have been dedicated to the public domain worldwide. Please refer to CC0 Public Domain Dedication for more information.
  // biomodels.db:MODEL1601130000
  // biomodels.db:BIOMD0000000631
  // isDescribedBy pubmed:26904049
  // isVersionOf GO:0042752
  // hasProperty mamo:MAMO_0000046
  // isVersionOf GO:0042752 GO:0043153

  // Compartments:
  compartment cell = 1;  // isVersionOf GO:0005623

  // Species:
  // Represents Dawn Clock Genes' mRNAs
  species CL_m in cell = 1; CL_m is "CCA1/LHY mRNA";  // hasPart ncbigene:839341 ncbigene:819296
  // Represents Dawn Clock Genes' proteins
  species CL_p in cell = 1; CL_p is "CCA1/LHY protein";  // hasPart uniprot:Q6R0H1 uniprot:P92973
  // Represents Pseudo-Response Regulator Clock mRNAs
  species P97_m in cell = 1; P97_m is "PRR9/PRR7 mRNA";  // hasPart ncbigene:831793 ncbigene:819292
  // Represents Pseudo-Response Regulator Clock Proteins
  species P97_p in cell = 1; P97_p is "PRR9/PRR7 protein";  // hasPart uniprot:Q8L500 uniprot:Q93WK5
  // Represents Pseudo-Response Regulator Clock mRNAs
  species P51_m in cell = 1; P51_m is "PRR5/TOC1 mRNA";  // hasPart ncbigene:836259 ncbigene:832518
  // Represents Pseudo-Response Regulator Clock Proteins
  species P51_p in cell = 1; P51_p is "PRR5/TOC1 protein";  // hasPart uniprot:Q9LKL2 uniprot:Q6LA42
  // Represents Dusk Clock Genes
  species EL_m in cell = 1; EL_m is "ELF4/LUX mRNA";  // isEncodedBy ncbigene:823817 ncbigene:818596
  // Represents Evening Complex of Dusk Clock Proteins
  species EL_p in cell = 1; EL_p is "ELF4/LUX protein";  // hasPart uniprot:Q9SNB4 uniprot:O04211
  // Control of Hypocotyl Growth
  species PIF_m in cell = 1; PIF_m is "PIF4/PIF5 mRNA";  // hasPart ncbigene:825075 ncbigene:818903
  // Control of Hypocotyl Growth
  species PIF_p in cell = 1; PIF_p is "PIF4/PIF5 protein";  // hasPart uniprot:Q84LH8 uniprot:Q8W2F3
  // Hypocotyl length is an output measure, so it is not involved in reactions.
  species hypocotyl in cell = 1; hypocotyl is "Hypocotyl length";  // isPropertyOf BTO:0000613
  // PIL1 and PIF3 along with other unidentified proteins, represented by a non-clock regulated variable, P, which accumulates during dark and is rapidly degraded in light.
  species P in cell = 1;  // hasPart uniprot:O80536 uniprot:Q8L5W8

  // Parameters:
  v1 = 4.58;
  v1L = 3;
  v2A = 1.27;
  v2B = 1.48;
  v3 = 1;
  v4 = 1.47;
  k1L = 0.53;
  v2L = 5;
  k1D = 0.21;
  k2 = 0.35;
  k3 = 0.56;
  k4 = 0.57;
  p1 = 0.76;
  p1L = 0.42;
  p2 = 1.01;
  p3 = 0.64;
  p4 = 1.01;
  d1 = 0.68;
  d2D = 0.5;
  d2L = 0.29;
  d3D = 0.48;
  d3L = 0.78;
  d4D = 1.21;
  d4L = 0.38;
  K1 = 0.16;
  K2 = 1.18;
  K3 = 0.24;
  K4 = 0.23;
  K5 = 0.3;
  K6 = 0.46;
  K7 = 2;
  K8 = 0.36;
  K9 = 1.9;
  K10 = 1.9;
  v5 = 0.1;
  k5 = 0.14;
  p5 = 0.62;
  d5L = 4;
  d5D = 0.52;
  g1 = 0.01;
  g2 = 0.12;
  K11 = 0.21;
  K12 = 0.56;
  PP = 12; PP is "Photoperiod";
  T = 24; T is "Cycle length";
  L = 1; L is "Light";
  D = 0; D is "Dark";

  // Reactions:
  // Dependent on PRR9/PRR7 inhibition on promoter binding, and competitive inhibition by PRR5/TOC1
  CL_transcription: -> CL_m; v1/(1 + (P97_p/K1)^2 + (P51_p/K2)^2);  // modifiers: P51_p, P97_p; hasProperty GO:1904797; isVersionOf GO:0006351
  // Light-induced mRNA transcription
  CL_light_transcription: -> CL_m; v1L*L*P/(1 + (P97_p/K1)^2 + (P51_p/K2)^2);  // modifiers: P51_p, P97_p, P; hasProperty GO:0009642; isVersionOf GO:0006351
  // Light induced mRNA degradation
  CLm_light_degradation: CL_m -> ; k1L*L*CL_m;  // hasProperty GO:0009642; isVersionOf GO:0006402
  // Dark induced mRNA degradation
  CLm_dark_degradation: CL_m -> ; k1D*D*CL_m;  // hasProperty GO:0009646; isVersionOf GO:0006402
  // Dependent on concentration of CCA1/LHY mRNA
  CL_translation: -> CL_p; p1*CL_m;  // modifiers: CL_m; hasProperty GO:2000765; isVersionOf GO:0006412
  // Light induced translation
  CL_light_translation: -> CL_p; p1L*L*CL_m;  // modifiers: CL_m; hasProperty GO:0009642; isVersionOf GO:0006412
  // Dependent CCA1/LHY protein concentrations
  CLp_degradation: CL_p -> ; d1*CL_p;  // hasProperty GO:0042176; isVersionOf GO:0030163
  // Light induced mRNA transcription
  P97_light_transcription: -> P97_m; v2L*L*P/(1 + (P51_p/K4)^2 + (EL_p/K5)^2);  // modifiers: P51_p, EL_p, P; hasProperty GO:0009642; isVersionOf GO:0006351
  // Dependent on positive regulation of transcription by CCA1/LHY and light and negative regulation of transcription by ELF4/LUX and PRR5/TOC1
  P97_transcription: -> P97_m; v2A/(1 + (P51_p/K4)^2 + (EL_p/K5)^2);  // modifiers: P51_p, EL_p; hasProperty GO:0009642 GO:2000144 GO:0010944; isVersionOf GO:0006351
  // CCA1/LHY bind promoter to increase transcription
  P97_CL_transcription: -> P97_m; v2B*CL_p^2/(K3^2 + CL_p^2)/(1 + (P51_p/K4)^2 + (EL_p/K5)^2);  // modifiers: P51_p, CL_p, EL_p; isVersionOf GO:0045893
  P97m_degradation: P97_m -> ; k2*P97_m;  // isVersionOf GO:0006402
  P97_translation: -> P97_p; p2*P97_m;  // modifiers: P97_m; isVersionOf GO:0006412
  // Protein acting on PRR9/PRR7 has not been identified yet
  P97_dark_degradation: P97_p -> ; d2D*D*P97_p;  // hasProperty GO:0009646; isVersionOf GO:0030163
  // Slower than Dark induced protein degradation of PRR9/PRR7
  P97_light_degradation: P97_p -> ; d2L*L*P97_p;  // hasProperty GO:0009642; isVersionOf GO:0030163
  // Dependent on inhibition by CCA1/LHY and inhibition on self by PRR5/TOC1
  P51_transcription: -> P51_m; v3/(1 + (CL_p/K6)^2 + (P51_p/K7)^2);  // modifiers: P51_p, CL_p; hasProperty GO:0010944; isVersionOf GO:0006351
  P51m_degradation: P51_m -> ; k3*P51_m;  // isVersionOf GO:0006402
  P51_translation: -> P51_p; p3*P51_m;  // modifiers: P51_m; isVersionOf GO:0006412
  // ZTL is responsible for tagging both PRR5 and TOC1 for degradation
  P51_dark_degradation: P51_p -> ; d3D*D*P51_p;  // hasProperty GO:0009646; isVersionOf GO:0030163
  P51_light_degradation: P51_p -> ; d3L*L*P51_p;  // hasProperty GO:0009642; isVersionOf GO:0030163
  // Dependent on prescence of light, competitive inhibition by CCA1/LHY and PRR9/PRR7, and negative regulation of self
  EL_light_transcription: -> EL_m; L*v4/(1 + (CL_p/K8)^2 + (P51_p/K9)^2 + (EL_p/K10)^2);  // modifiers: P51_p, CL_p, EL_p; hasProperty GO:0010944 GO:0009642; isVersionOf GO:0006351
  ELm_degradation: EL_m -> ; k4*EL_m;  // isVersionOf GO:0006402
  EL_translation: -> EL_p; p4*EL_m;  // modifiers: EL_m; isVersionOf GO:0006412
  EL_dark_degradation: EL_p -> ; d4D*D*EL_p;  // hasProperty GO:0009646; isVersionOf GO:0030163
  EL_light_degradation: EL_p -> ; d4L*L*EL_p;  // hasProperty GO:0009642; isVersionOf GO:0030163
  P_dark_accumulation: -> P; 0.3*(1 - P)*D;  // isVersionOf GO:0009646
  P_light_degradation: P -> ; P*L;  // hasProperty GO:0009642; isVersionOf GO:0030163
  // Dependent on Evening Complex inhibition on promoter binding
  PIF_transcription: -> PIF_m; v5/(1 + (EL_p/K11)^2);  // modifiers: EL_p; isVersionOf GO:0006351; hasProperty GO:0010944
  PIFm_degradation: PIF_m -> ; k5*PIF_m;  // isVersionOf GO:0006402
  PIF_translation: -> PIF_p; p5*PIF_m;  // modifiers: PIF_m; isVersionOf GO:0006412
  // Slower than Light induced protein degradation
  PIF_dark_degradation: PIF_p -> ; d5D*D*PIF_p;  // hasProperty GO:0009646; isVersionOf GO:0030163
  // About 7.69 fold increase in protein degradation than Dark conditions
  PIF_light_degradation: PIF_p -> ; d5L*L*PIF_p;  // isVersionOf GO:0030163; hasProperty GO:0009642
  basal_growth: -> hypocotyl; g1;  // isVersionOf GO:0080189
  PIF_induced_growth: -> hypocotyl; g2*PIF_p^2/(K12^2 + PIF_p^2);  // modifiers: PIF_p; isVersionOf GO:0080189
end
