// SBML level 2 version 4
// This model was downloaded from BioModels Database
// http://www.ebi.ac.uk/biomodels-static/
// dcterms:bibliographicCitation: urn:miriam:pubmed:27136687

function Constant_flux__irreversible(v)
  v;
end
Constant_flux__irreversible is "Constant flux (irreversible)";

function Vdcyce(kdcyce, kdcycee, CycE, Inhibitor, kdcycea, CycA, Sub)
  (kdcyce + kdcycee*CycE/(1 + Inhibitor) + kdcycea*CycA/(1 + Inhibitor))*Sub;
end

function Vdcyca(kdcyca, kdcycac1, Cdh1, Sub)
  (kdcyca + kdcycac1*Cdh1)*Sub;
end

function Vdp27(kd27e, CycE, Inhibitor, kd27a, CycA, Skp2, kd27, Sub)
  ((kd27e*CycE/(1 + Inhibitor) + kd27a*CycA/(1 + Inhibitor))*Skp2 + kd27)*Sub;
end

function Vdskp2(kdskp2, kdskp2c1, Cdh1, Sub)
  (kdskp2 + kdskp2c1*Cdh1)*Sub;
end

function Vicdh1(kicdh1e, CycE, Inhibitor, kicdh1a, CycA, Sub)
  (kicdh1e*CycE/(1 + Inhibitor) + kicdh1a*CycA/(1 + Inhibitor))*Sub;
end

model MODEL1708240001()
  // Barr2016 - All-or-nothing G1/S transition
  // This model is described in the article:
  // A Dynamical Framework for the All-or-None G1/S Transition.
  // Barr AR, Heldt FS, Zhang T, Bakal C, Novák B.
  // Cell Syst 2016 Jan; 2(1): 27-37
  // Abstract:
  // The transition from G1 into DNA replication (S phase) is an emergent behavior resulting from dynamic and complex interactions between cyclin-dependent kinases (Cdks), Cdk inhibitors (CKIs), and the anaphase-promoting complex/cyclosome (APC/C). Understanding the cellular decision to commit to S phase requires a quantitative description of these interactions. We apply quantitative imaging of single human cells to track the expression of G1/S regulators and use these data to parametrize a stochastic mathematical model of the G1/S transition. We show that a rapid, proteolytic, double-negative feedback loop between Cdk2:Cyclin and the Cdk inhibitor p27(Kip1) drives a switch-like entry into S phase. Furthermore, our model predicts that increasing Emi1 levels throughout S phase are critical in maintaining irreversibility of the G1/S transition, which we validate using Emi1 knockdown and live imaging of G1/S reporters. This work provides insight into the general design principles of the signaling networks governing the temporally abrupt transitions between cell-cycle phases.
  // This model is hosted on BioModels Database and identified by: BIOMD0000000646.
  // To cite BioModels Database, please use: Chelliah V et al. BioModels: ten-year anniversary. Nucl. Acids Res. 2015, 43(Database issue):D542-8.
  // To the extent possible under law, all copyright and related or neighbouring rights to this encoded model have been dedicated to the public domain worldwide. Please refer to CC0 Public Domain Dedication for more information.
  // biomodels.db:MODEL1708240001
  // biomodels.db:BIOMD0000000646
  // isDescribedBy pubmed:27136687
  // hasTaxon taxonomy:9606
  // hasProperty GO:1901987 GO:0007049 DOID:162
  // isVersionOf PW:0001553

  // Compartments:
  compartment compartment = 1;  // isVersionOf BTO:0000567

  // Species:
  species CycE in compartment = 0;  // isVersionOf PR:000044430
  species CycA in compartment = 0;  // isVersionOf PR:000041205
  species CycEp27 in compartment = 0;  // hasPart PR:000044430
  species CycAp27 in compartment = 0;  // hasPart OMIT:0024493; hasPart PR:000041205
  species Skp2 in compartment = 0;  // isVersionOf uniprot:Q13309
  species Cdh1p in compartment = 0;  // isVersionOf ncbigene:12550; isVersionOf kegg.compound:C00562
  species Emi1 in compartment = 0;  // isVersionOf ncbigene:852125
  species p27 in compartment = 0;  // isVersionOf OMIT:0024493
  species Cdh1 in compartment = 1;  // isVersionOf ncbigene:12550
  species $CycET in compartment;  // isVersionOf PR:000044430
  species $CycAT in compartment;  // isVersionOf PR:000041205
  species $p27T in compartment;  // isVersionOf OMIT:0024493
  species Emi1Cdh1 in compartment = 0;  // hasPart ncbigene:12550; hasPart ncbigene:852125
  species Emi1Cdh1p in compartment = 0;  // hasPart ncbigene:12550; hasPart kegg.compound:C00562; hasPart ncbigene:852125
  species $EmiC in compartment;  // hasPart ncbigene:12550; hasPart ncbigene:852125
  species $Emi1T in compartment;  // isVersionOf ncbigene:852125
  species $Cdh1dp in compartment;  // isVersionOf ncbigene:12550
  species $Cdh1T in compartment;  // isVersionOf ncbigene:12550

  // Parameters:
  kscyce = 0.003;
  kdcyce = 0.001;
  kdcycee = 0.0001;
  kdcycea = 0.03;
  kasse = 1;
  kdise = 0.02;
  kscyca = 0.0025;
  kdcyca = 0.002;
  kdcycac1 = 0.4;
  kassa = 1;
  kdisa = 0.02;
  ks27 = 0.008;
  kd27 = 0.004;
  kd27e = 2;
  kd27a = 2;
  ksemi1 = 0.003;
  kdemi1 = 0.001;
  kacdh1 = 0.02;
  kicdh1e = 0.07;
  kicdh1a = 0.2;
  kasec = 2;
  kdiec = 0.02;
  ksskp2 = 0.004;
  kdskp2 = 0.002;
  kdskp2c1 = 0.2;
  Inhibitor = 0;

  // Assignment rules:
  CycET := CycE + CycEp27;
  CycAT := CycA + CycAp27;
  p27T := p27 + CycEp27 + CycAp27;
  EmiC := Emi1Cdh1 + Emi1Cdh1p;
  Emi1T := Emi1 + Emi1Cdh1 + Emi1Cdh1p;
  Cdh1dp := Cdh1 + Emi1Cdh1;
  Cdh1T := Cdh1 + Cdh1p + Emi1Cdh1 + Emi1Cdh1p;

  // Reactions:
  CycE_Synthesis: => CycE; compartment*Constant_flux__irreversible(kscyce);
  CycE_degradation: CycE => ; compartment*Vdcyce(kdcyce, kdcycee, CycE, Inhibitor, kdcycea, CycA, CycE);  // modifiers: CycA; hasProperty GO:0030163
  CycA_synthesis: => CycA; compartment*Constant_flux__irreversible(kscyca);
  CycA_degradation: CycA => ; compartment*Vdcyca(kdcyca, kdcycac1, Cdh1, CycA);  // modifiers: Cdh1; hasProperty GO:0030163
  p27_Synthesis: => p27; compartment*Constant_flux__irreversible(ks27);
  p27_degradation: p27 => ; compartment*Vdp27(kd27e, CycE, Inhibitor, kd27a, CycA, Skp2, kd27, p27);  // modifiers: CycE, CycA, Skp2; hasProperty GO:0030163
  CycE_p27_Binding: CycE + p27 -> CycEp27; compartment*(kasse*CycE*p27 - kdise*CycEp27); CycE_p27_Binding is "CycE-p27 Binding";  // hasProperty GO:0043241; hasProperty GO:0006461
  CycA_p27_Binding: CycA + p27 -> CycAp27; compartment*(kassa*CycA*p27 - kdisa*CycAp27); CycA_p27_Binding is "CycA-p27 Binding";  // hasProperty GO:0043241; hasProperty GO:0006461
  CycA_degradation_from_CycA_p27_complexes: CycAp27 => p27; compartment*Vdcyca(kdcyca, kdcycac1, Cdh1, CycAp27); CycA_degradation_from_CycA_p27_complexes is "CycA degradation from CycA:p27 complexes";  // modifiers: Cdh1; isVersionOf GO:0030163
  p27_degradation_from_CycA_p27_complexes: CycAp27 => CycA; compartment*Vdp27(kd27e, CycE, Inhibitor, kd27a, CycA, Skp2, kd27, CycAp27); p27_degradation_from_CycA_p27_complexes is "p27 degradation from CycA:p27 complexes";  // modifiers: CycE, Skp2; isVersionOf GO:0030163
  CycE_degradation_from_CycE_p27_complexes: CycEp27 => p27; compartment*Vdcyce(kdcyce, kdcycee, CycE, Inhibitor, kdcycea, CycA, CycEp27); CycE_degradation_from_CycE_p27_complexes is "CycE degradation from CycE:p27 complexes";  // modifiers: CycE, CycA; hasProperty GO:0030163
  p27_degradation_from_CycE_p27_complexes: CycEp27 => CycE; compartment*Vdp27(kd27e, CycE, Inhibitor, kd27a, CycA, Skp2, kd27, CycEp27); p27_degradation_from_CycE_p27_complexes is "p27 degradation from CycE:p27 complexes";  // modifiers: CycA, Skp2; hasProperty GO:0030163
  Skp2_synthesis: => Skp2; compartment*Constant_flux__irreversible(ksskp2);
  Skp2_degradation: Skp2 => ; compartment*Vdskp2(kdskp2, kdskp2c1, Cdh1, Skp2);  // modifiers: Cdh1; isVersionOf GO:0030163
  Cdh1_phosphorylation: Cdh1 => Cdh1p; compartment*Vicdh1(kicdh1e, CycE, Inhibitor, kicdh1a, CycA, Cdh1);  // modifiers: CycE, CycA; isVersionOf GO:0016310
  Cdh1_dephosphorylation: Cdh1p => Cdh1; compartment*kacdh1*Cdh1p;  // isVersionOf GO:0016311
  Cdh1_Emi1_binding: Cdh1 + Emi1 -> Emi1Cdh1; compartment*(kasec*Cdh1*Emi1 - kdiec*Emi1Cdh1); Cdh1_Emi1_binding is "Cdh1-Emi1 binding";  // hasProperty GO:0043241; hasProperty GO:0006461
  Emi1_degradation_from_Cdh1_Emi1_complexes: Emi1Cdh1 => Cdh1; compartment*kdemi1*Emi1Cdh1; Emi1_degradation_from_Cdh1_Emi1_complexes is "Emi1 degradation from Cdh1:Emi1 complexes";  // isVersionOf GO:0030163
  Emi1_synthesis: => Emi1; compartment*Constant_flux__irreversible(ksemi1);
  Cdh1p_Emi1_binding: Cdh1p + Emi1 -> Emi1Cdh1p; compartment*(kasec*Cdh1p*Emi1 - kdiec*Emi1Cdh1p); Cdh1p_Emi1_binding is "Cdh1p-Emi1 binding";  // hasProperty GO:0043241; hasProperty GO:0006461
  Cdh1_Emi1_phosphorylation: Emi1Cdh1 => Emi1Cdh1p; compartment*Vicdh1(kicdh1e, CycE, Inhibitor, kicdh1a, CycA, Emi1Cdh1); Cdh1_Emi1_phosphorylation is "Cdh1:Emi1 phosphorylation";  // modifiers: CycE, CycA; isVersionOf GO:0016310
  Cdh1p_Emi1_dephosphorylation: Emi1Cdh1p => Emi1Cdh1; compartment*kacdh1*Emi1Cdh1p; Cdh1p_Emi1_dephosphorylation is "Cdh1p:Emi1 dephosphorylation";  // isVersionOf GO:0016311
  Emi1_degradation_from_Cdh1p_Emi1_complexes: Emi1Cdh1p => Cdh1p; compartment*kdemi1*Emi1Cdh1p; Emi1_degradation_from_Cdh1p_Emi1_complexes is "Emi1 degradation from Cdh1p:Emi1 complexes";  // isVersionOf GO:0030163
  Emi1_degradation: Emi1 => ; compartment*kdemi1*Emi1;  // isVersionOf GO:0030163

  // Unit definitions:
  unit volume = 1e-3 litre;
  unit time = 60 second;
  unit substance = 1e-3 mole;
end
