// SBML level 2 version 4
// This model was downloaded from BioModels Database
// http://www.ebi.ac.uk/biomodels-static/
// dcterms:bibliographicCitation: http://identifiers.org/doi/10.1007/3-540-36481-1_11

model Kwang2003___The_influence_of_RKIP_on_the_ERK_signaling_pathway()
  // Kwang2003 - The influence of RKIP on the ERK signaling pathway
  // This model is described in the article:
  // Mathematical Modeling of the Influence of RKIP on the ERK Signaling Pathway
  // Kwang-Hyun Cho, Sung-Young Shin, Hyun-Woo Kim, Olaf Wolkenhauer, Brian McFerran and Walter Kolch
  // Computational Methods in Systems Biology: First International Workshop, CMSB 2003 Rovereto, Italy, February 24â??26, 2003 Proceedings
  // Abstract:
  // This paper investigates the influence of the Raf Kinase Inhibitor Pro- tein (RKIP) on the Extracellular signal Regulated Kinase (ERK) signaling pathway through mathematical modeling and simulation. Using nonlinear ordi- nary differential equations to represent biochemical reactions in the pathway, we suggest a technique for parameter estimation, utilizing time series data of proteins involved in the signaling pathway. The mathematical model allows the simulation the sensitivity of the ERK pathway to variations of initial RKIP and ERK-PP (phosphorylated ERK) concentrations along with time. Throughout the simulation study, we can qualitatively validate the proposed mathematical model compared with experimental results.
  // This model is hosted on BioModels Database and identified by: BIOMD0000000647.
  // To cite BioModels Database, please use: Chelliah V et al. BioModels: ten-year anniversary. Nucl. Acids Res. 2015, 43(Database issue):D542-8.
  // To the extent possible under law, all copyright and related or neighbouring rights to this encoded model have been dedicated to the public domain worldwide. Please refer to CC0 Public Domain Dedication for more information.
  // hasPart kegg.pathway:map04010
  // biomodels.db:MODEL1708250000
  // biomodels.db:BIOMD0000000647
  // hasProperty GO:0070372
  // isDescribedBy mamo:MAMO_0000046
  // isDescribedBy doi:10.1007/3-540-36481-1_11

  // Compartments:
  compartment cytoplasm = 1;

  // Species:
  species Raf1 in cytoplasm = 2;  // isVersionOf uniprot:P04049
  species RKIP in cytoplasm = 2.5;  // isVersionOf ncit:C2336
  species Raf1_RKIP in cytoplasm = 0;  // hasPart uniprot:P04049; hasPart ncit:C2336; isVersionOf GO:0043234
  species Raf1_RKIP_ERKPP in cytoplasm = 0;  // hasPart uniprot:P27361; hasPart uniprot:P04049; hasPart ncit:C2336; isVersionOf GO:0043234
  species ERK in cytoplasm = 0;  // isVersionOf uniprot:P27361
  species RKIPP in cytoplasm = 0;  // isVersionOf ncit:C2336
  species MEKPP in cytoplasm = 2.5;  // isVersionOf uniprot:Q02750
  species MEKPP_ERK in cytoplasm = 0;  // hasPart uniprot:P27361; hasPart uniprot:Q02750; isVersionOf GO:0043234
  species ERKPP in cytoplasm = 2.5;  // isVersionOf uniprot:P27361
  species RP in cytoplasm = 3;  // isVersionOf ncit:C16981
  species RKIPP_RP in cytoplasm = 0;  // isVersionOf ncit:C2336

  // Parameters:
  k1 = 0.53;
  k2 = 0.0072;
  k3 = 0.625;
  k4 = 0.00245;
  k5 = 0.0315;
  k6 = 0.8;
  k7 = 0.0075;
  k8 = 0.071;
  k9 = 0.92;
  k10 = 0.00122;
  k11 = 0.87;

  // Reactions:
  Raf1_RKIP_complex_formation: Raf1 + RKIP => Raf1_RKIP; cytoplasm*k1*Raf1*RKIP;
  Raf1_RKIP_complex_disassembly: Raf1_RKIP => Raf1 + RKIP; cytoplasm*k2*Raf1_RKIP;  // isVersionOf ncit:C52475
  Raf1_RKIP_ERKPP_complex_formation: Raf1_RKIP + ERKPP => Raf1_RKIP_ERKPP; cytoplasm*k3*Raf1_RKIP*ERKPP;
  Raf1_RKIP_ERKPP_complex_disassembly__ERK_phosphorylation: Raf1_RKIP_ERKPP => Raf1_RKIP + ERKPP; cytoplasm*k4*Raf1_RKIP_ERKPP; Raf1_RKIP_ERKPP_complex_disassembly__ERK_phosphorylation is "Raf1_RKIP_ERKPP complex disassembly (ERK phosphorylation)";  // isVersionOf GO:0016310; isVersionOf ncit:C52475
  Raf1_RKIP_ERKPP_complex_disassembly__RKIP_phosphorylation: Raf1_RKIP_ERKPP => Raf1 + ERK + RKIPP; cytoplasm*k5*Raf1_RKIP_ERKPP; Raf1_RKIP_ERKPP_complex_disassembly__RKIP_phosphorylation is "Raf1_RKIP_ERKPP complex disassembly (RKIP phosphorylation)";  // isVersionOf ncit:C52475; isVersionOf GO:0016310
  MEKPP_ERK_complex_formation: ERK + MEKPP => MEKPP_ERK; cytoplasm*k6*ERK*MEKPP;
  MEKPP_ERK_complex_disassembly__ERK_unphosphorylated: MEKPP_ERK => ERK + MEKPP; cytoplasm*k7*MEKPP_ERK; MEKPP_ERK_complex_disassembly__ERK_unphosphorylated is "MEKPP_ERK complex disassembly (ERK unphosphorylated)";  // isVersionOf GO:0016310; isVersionOf ncit:C52475
  MEKPP_ERK_complex_disassembly__ERK_phosphorylated: MEKPP_ERK => MEKPP + ERKPP; cytoplasm*k8*MEKPP_ERK; MEKPP_ERK_complex_disassembly__ERK_phosphorylated is "MEKPP_ERK complex disassembly (ERK phosphorylated)";  // isVersionOf GO:0016310; isVersionOf ncit:C52475
  RKIPP_RP_comlex_formation: RKIPP + RP => RKIPP_RP; cytoplasm*k9*RKIPP*RP;
  RKIPP_RP_complex_disassembly__phosphorylated_RKIP: RKIPP_RP => RP + RKIPP; cytoplasm*k10*RKIPP_RP; RKIPP_RP_complex_disassembly__phosphorylated_RKIP is "RKIPP_RP complex disassembly (phosphorylated RKIP)";  // isVersionOf GO:0016310; isVersionOf ncit:C52475
  RKIPP_RP_complex_disassembly__unphosphorylated_RKIP: RKIPP_RP => RP + RKIP; cytoplasm*k11*RKIPP_RP; RKIPP_RP_complex_disassembly__unphosphorylated_RKIP is "RKIPP_RP complex disassembly (unphosphorylated RKIP)";  // isVersionOf GO:0016310; isVersionOf ncit:C52475

  // Unit definitions:
  unit substance = 1e-6 mole;
end
