// SBML level 2 version 4
// This model was downloaded from BioModels Database
// http://www.ebi.ac.uk/biomodels-static/
// dcterms:bibliographicCitation: urn:miriam:pubmed:12208611 urn:miriam:pubmed:12208611
// dcterms:bibliographicCitation: urn:miriam:pubmed:9257817
// dcterms:bibliographicCitation: urn:miriam:pubmed:7505205
// dcterms:bibliographicCitation: urn:miriam:pubmed:1372394
// dcterms:bibliographicCitation: urn:miriam:isbn:0195064666

function Constant_flux__irreversible(v)
  v;
end
Constant_flux__irreversible is "Constant flux (irreversible)";

function Function_for_T_cell_degradation(k1, m, T, Lm, RT)
  k1*m*T*Lm*RT;
end
Function_for_T_cell_degradation is "Function for T-cell degradation";

function Function_for_tumour_cell_degradation(k1, m, T, LT, Rm)
  k1*m*T*LT*Rm;
end

function Function_for_LT_synthesis(k2, T, m)
  k2*T*m;
end

function Function_for_RT_degradation__SL_modifier(k8, RT, SL)
  k8*RT*SL;
end
Function_for_RT_degradation__SL_modifier is "Function for RT degradation (SL modifier)";

function Function_for_Rm_degradation__SL_modifier(k8, Rm, SL)
  k8*Rm*SL;
end
Function_for_Rm_degradation__SL_modifier is "Function for Rm degradation (SL modifier)";

function Function_for_LT_degradation(K4, k3, LT)
  (K4 + k3)*LT;
end

function Function_for_Lm_degradation(k3, k4, Lm)
  (k3 + k4)*Lm;
end

function Function_for_LT_degradation__m__T_and_Rm_modifiers(k5, m, T, LT, Rm)
  k5*m*T*LT*Rm;
end
Function_for_LT_degradation__m__T_and_Rm_modifiers is "Function for LT degradation (m, T and Rm modifiers)";

function Function_for_Lm_degradation__m__T_and_RT_modifiers(k5, m, T, Lm, RT)
  k5*m*T*Lm*RT;
end
Function_for_Lm_degradation__m__T_and_RT_modifiers is "Function for Lm degradation (m, T and RT modifiers)";

function Function_for_SL_synthesis(k3, Lm, m, LT, T)
  k3*(Lm*m + LT*T);
end

function Function_for_SL_degradation__Rm__m__RT__T_and_SL_modifiers(k9, Rm, m, RT, T, SL)
  k9*(Rm*m + RT*T)*SL;
end
Function_for_SL_degradation__Rm__m__RT__T_and_SL_modifiers is "Function for SL degradation (Rm, m, RT, T and SL modifiers)";

model Webb2002_FasFasLsystem_Tumour()
  // Webb2002 - Fas/FasL mediated tumor T-cell interaction
  // This deterministic model of immunological surveillance involving tumour cell–T-lymphocyte interaction, cell surface expression of Fas/FasL, and their secreted soluble forms.
  // This model is described in the article:
  // Cells behaving badly: a theoretical model for the Fas/FasL system in tumour immunology.
  // Webb SD, Sherratt JA, Fish RG.
  // Math Biosci 2002 Sep-Oct; 179(2): 113-129
  // Abstract:
  // One proposed mechanism of tumour escape from immune surveillance is tumour up-regulation of the cell surface ligand FasL, which can lead to apoptosis of Fas receptor (Fas) positive lymphocytes. Based upon this 'counterattack', we have developed a mathematical model involving tumour cell-lymphocyte interaction, cell surface expression of Fas/FasL, and their secreted soluble forms. The model predicts that (a) the production of soluble forms of Fas and FasL will lead to the down-regulation of the immune response; (b) matrix metalloproteinase (MMP) inactivation should lead to increased membrane FasL and result in a higher rate of Fas-mediated apoptosis for lymphocytes than for tumour cells. Recent studies on cancer patients lend support for these predictions. The clinical implications are two-fold. Firstly, the use of broad spectrum MMP inhibitors as anti-angiogenic agents may be compromised by their adverse effect on tumour FasL up-regulation. Also, Fas/FasL interactions may have an impact on the outcome of numerous ongoing immunotherapeutic trials since the final common pathway of all these approaches is the transduction of death signals within the tumour cell.
  // This model is hosted on BioModels Database and identified by: BIOMD0000000661.
  // To cite BioModels Database, please use: Chelliah V et al. BioModels: ten-year anniversary. Nucl. Acids Res. 2015, 43(Database issue):D542-8.
  // To the extent possible under law, all copyright and related or neighbouring rights to this encoded model have been dedicated to the public domain worldwide. Please refer to CC0 Public Domain Dedication for more information.
  // biomodels.db:MODEL1006230046
  // biomodels.db:BIOMD0000000661
  // isDescribedBy pubmed:12208611
  // unknownQualifier mamo:MAMO_0000046
  // hasTaxon taxonomy:9606
  // isVersionOf GO:1902044

  // Compartments:
  compartment compartment = 1;
  compartment Tumour_cell = 1;  // isVersionOf ncit:C12922
  compartment T_Lymphocyte_cell = 1; T_Lymphocyte_cell is "T-Lymphocyte cell";  // isVersionOf ncit:C104083

  // Species:
  species T in compartment = 500; T is "T-cells (T)";  // isVersionOf ncit:C104083
  species LT in compartment = 0; LT is "mFasL (LT)";  // isVersionOf CHEBI:17089; occursIn ncit:C14070; isVersionOf uniprot:P48023
  species RT in T_Lymphocyte_cell = 10000; RT is "FasR (RT)";  // isVersionOf uniprot:P25445; occursIn ncit:C14070
  species m in compartment = 500; m is "Tumour cells (m)";  // isVersionOf ncit:C12922
  species Lm in Tumour_cell = 1000; Lm is "mFasL (Lm)";  // isVersionOf CHEBI:17089; occursIn ncit:C14070; isVersionOf uniprot:P48023
  species Rm in Tumour_cell = 1000; Rm is "FasR (Rm)";  // isVersionOf uniprot:P25445; occursIn ncit:C14070
  species SL in compartment = 0; SL is "sFasL (SL)";  // isVersionOf PR:000000547

  // Parameters:
  // Parameter value obtained from: J.A. Janeway, P. Travers, Immunology: the Immune System in Health and Disease, Current Biology, London,
  // 1996.
  k1 = 8.38e-10;
  k2 = 0.006;  // isDescribedBy pubmed:9257817
  k3 = 5.9413;
  k4 = 0.35;
  // Parameter value obtained from: J.A. Janeway, P. Travers, Immunology: the Immune System in Health and Disease, Current Biology, London,
  // 1996.
  k5 = 2.52e-9;
  k6 = 2244;  // isDescribedBy pubmed:7505205
  k7 = 0.35;  // isDescribedBy pubmed:1372394
  k8 = 1.92e10;  // isDescribedBy pubmed:7505205
  k9 = 8.73e9;  // isDescribedBy pubmed:7505205
  k10 = 3110;
  k11 = 13.9;  // isDescribedBy isbn:0195064666

  // Reactions:
  // 1 is version of urn:miriam:unknown:IDOMAL:0000393
  T_cell_degradation: T => ; Function_for_T_cell_degradation(k1, m, T, Lm, RT); T_cell_degradation is "T-cell degradation";  // modifiers: m, Lm, RT; isVersionOf ncit:C17557
  Tumour_cell_degradation: m => ; Function_for_tumour_cell_degradation(k1, m, T, LT, Rm);  // modifiers: T, LT, Rm; isVersionOf ncit:C17557
  SL_degradation: SL => ; compartment*k11*SL;
  Lm_synthesis: => Lm; Tumour_cell*Constant_flux__irreversible(k10);  // isVersionOf ncit:C61408
  RT_synthesis: => RT; T_Lymphocyte_cell*Constant_flux__irreversible(k6);  // isVersionOf GO:0032800
  Rm_synthesis: => Rm; Tumour_cell*Constant_flux__irreversible(k6);  // isVersionOf GO:0032800
  RT_degradation: RT => ; T_Lymphocyte_cell*k7*RT;
  Rm_degradation: Rm => ; Tumour_cell*k7*Rm;
  LT_synthesis: => LT; compartment*Function_for_LT_synthesis(k2, T, m);  // modifiers: T, m; isVersionOf ncit:C61408
  RT_degradation__SL_modifier: RT => ; Function_for_RT_degradation__SL_modifier(k8, RT, SL); RT_degradation__SL_modifier is "RT degradation (SL modifier)";  // modifiers: SL
  Rm_degradation__SL_modifier: Rm => ; Function_for_Rm_degradation__SL_modifier(k8, Rm, SL); Rm_degradation__SL_modifier is "Rm degradation (SL modifier)";  // modifiers: SL
  LT_degradation: LT => ; compartment*Function_for_LT_degradation(k4, k3, LT);  // isPropertyOf ncit:C18164
  Lm_degradation: Lm => ; Tumour_cell*Function_for_Lm_degradation(k3, k4, Lm);  // hasProperty ncit:C18164
  // NCIT_C20139
  LT_degradation__m__T_and_Rm_modifiers: LT => ; Function_for_LT_degradation__m__T_and_Rm_modifiers(k5, m, T, LT, Rm); LT_degradation__m__T_and_Rm_modifiers is "LT degradation (m, T and Rm modifiers)";  // modifiers: m, T, Rm; isVersionOf ncit:C20139
  Lm_degradation__m__T_and_RT_modifiers: Lm => ; Function_for_Lm_degradation__m__T_and_RT_modifiers(k5, m, T, Lm, RT); Lm_degradation__m__T_and_RT_modifiers is "Lm degradation (m, T and RT modifiers)";  // modifiers: m, T, RT; isVersionOf ncit:C20139
  // 1 has property Systems Biology Ontology SBO:0000178
  SL_synthesis: => SL; Function_for_SL_synthesis(k3, Lm, m, LT, T); SL_synthesis is "SL formation";  // modifiers: Lm, m, LT, T; isPropertyOf ncit:C18164
  // 1 is version of NCIt NCIT_C20139
  SL_degradation__Rm__m__RT__T_and_SL_modifiers: SL => ; Function_for_SL_degradation__Rm__m__RT__T_and_SL_modifiers(k9, Rm, m, RT, T, SL); SL_degradation__Rm__m__RT__T_and_SL_modifiers is "SL degradation (Rm, m, RT, T and SL modifiers)";  // modifiers: Rm, m, RT, T
end
