// SBML level 2 version 4
// This model was downloaded from BioModels Database
// http://www.ebi.ac.uk/biomodels-static/
// dcterms:bibliographicCitation: http://identifiers.org/pubmed/17379260

function generic_modifier_function_2_1(r, v, x)
  r*v*x;
end

function function_for_x_degrad_2_1(k, r, v, x, y)
  r*x*v*(x + y)/k;
end

function generic_modifier_function_1(Beta, v, x)
  Beta*v*x;
end

function generic_modifier_function_2_2(r, v, y)
  r*v*y;
end

function function_for_y_degrad_2_1(k, r, v, x, y)
  r*y*v*(x + y)/k;
end

function generic_function_3_1(eta, y)
  eta*y;
end

model New_Model()
  // Wodarz2007 - HIV/CD4 T-cell interaction
  // A deterministic model illustrating how CD4 T-cells can influence HIV infection.
  // This model is described in the article:
  // Infection dynamics in HIV-specific CD4 T cells: does a CD4 T cell boost benefit the host or the virus?
  // Wodarz D, Hamer DH.
  // Math Biosci 2007 Sep; 209(1): 14-29
  // Abstract:
  // Recent experimental data have shown that HIV-specific CD4 T cells provide a very important target for HIV replication. We use mathematical models to explore the effect of specific CD4 T cell infection on the dynamics of virus spread and immune responses. Infected CD4 T cells can provide antigen for their own stimulation. We show that such autocatalytic cell division can significantly enhance virus spread, and can also provide an additional reservoir for virus persistence during anti-viral drug therapy. In addition, the initial number of HIV-specific CD4 T cells is an important determinant of acute infection dynamics. A high initial number of HIV-specific CD4 T cells can lead to a sudden and fast drop of the population of HIV-specific CD4 T cells which results quickly in their extinction. On the other hand, a low initial number of HIV-specific CD4 T cells can lead to a prolonged persistence of HIV-specific CD4 T cell help at higher levels. The model suggests that boosting the population of HIV-specific CD4 T cells can increase the amount of virus-induced immune impairment, lead to less efficient anti-viral effector responses, and thus speed up disease progression, especially if effector responses such as CTL have not been sufficiently boosted at the same time.
  // This model is hosted on BioModels Database and identified by: BIOMD0000000663.
  // To cite BioModels Database, please use: Chelliah V et al. BioModels: ten-year anniversary. Nucl. Acids Res. 2015, 43(Database issue):D542-8.
  // To the extent possible under law, all copyright and related or neighbouring rights to this encoded model have been dedicated to the public domain worldwide. Please refer to CC0 Public Domain Dedication for more information.
  // hasTaxon taxonomy:11676
  // hasTaxon taxonomy:9606
  // biomodels.db:MODEL0911270008
  // biomodels.db:BIOMD0000000663
  // isVersionOf efo:0000764
  // isVersionOf GO:0046718

  // Compartments:
  compartment compartment = 1;

  // Species:
  species x in compartment = 0.1; x is "x_Tcell_infected";  // hasPart ncit:C14219; isVersionOf BTO:0000152; isVersionOf BTO:0000782
  species y in compartment = 0; y is "y_Tcell_uninfected";  // isVersionOf BTO:0000782
  species v in compartment = 1; v is "v_free_virus";  // isVersionOf ncit:C14219

  // Parameters:
  r = 1;
  k = 10;
  d = 0.1;
  Beta = 0.2;
  a = 0.2;
  eta = 1;
  u = 0.5;

  // Reactions:
  reaction: => x; compartment*generic_modifier_function_2_1(r, v, x); reaction is "Uninfected Tcell proliferation";  // modifiers: v; isVersionOf ncit:C18081
  reaction_1: x => ; compartment*function_for_x_degrad_2_1(k, r, v, x, y); reaction_1 is "Reduction in x-proliferation due to carry capacity";  // modifiers: v, y; isVersionOf ncit:C25443
  Uninfected_T_cell_death: x => ; compartment*d*x;  // isVersionOf GO:0008219
  Tcell_Infection_1: x => y; compartment*generic_modifier_function_1(Beta, v, x);  // modifiers: v; isVersionOf ncit:C3439
  Tcell_Infection_2: => y; compartment*generic_modifier_function_2_2(r, v, y);  // modifiers: v; isVersionOf ncit:C3439
  reaction_5: y => ; compartment*function_for_y_degrad_2_1(k, r, v, x, y); reaction_5 is "Reduction in y-proliferation due to carry capacity";  // modifiers: v, x
  Infected_T_cell_death: y => ; compartment*a*y;  // isVersionOf GO:0008219
  HIV_proliferation: => v; compartment*generic_function_3_1(eta, y);  // modifiers: y; isVersionOf ncit:C18081
  HIV_degradation: v => ; compartment*u*v;

  // Unit definitions:
  unit volume = 1e-3 litre;
  unit substance = 1e-3 mole;
end
