// SBML level 2 version 4
// This model was downloaded from BioModels Database
// http://www.ebi.ac.uk/biomodels-static/
// dcterms:bibliographicCitation: urn:miriam:pubmed:16864000

function Constant_flux__irreversible(v)
  v;
end
Constant_flux__irreversible is "Constant flux (irreversible)";

function function_for_modified_reactions(k, modifier, substrate)
  k*modifier*substrate;
end

model Chen2006___Nitric_Oxide_Release_from_Endothelial_Cells()
  // Chen2006 - Nitric Oxide Release from Endothelial Cells
  // This model is described in the article:
  // Theoretical analysis of biochemical pathways of nitric oxide release from vascular endothelial cells.
  // Chen K, Popel AS.
  // Free Radic. Biol. Med. 2006 Aug; 41(4): 668-680
  // Abstract:
  // Vascular endothelium expressing endothelial nitric oxide synthase (eNOS) produces nitric oxide (NO), which has a number of important physiological functions in the microvasculature. The rate of NO production by the endothelium is a critical determinant of NO distribution in the vascular wall. We have analyzed the biochemical pathways of NO synthesis and formulated a model to estimate NO production by the microvascular endothelium under physiological conditions. The model quantifies the NO produced by eNOS based on the kinetics of NO synthesis and the availability of eNOS and its intracellular substrates. The predicted NO production from microvessels was in the range of 0.005-0.1 microM/s. This range of predicted values is in agreement with some experimental values but is much lower than other rates previously measured or estimated from experimental data with the help of mathematical modeling. Paradoxical discrepancies between the model predictions and previously reported results based on experimental measurements of NO concentration in the vicinity of the arteriolar wall suggest that NO can also be released through eNOS-independent mechanisms, such as catalysis by neuronal NOS (nNOS). We also used our model to test the sensitivity of NO production to substrate availability, eNOS concentration, and potential rate-limiting factors. The results indicated that the predicted low level of NO production can be attributed primarily to a low expression of eNOS in the microvascular endothelial cells.
  // This model is hosted on BioModels Database and identified by: BIOMD0000000676.
  // To cite BioModels Database, please use: Chelliah V et al. BioModels: ten-year anniversary. Nucl. Acids Res. 2015, 43(Database issue):D542-8.
  // To the extent possible under law, all copyright and related or neighbouring rights to this encoded model have been dedicated to the public domain worldwide. Please refer to CC0 Public Domain Dedication for more information.
  // biomodels.db:MODEL1006230005
  // isDescribedBy pubmed:16864000
  // biomodels.db:BIOMD0000000676
  // isVersionOf GO:0006809
  // occursIn BTO:0001854
  // isDescribedBy pubmed:16864000

  // Compartments:
  compartment Endothelium = 1;  // isVersionOf BTO:0001854

  // Species:
  species $Arg in Endothelium = 100;  // isVersionOf CHEBI:29016
  species Fe3__enos in Endothelium = 0.015; Fe3__enos is "Fe3+(enos)";  // isVersionOf CHEBI:29034
  species Fe3__Arg in Endothelium = 0; Fe3__Arg is "Fe3+_Arg";  // hasPart CHEBI:29034; hasPart CHEBI:29016
  species Fe2 in Endothelium = 0; Fe2 is "Fe2+";  // isVersionOf CHEBI:29033
  species Fe2__Arg in Endothelium = 0; Fe2__Arg is "Fe2+_Arg";  // hasPart CHEBI:29016; hasPart CHEBI:29033
  species Fe3__NO in Endothelium = 0; Fe3__NO is "Fe3+_NO";  // hasPart CHEBI:29034; hasPart CHEBI:16480
  species NO in Endothelium = 0;  // hasPart CHEBI:16480
  species Fe2__NO in Endothelium = 0; Fe2__NO is "Fe2+_NO";  // hasPart CHEBI:29033; hasPart CHEBI:16480
  species Fe3__NOHA in Endothelium = 0; Fe3__NOHA is "Fe3+_NOHA";  // hasPart CHEBI:29034; hasPart CHEBI:47830
  species NOHA in Endothelium = 0;  // isVersionOf CHEBI:47830
  species Fe2__NOHA in Endothelium = 0; Fe2__NOHA is "Fe2+_NOHA";  // hasPart CHEBI:29033; hasPart CHEBI:47830
  species $O2 in Endothelium = 150;  // isVersionOf CHEBI:15379
  species Fe3__O2__Arg in Endothelium = 0; Fe3__O2__Arg is "Fe3+_O2-_Arg";  // hasPart CHEBI:15379; hasPart CHEBI:29016; hasPart CHEBI:29034
  species Fe3__O2__NOHA in Endothelium = 0; Fe3__O2__NOHA is "Fe3+_O2-_NOHA";  // hasPart CHEBI:15379; hasPart CHEBI:29034; hasPart CHEBI:47830
  species Citrulline in Endothelium = 0;  // isVersionOf CHEBI:18211

  // Parameters:
  k1 = 0.1;
  k1_prime = 0.1;
  k4 = 1.89;
  k4_prime = 11.4;
  S = 0;
  k2 = 0.91;
  k14 = 53.9;
  k13 = 0.033;
  k8 = 0.1;
  k8_prime = 0.1;
  k3 = 0.91;
  k9 = 11.4;
  k9_prime = 1.89;
  k5 = 2.58;
  k5_prime = 98;
  k6 = 12.6;
  k7 = 0.91;
  k10 = 3.33;
  k10_prime = 89.9;
  k11 = 29.4;
  k12 = 0.91;

  // Reactions:
  Fe3__Arg_synthesis: $Arg + Fe3__enos -> Fe3__Arg; Endothelium*(k1*Arg*Fe3__enos - k1_prime*Fe3__Arg); Fe3__Arg_synthesis is "Fe3+_Arg synthesis";
  Fe2__Arg_synthesis_dissociation: $Arg + Fe2 -> Fe2__Arg; Endothelium*(k4*Arg*Fe2 - k4_prime*Fe2__Arg); Fe2__Arg_synthesis_dissociation is "Fe2+_Arg synthesis/dissociation";
  Arginine_synthesis: => $Arg; Endothelium*Constant_flux__irreversible(S);
  Fe2__formation: Fe3__enos => Fe2; Endothelium*k2*Fe3__enos; Fe2__formation is "Fe2+ formation";
  Fe3__and_NO_formation: Fe3__NO => Fe3__enos + NO; Endothelium*k14*Fe3__NO; Fe3__and_NO_formation is "Fe3+ and NO formation";
  Fe3__formation: Fe2__NO => Fe3__enos; Endothelium*function_for_modified_reactions(k13, O2, Fe2__NO); Fe3__formation is "Fe3+ formation";  // modifiers: O2
  Fe3__NOHA_formation_degradation: Fe3__NOHA -> Fe3__enos + NOHA; Endothelium*(k8*Fe3__NOHA - k8_prime*Fe3__enos*NOHA); Fe3__NOHA_formation_degradation is "Fe3+_NOHA formation/degradation";
  Fe2__Arg_formation: Fe3__Arg => Fe2__Arg; Endothelium*k3*Fe3__Arg; Fe2__Arg_formation is "Fe2+_Arg formation";
  Fe2__NOHA_formation: Fe2__NOHA -> Fe2 + NOHA; Endothelium*(k9*Fe2__NOHA - k9_prime*Fe2*NOHA); Fe2__NOHA_formation is "Fe2+_NOHA formation";
  Fe3__O2_Arg_formation_with_Oxygen_activation: Fe2__Arg => Fe3__O2__Arg; Endothelium*function_for_modified_reactions(k5, O2, Fe2__Arg); Fe3__O2_Arg_formation_with_Oxygen_activation is "Fe3+_O2-Arg formation with Oxygen activation";  // modifiers: O2
  Fe3__O2_Arg_degradation: Fe3__O2__Arg => Fe2__Arg; Endothelium*k5_prime*Fe3__O2__Arg; Fe3__O2_Arg_degradation is "Fe3+_O2-Arg degradation";
  Fe3__NOHA_synthesis: Fe3__O2__Arg => Fe3__NOHA; Endothelium*k6*Fe3__O2__Arg; Fe3__NOHA_synthesis is "Fe3+_NOHA synthesis";
  Fe2__NOHA_synthesis: Fe3__NOHA => Fe2__NOHA; Endothelium*k7*Fe3__NOHA; Fe2__NOHA_synthesis is "Fe2+_NOHA synthesis";
  Fe3__O2__NOHA_synthesis_with_Oxygen_activation: Fe2__NOHA => Fe3__O2__NOHA; Endothelium*function_for_modified_reactions(k10, O2, Fe2__NOHA); Fe3__O2__NOHA_synthesis_with_Oxygen_activation is "Fe3+_O2-_NOHA synthesis with Oxygen activation";  // modifiers: O2
  Fe3__NO_and_Citrulline_synthesis: Fe3__O2__NOHA => Fe3__NO + Citrulline; Endothelium*k11*Fe3__O2__NOHA; Fe3__NO_and_Citrulline_synthesis is "Fe3+_NO and Citrulline synthesis";
  Fe2__NO_synthesis: Fe3__NO => Fe2__NO; Endothelium*k12*Fe3__NO; Fe2__NO_synthesis is "Fe2+_NO synthesis";
  Fe3__O2__NOHA_degradation: Fe3__O2__NOHA => Fe2__NOHA; Endothelium*k10_prime*Fe3__O2__NOHA; Fe3__O2__NOHA_degradation is "Fe3+_O2-_NOHA degradation";

  // Unit definitions:
  unit volume = 1e-3 litre;
  unit substance = 1e-6 mole;
end
